# OpenSim document version 40000
AnalyzeTool subject01:
  model_file: Sub01_Scaled_adjusted.osim
  replace_force_set: false
  force_set_files: gait2392_CMC_Actuators.xml
  results_directory: ResultsInducedAccelerations
  output_precision: 8
  initial_time: 0.934
  final_time: 1.228
  external_loads_file: GRF_RL.xml
  states_file: CMC_states.sto
  lowpass_cutoff_frequency_for_coordinates: -1
  AnalysisSet Analyses:
    InducedAccelerations: start_time=0.934 end_time=1.228 step_interval=40 in_degrees=true body_names=center_of_mass
        force_threshold=6 [N] compute_potentials_only=true report_constraint_reactions=true
      ConstraintSet:
        RollingOnSurfaceConstraint right_foot_contact: rolling_body=calcn_r surface_body=ground surface_normal=(0 1 0)
            friction_coefficient=0.65 contact_radius=0.01
        RollingOnSurfaceConstraint left_foot_contact: rolling_body=calcn_l surface_body=ground surface_normal=(0 1 0)
            friction_coefficient=0.65 contact_radius=0.01
  ControllerSet Controllers:
    ControlSetController: controls_file=CMC_controls.xml
