# OpenSim document version 40000
AnalyzeTool:
  replace_force_set: false
  force_set_files: actuators_so.xml
  results_directory: .\
  output_precision: 8
  initial_time: 1.665
  final_time: 2.435
  solve_for_equilibrium_for_auxiliary_states: true
  maximum_number_of_integrator_steps: 20000
  maximum_integrator_step_size: 1
  minimum_integrator_step_size: 1e-8
  integrator_error_tolerance: 1e-5
  external_loads_file: GRF.xml
  coordinates_file: ik.mot
  lowpass_cutoff_frequency_for_coordinates: -1
  AnalysisSet Analyses:
    ProbeReporter: start_time=1.665 end_time=2.435 step_interval=1 in_degrees=true
        forces_file=_StaticOptimization_force.sto
