# OpenSim document version 40000
ForceSet Rajagopal:
  PointActuator FX: body=pelvis point=(-0.07370576 -0.01188505 0) direction=(1 0 0) optimal_force=1000
      optimal_force=1000
  PointActuator FY:
    PointActuator FY: body=pelvis point=(-0.07370576 -0.01188505 0) point=(-0.07370576 -0.01188505 0) direction=(0 1 0)
        optimal_force=1000 optimal_force=1000
    PointActuator FZ:
      PointActuator FZ: body=pelvis point=(-0.07370576 -0.01188505 0) point=(-0.07370576 -0.01188505 0)
          direction=(0 0 1) optimal_force=1000 optimal_force=1000
      TorqueActuator MX:
        TorqueActuator MX: bodyA=pelvis bodyB=ground axis=(1 0 0) optimal_force=800 optimal_force=800 direction=(1 0 0)
        TorqueActuator MY:
          TorqueActuator MY: bodyA=pelvis bodyB=ground axis=(0 1 0) optimal_force=800 optimal_force=800
              direction=(0 1 0)
          TorqueActuator MZ:
            TorqueActuator MZ: bodyA=pelvis bodyB=ground axis=(0 0 1) optimal_force=800 optimal_force=800
                direction=(0 0 1)
            CoordinateActuator hip_flexion_r_reserve:
              CoordinateActuator hip_flexion_r_reserve: coordinate=hip_flexion_r optimal_force=50 min_control=-1
                  max_control=1
              CoordinateActuator hip_adduction_r_reserve: coordinate=hip_adduction_r optimal_force=50 min_control=-1
                  max_control=1
              CoordinateActuator hip_rotation_r_reserve: coordinate=hip_rotation_r optimal_force=50 min_control=-1
                  max_control=1
              CoordinateActuator knee_angle_r_reserve:
                CoordinateActuator knee_angle_r_reserve: coordinate=knee_angle_r optimal_force=50 min_control=-1
                    max_control=1
                CoordinateActuator ankle_angle_r_reserve:
                  CoordinateActuator ankle_angle_r_reserve: coordinate=ankle_angle_r optimal_force=50 min_control=-1
                      max_control=1
                  CoordinateActuator hip_flexion_l_reserve:
                    CoordinateActuator hip_flexion_l_reserve: coordinate=hip_flexion_l optimal_force=50 min_control=-1
                        max_control=1
                    CoordinateActuator hip_adduction_l_reserve:
                      CoordinateActuator hip_adduction_l_reserve: coordinate=hip_adduction_l optimal_force=50
                          min_control=-1 max_control=1
                      CoordinateActuator hip_rotation_l_reserve:
                        CoordinateActuator hip_rotation_l_reserve: coordinate=hip_rotation_l optimal_force=50
                            min_control=-1 max_control=1
                        CoordinateActuator knee_angle_l_reserve:
                          CoordinateActuator knee_angle_l_reserve: coordinate=knee_angle_l optimal_force=50
                              min_control=-1 max_control=1
                          CoordinateActuator ankle_angle_l_reserve:
                            CoordinateActuator ankle_angle_l_reserve: coordinate=ankle_angle_l optimal_force=50
                                min_control=-1 max_control=1
