# OpenSim document version 40000
MarkerSet:
  Marker STRN: torso (0.1104892 0.2556256 0)
  Marker C7: torso (-0.07317603 0.4194471 0)
  Marker T10: pelvis (-0.1925594 0.248969 0)
  Marker CLAV: torso (0.04450882 0.366382 0)
  Marker RBAK: torso (-0.09785404 0.3129002 0.0658365)
  Marker RASI: pelvis (0.02 0.03 0.128)
  Marker LASI: pelvis (0.02 0.03 -0.128)
  Marker SACR: pelvis (-0.16 0.04 0)
  Marker RT1: femur_r (0.018 -0.2 0.064)
  Marker RT2: femur_r (0.08 -0.25 0.0047)
  Marker RT3: femur_r (0.01 -0.3 0.06)
  Marker RKNE: femur_r (0 -0.404 0.05)
  Marker RKNM: femur_r (0 -0.404 -0.05)
  Marker RPAT: femur_r (0.06253514 -0.404 0.007189682) fixed=true
  Marker RS1: tibia_r (0.005 -0.065 0.05)
  Marker RS2: tibia_r (0.05 -0.08 0)
  Marker RS3: tibia_r (0.02 -0.13 0.05)
  Marker RANK: tibia_r (-0.005 -0.3806039 0.053)
  Marker RANM: tibia_r (0.006 -0.3888 -0.038)
  Marker RHEE: calcn_r (-0.02 0.02 0)
  Marker RM5D: calcn_r (0.126184 0.00342711 0.0553676)
  Marker RTOE: calcn_r (0.185 0.02 0.005)
  Marker LT1: femur_l (0.018 -0.2 -0.064)
  Marker LT2: femur_l (0.08 -0.25 -0.0047)
  Marker LT3: femur_l (0.01 -0.3 -0.06)
  Marker LHJCWK: femur_l (0 0 0) fixed=true
  Marker LKJCWK: tibia_l (0 -0.006 0) fixed=true
  Marker LKNE: femur_l (0 -0.404 -0.05)
  Marker LKNM: femur_l (0 -0.404 0.05)
  Marker LPAT: femur_l (0.0625351 -0.404 -0.00718968) fixed=true
  Marker LS1: tibia_l (0.005 -0.065 -0.05)
  Marker LS2: tibia_l (0.05 -0.08 0)
  Marker LS3: tibia_l (-0.02 -0.13 -0.05)
  Marker LANK: tibia_l (-0.005 -0.380604 -0.053)
  Marker LANM: tibia_l (0.006 -0.3888 0.038)
  Marker LHEE: calcn_l (-0.02 0.02 0)
  Marker LM5D: calcn_l (0.1261836 0.003427109 -0.05536757)
  Marker LTOE: calcn_l (0.185 0.02 -0.005)
  Marker RTHI: femur_r (0.007585521 -0.2717279 0.1375475)
  Marker LTHI: femur_l (0.00758552 -0.271728 -0.137547)
  Marker RTIB: tibia_r (-0.004002346 -0.2994176 0.1106482)
  Marker LTIB: tibia_l (-0.00400235 -0.299418 -0.110648)
  Marker RHJCWK: femur_r (0 0 0) fixed=true
  Marker RKJCWK: tibia_r (0 -0.006 0) fixed=true
  Marker LAJCWK: talus_l (0 0 0) fixed=true
  Marker RAJCWK: talus_r (0 0 0) fixed=true
