# OpenSim document version 40000
MarkerSet:
  Marker LASI: pelvis (0.02 0.03 -0.128)
  Marker RASI: pelvis (0.02 0.03 0.128)
  Marker LPSI: pelvis (-0.1543626 0.02593694 -0.0483989)
  Marker RPSI: pelvis (-0.154363 0.0259369 0.0483989)
  Marker RHJC: femur_r (0 0 0)
  Marker RTHI: femur_r (0.007 -0.271 0.0769581)
  Marker RTHIAP: femur_r (0.007 -0.2173844 0.07587087)
  Marker RTHIAD: femur_r (-0.007997106 -0.3461679 0.08084608)
  Marker RKNE: femur_r (0 -0.404 0.05)
  Marker RKNM: femur_r (0 -0.404 -0.05)
  Marker RKJC: tibia_r (0 0 0)
  Marker RTIB: tibia_r (-0.004 -0.299 0.11)
  Marker RTIAP: femur_r (0.007 -0.271 0.137)
  Marker RTIAD: femur_r (0.007 -0.271 0.137)
  Marker RANK: tibia_r (-0.005 -0.38 0.053)
  Marker RMED: tibia_r (-0.005 -0.38 0.053)
  Marker RAJC: talus_r (0 0 0)
  Marker RHEE: calcn_r (-0.02 0.02 0)
  Marker RTOE: calcn_r (0.185 0.02 0.005)
  Marker RFMH: calcn_r (0.185 0.06 0.005)
  Marker RSMH: calcn_r (0.185 0.04 0.005)
  Marker RVMH: calcn_r (0.185 0.02 0.005)
  Marker LHJC: femur_l (0 0 0)
  Marker LTHI: femur_l (0.007 -0.271 -0.0769581)
  Marker LTHIAP: femur_l (0.007 -0.2173844 -0.07587087)
  Marker LTHIAD: femur_l (0.007 -0.2173844 0.07587087)
  Marker LKNE: femur_l (0 -0.404 -0.05)
  Marker LKNM: femur_l (0 -0.404 0.05)
  Marker LKJC: tibia_l (0 0 0)
  Marker LTIB: tibia_l (-0.004 -0.2341913 -0.08263606)
  Marker LTIAP: tibia_l (0.02991298 -0.179526 -0.07189379)
  Marker LTIAD: femur_l (0.02125224 -0.6833661 -0.0647194)
  Marker LANK: tibia_l (-0.005 -0.38 -0.053)
  Marker LMED: tibia_l (-0.005 -0.38 -0.053)
  Marker LAJC: talus_l (0 0 0)
  Marker LHEE: calcn_l (-0.02 0.02 0)
  Marker LTOE: calcn_l (0.185 0.02 -0.005)
  Marker LFMH: calcn_l (0.185 0.06 -0.005)
  Marker LSMH: calcn_l (0.185 0.04 -0.005)
  Marker LVMH: calcn_l (0.185 0.02 -0.005)
