# OpenSim document version 40000
Model GPK_generic_muscles_added:
  gravity: 0 -9.80665 0
  length_units: meters
  force_units: N
  defaults:
    CoordinateActuator default: optimal_force=300
    Millard2012EquilibriumMuscle default: min_control=0.01 optimal_force=1 max_isometric_force=546
        optimal_fiber_length=0.0535 tendon_slack_length=0.078 pennation_angle_at_optimal=0 max_contraction_velocity=10
  Ground
  BodySet:
    Body pelvis: mass=11.777 mass_center=(-0.0707 0 0) inertia=(0.1028 0.0871 0.0579 0 0 0)
        meshes=(r_pelvis.vtp l_pelvis.vtp sacrum.vtp)
      WrapCylinder Gmax1_at_pelvis_r: xyz_body_rotation=(-0.6 0.45 0) translation=(-0.077 -0.099 0.061) quadrant=-x
          radius=0.04 length=0.15
      WrapCylinder Gmax2_at_pelvis_r: xyz_body_rotation=(-0.75 0.39 0) translation=(-0.08 -0.083 0.068) quadrant=all
          radius=0.04 length=0.1
      WrapCylinder Gmax3_at_pelvis_r: xyz_body_rotation=(-0.1 0 0) translation=(-0.083 -0.088 0.068) quadrant=all
          radius=0.04 length=0.1
      WrapCylinder Gmax1_at_pelvis_l: xyz_body_rotation=(0.6 -0.45 0) translation=(-0.077 -0.099 -0.061) quadrant=-x
          radius=0.04 length=0.15
      WrapCylinder Gmax2_at_pelvis_l: xyz_body_rotation=(0.75 -0.39 0) translation=(-0.08 -0.083 -0.068) quadrant=all
          radius=0.04 length=0.1
      WrapCylinder Gmax3_at_pelvis_l: xyz_body_rotation=(0.1 0 0) translation=(-0.083 -0.088 -0.068) quadrant=all
          radius=0.04 length=0.1
      WrapCylinder PS_at_brim_r: xyz_body_rotation=(-0.25 -0.27 0.1) translation=(-0.074 -0.06 0.0656) quadrant=-y
          radius=0.05 length=0.1
      WrapCylinder PS_at_brim_l: xyz_body_rotation=(0.25 0.27 0.1) translation=(-0.074 -0.06 -0.0656) quadrant=-y
          radius=0.05 length=0.1
      WrapCylinder IL_at_brim_r: xyz_body_rotation=(-0.32 -0.24 0.9) translation=(-0.071 -0.065 0.0756) quadrant=-y
          radius=0.0549 length=0.1
      WrapCylinder IL_at_brim_l: xyz_body_rotation=(0.32 0.24 0.9) translation=(-0.071 -0.065 -0.0756) quadrant=-y
          radius=0.0549 length=0.1
      WrapTorus pelvisOITorus1_r: xyz_body_rotation=(0 -0.5 0) translation=(-0.113 -0.072 0.045) quadrant=all
          inner_radius=0.019 outer_radius=0.02
      WrapTorus pelvisOITorus2_r: xyz_body_rotation=(-0.05565675 -0.1966786 0)
          translation=(-0.1027461 -0.07900047 0.0569826) quadrant=all inner_radius=0.03476903 outer_radius=0.03641683
      WrapTorus pelvisOITorus3_r: xyz_body_rotation=(0 -0.6 0) translation=(-0.111 -0.072 0.051) quadrant=all
          inner_radius=0.019 outer_radius=0.02
      WrapCylinder GEMsup_at_Ischium_r: xyz_body_rotation=(-1.06738 0.08921519 2)
          translation=(-0.0624965 -0.0612876 0.0725775) quadrant=all radius=0.03738045 length=0.06
      WrapTorus pelvisOITorus1_l: xyz_body_rotation=(0 0.5 0) translation=(-0.113 -0.072 -0.045) quadrant=all
          inner_radius=0.019 outer_radius=0.02
      WrapTorus pelvisOITorus2_l: xyz_body_rotation=(0.05565675 0.1966786 0)
          translation=(-0.1027461 -0.07900047 -0.0569826) quadrant=all inner_radius=0.03476903 outer_radius=0.03641683
      WrapTorus pelvisOITorus3_l: xyz_body_rotation=(0 0.6 0) translation=(-0.111 -0.072 -0.051) quadrant=all
          inner_radius=0.019 outer_radius=0.02
      WrapCylinder GEMsup_at_Ischium_l: xyz_body_rotation=(1.06738 -0.08921519 2)
          translation=(-0.0624965 -0.0612876 -0.0725775) quadrant=all radius=0.03738045 length=0.06
    Body femur_r: mass=9.3014 mass_center=(0 -0.17 0) inertia=(0.1339 0.0351 0.1412 0 0 0) meshes=r_femur.vtp
      WrapCylinder Gastroc_at_condyles_r: translation=(0.005 -0.41 0) quadrant=all radius=0.025 length=0.1
      WrapCylinder KnExt_at_fem_r: xyz_body_rotation=(-0.0623366 0.0507601 0)
          translation=(0.00358828 -0.402732 0.00209111) quadrant=all radius=0.025 length=0.1
      WrapCylinder AB_at_femshaft_r: xyz_body_rotation=(1.66157 0.186644 0) translation=(0.0146434 -0.112595 0.023365)
          quadrant=all radius=0.0165 length=0.07
      WrapCylinder AL_at_femshaft_r: xyz_body_rotation=(1.77711 0.136489 0) translation=(0.0307327 -0.231909 0.0151137)
          quadrant=all radius=0.0201 length=0.1
      WrapCylinder AMprox_at_femshaft_r: xyz_body_rotation=(1.61126 0.18656 0)
          translation=(0.00518299 -0.0728948 0.025403) quadrant=all radius=0.0211 length=0.07
      WrapCylinder AMmid_at_femshaft_r: xyz_body_rotation=(1.61139 0.13656 0)
          translation=(0.0230125 -0.160711 0.0205842) quadrant=all radius=0.0214 length=0.12
      WrapCylinder AMdist_at_femshaft_r: xyz_body_rotation=(1.71188 0.186636 0)
          translation=(0.0316065 -0.260736 0.0093646) quadrant=all radius=0.0218 length=0.2
      WrapCylinder AMisch_at_condyles_r: xyz_body_rotation=(1.71115 -0.463363 0)
          translation=(-0.0226511 -0.376831 -0.00315437) quadrant=all radius=0.04 length=0.24
      WrapCylinder PECT_at_femshaft_r: xyz_body_rotation=(1.81295 0.276344 0)
          translation=(0.00608573 -0.0845029 0.0304405) quadrant=all radius=0.015 length=0.05
      WrapSphere femHeadOISphere1_r: translation=(0 0 0) quadrant=all radius=0.02333361
      WrapSphere femHeadOISphere2_r: translation=(0.001741123 -0.001757574 0.003079938) quadrant=all radius=0.02270194
      WrapSphere femHeadOISphere3_r: translation=(0 0 0) quadrant=all radius=0.02333361
      WrapSphere femHeadSphere_OE1_r: translation=(-0.002337173 0.0003480985 0.0003890992) quadrant=all
          radius=0.01480479
      WrapSphere femHeadSphere_OE2_r: translation=(0 0 0) quadrant=all radius=0.02333336
      WrapSphere femHeadSphere_OE3_r: translation=(-0.004159088 0.0004586263 0.0003028079) quadrant=all
          radius=0.03374421
      WrapSphere femHeadGEMinfSphere_r: translation=(0 0 0) quadrant=all radius=0.02333361
    Body femoral_cond_r: mass=0 mass_center=(0 0 0) inertia=(0 0 0 0 0 0) meshes=fem_cond.vtp
    Body sagittal_articulation_frame_r: mass=0 mass_center=(0 0 0) inertia=(0 0 0 0 0 0)
    Body med_cond_r: mass=1e-7 mass_center=(0 0 0) inertia=(1e-7 1e-7 1e-7 0 0 0) meshes=sphere.vtp
    Body lat_cond_r: mass=1e-7 mass_center=(0 0 0) inertia=(1e-7 1e-7 1e-7 0 0 0) meshes=sphere.vtp
    Body tibial_plat_r: mass=0 mass_center=(0 0 0) inertia=(0 0 0 0 0 0) meshes=tib_plat.vtp
    Body tibia_r: mass=3.7075 mass_center=(0 -0.1867 0) inertia=(0.0504 0.0051 0.0511 0 0 0)
        meshes=(tibia_r.vtp r_fibula.vtp)
      WrapCylinder GasLat_at_shank_r: xyz_body_rotation=(2.96723 -0.279725 -1.47812)
          translation=(-0.0074 -0.074 -0.0033) quadrant=-y radius=0.055 length=0.1
      WrapCylinder GasMed_at_shank_r: xyz_body_rotation=(2.96723 0.0279725 -1.47812)
          translation=(-0.0074 -0.074 -0.0033) quadrant=-y radius=0.055 length=0.1
      WrapCylinder GR_at_condyles_r: xyz_body_rotation=(0 -0.4 0) translation=(-0.003 -0.02 0) quadrant=all
          radius=0.036 length=0.1
      WrapCylinder SM_at_condyles_r: xyz_body_rotation=(0 -0.1 0) translation=(-0.001 -0.02 0) quadrant=all
          radius=0.0352 length=0.1
      WrapCylinder ST_at_condyles_r: xyz_body_rotation=(0 -0.2 0) translation=(-0.002 -0.0205 0) quadrant=all
          radius=0.0425 length=0.1
      WrapCylinder BF_at_gastroc_r: translation=(-0.058 -0.06 0) quadrant=y radius=0.03 length=0.15
    Body patella_r: mass=0.0862 mass_center=(0.0018 0.0264 0) inertia=(2.87e-6 1.311e-5 1.311e-5 0 0 0)
        meshes=r_patella.vtp
    Body talus_r: mass=0.1 mass_center=(0 0 0) inertia=(0.001 0.001 0.001 0 0 0) meshes=r_talus.vtp
    Body calcn_r: mass=1.25 mass_center=(0.1 0.03 0) inertia=(0.0014 0.0039 0.0041 0 0 0) meshes=r_foot.vtp
    Body toes_r: mass=0.2166 mass_center=(0.0346 0.006 -0.0175) inertia=(0.0001 0.0002 0.001 0 0 0) meshes=r_bofoot.vtp
    Body femur_l: mass=9.3014 mass_center=(0 -0.17 0) inertia=(0.1339 0.0351 0.1412 0 0 0) meshes=l_femur.vtp
      WrapCylinder Gastroc_at_condyles_l: translation=(0.005 -0.41 0) quadrant=all radius=0.025 length=0.1
      WrapCylinder KnExt_at_fem_l: xyz_body_rotation=(0.0623366 -0.0507601 0)
          translation=(0.00358828 -0.402732 -0.00209111) quadrant=all radius=0.025 length=0.1
      WrapCylinder AB_at_femshaft_l: xyz_body_rotation=(-1.66157 -0.186644 0)
          translation=(0.0146434 -0.112595 -0.023365) quadrant=all radius=0.0165 length=0.07
      WrapCylinder AL_at_femshaft_l: xyz_body_rotation=(-1.77711 -0.136489 0)
          translation=(0.0307327 -0.231909 -0.0151137) quadrant=all radius=0.0201 length=0.1
      WrapCylinder AMprox_at_femshaft_l: xyz_body_rotation=(-1.61126 -0.18656 0)
          translation=(0.00518299 -0.0728948 -0.025403) quadrant=all radius=0.0211 length=0.07
      WrapCylinder AMmid_at_femshaft_l: xyz_body_rotation=(-1.61139 -0.13656 0)
          translation=(0.0230125 -0.160711 -0.0205842) quadrant=all radius=0.0214 length=0.12
      WrapCylinder AMdist_at_femshaft_l: xyz_body_rotation=(-1.71188 -0.186636 0)
          translation=(0.0316065 -0.260736 -0.0093646) quadrant=all radius=0.0218 length=0.2
      WrapCylinder AMisch_at_condyles_l: xyz_body_rotation=(-1.71115 0.463363 0)
          translation=(-0.0226511 -0.376831 0.00315437) quadrant=all radius=0.04 length=0.24
      WrapCylinder PECT_at_femshaft_l: xyz_body_rotation=(-1.81295 -0.276344 0)
          translation=(0.00608573 -0.0845029 -0.0304405) quadrant=all radius=0.015 length=0.05
      WrapSphere femHeadOISphere1_l: translation=(0 0 0) quadrant=all radius=0.02333361
      WrapSphere femHeadOISphere2_l: translation=(0.001741123 -0.001757574 -0.003079938) quadrant=all radius=0.02270194
      WrapSphere femHeadOISphere3_l: translation=(0 0 0) quadrant=all radius=0.02333361
      WrapSphere femHeadSphere_OE1_l: translation=(-0.002337173 0.0003480985 -0.0003890992) quadrant=all
          radius=0.01480479
      WrapSphere femHeadSphere_OE2_l: translation=(0 0 0) quadrant=all radius=0.02333336
      WrapSphere femHeadSphere_OE3_l: translation=(-0.004159088 0.0004586263 -0.0003028079) quadrant=all
          radius=0.03374421
      WrapSphere femHeadGEMinfSphere_l: translation=(0 0 0) quadrant=all radius=0.02333361
    Body femoral_cond_l: mass=0 mass_center=(0 0 0) inertia=(0 0 0 0 0 0) meshes=fem_cond.vtp
    Body sagittal_articulation_frame_l: mass=0 mass_center=(0 0 0) inertia=(0 0 0 0 0 0)
    Body med_cond_l: mass=0 mass_center=(0 0 0) inertia=(0 0 0 0 0 0) meshes=sphere.vtp
    Body lat_cond_l: mass=1e-7 mass_center=(0 0 0) inertia=(1e-7 1e-7 1e-7 0 0 0) meshes=sphere.vtp
    Body tibial_plat_l: mass=0 mass_center=(0 0 0) inertia=(0 0 0 0 0 0) meshes=tib_plat.vtp
    Body tibia_l: mass=3.7075 mass_center=(0 -0.1867 0) inertia=(0.0504 0.0051 0.0511 0 0 0)
        meshes=(tibia_l.vtp l_fibula.vtp)
      WrapCylinder GasLat_at_shank_l: xyz_body_rotation=(-2.96723 0.279725 -1.47812)
          translation=(-0.0074 -0.074 0.0033) quadrant=-y radius=0.055 length=0.1
      WrapCylinder GasMed_at_shank_l: xyz_body_rotation=(-2.96723 -0.0279725 -1.47812)
          translation=(-0.0074 -0.074 0.0033) quadrant=-y radius=0.055 length=0.1
      WrapCylinder GR_at_condyles_l: xyz_body_rotation=(0 0.4 0) translation=(-0.003 -0.02 0) quadrant=all radius=0.036
          length=0.1
      WrapCylinder SM_at_condyles_l: xyz_body_rotation=(0 0.1 0) translation=(-0.001 -0.02 0) quadrant=all
          radius=0.0352 length=0.1
      WrapCylinder ST_at_condyles_l: xyz_body_rotation=(0 0.2 0) translation=(-0.002 -0.0205 0) quadrant=all
          radius=0.0425 length=0.1
      WrapCylinder BF_at_gastroc_l: translation=(-0.058 -0.06 0) quadrant=all radius=0.03 length=0.15
    Body patella_l: mass=0.0862 mass_center=(0.0018 0.0264 0) inertia=(2.87e-6 1.311e-5 1.311e-5 0 0 0)
        meshes=l_patella.vtp
    Body talus_l: mass=0.1 mass_center=(0 0 0) inertia=(0.001 0.001 0.001 0 0 0) meshes=l_talus.vtp
    Body calcn_l: mass=1.25 mass_center=(0.1 0.03 0) inertia=(0.0014 0.0039 0.0041 0 0 0) meshes=l_foot.vtp
    Body toes_l: mass=0.2166 mass_center=(0.0346 0.006 0.0175) inertia=(0.0001 0.0002 0.001 0 0 0) meshes=l_bofoot.vtp
    Body torso: mass=34.2366 mass_center=(-0.03 0.32 0) inertia=(1.4745 0.7555 1.4314 0 0 0)
        meshes=(hat_spine.vtp hat_jaw.vtp hat_skull.vtp hat_ribs_scap.vtp)
    Body humerus_r: mass=2.388871 mass_center=(0 -0.164502 0) inertia=(0.01404057 0.004843562 0.01576009 0 0 0)
        meshes=humerus_rv.vtp
    Body ulna_r: mass=0.7140169 mass_center=(0 -0.120525 0) inertia=(0.003481347 0.000726358 0.003776356 0 0 0)
        meshes=ulna_rv.vtp
    Body radius_r: mass=0.7140169 mass_center=(0 -0.120525 0) inertia=(0.003481347 0.000726358 0.003776356 0 0 0)
        meshes=radius_rv.vtp
    Body hand_r: mass=0.5377164 mass_center=(0 -0.068095 0) inertia=(0.0010484 0.0006429091 0.001574951 0 0 0)
        meshes=(pisiform_rvs.vtp lunate_rvs.vtp scaphoid_rvs.vtp triquetrum_rvs.vtp hamate_rvs.vtp capitate_rvs.vtp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)
    Body humerus_l: mass=2.388871 mass_center=(0 -0.164502 0) inertia=(0.01404057 0.004843562 0.01576009 0 0 0)
        meshes=humerus_lv.vtp
    Body ulna_l: mass=0.7140169 mass_center=(0 -0.120525 0) inertia=(0.003481347 0.000726358 0.003776356 0 0 0)
        meshes=ulna_lv.vtp
    Body radius_l: mass=0.7140169 mass_center=(0 -0.120525 0) inertia=(0.003481347 0.000726358 0.003776356 0 0 0)
        meshes=radius_lv.vtp
    Body hand_l: mass=0.5377164 mass_center=(0 -0.068095 0) inertia=(0.0010484 0.0006429091 0.001574951 0 0 0)
        meshes=(pisiform_lvs.vtp lunate_lvs.vtp scaphoid_lvs.vtp triquetrum_lvs.vtp hamate_lvs.vtp capitate_lvs.vtp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)
  JointSet:
    CustomJoint ground_pelvis: socket_parent_frame=ground_offset socket_child_frame=pelvis_offset
      Coordinate pelvis_tilt: default_value=0 range=(-1.570796 1.570796) clamped=true
      Coordinate pelvis_list: default_value=0 range=(-1.570796 1.570796) clamped=true
      Coordinate pelvis_rotation: default_value=0 range=(-3.140796 3.14708) clamped=true
      Coordinate pelvis_tx: default_value=0 range=(-5 5) clamped=true
      Coordinate pelvis_ty: default_value=0.93 range=(-1 2) clamped=true
      Coordinate pelvis_tz: default_value=0 range=(-3 3) clamped=true
      PhysicalOffsetFrame ground_offset: socket_parent=/ground translation=(0 0 0)
      PhysicalOffsetFrame pelvis_offset: socket_parent=/bodyset/pelvis translation=(0 0 0)
      SpatialTransform:
        TransformAxis rotation1: coordinates=pelvis_tilt axis=(0 0 1) LinearFunction(coefficients=1 0)
        TransformAxis rotation2: coordinates=pelvis_list axis=(1 0 0) LinearFunction(coefficients=1 0)
        TransformAxis rotation3: coordinates=pelvis_rotation axis=(0 1 0) LinearFunction(coefficients=1 0)
        TransformAxis translation1: coordinates=pelvis_tx axis=(1 0 0) LinearFunction(coefficients=1 0)
        TransformAxis translation2: coordinates=pelvis_ty axis=(0 1 0) LinearFunction(coefficients=1 0)
        TransformAxis translation3: coordinates=pelvis_tz axis=(0 0 1) LinearFunction(coefficients=1 0)
    CustomJoint hip_r: socket_parent_frame=pelvis_offset socket_child_frame=femur_r_offset
      Coordinate hip_flexion_r: default_value=0 range=(-0.5235988 2.094395) clamped=true
      Coordinate hip_adduction_r: default_value=0 range=(-0.8726646 0.5235988) clamped=true
      Coordinate hip_rotation_r: default_value=0 range=(-0.6981317 0.6981317) clamped=true
      PhysicalOffsetFrame pelvis_offset: socket_parent=/bodyset/pelvis translation=(-0.056276 -0.07849 0.07726)
      PhysicalOffsetFrame femur_r_offset: socket_parent=/bodyset/femur_r translation=(0 0 0)
      SpatialTransform: axes_held_at_zero=(translation1 translation2 translation3)
        TransformAxis rotation1: coordinates=hip_flexion_r axis=(0 0 1) LinearFunction(coefficients=1 0)
        TransformAxis rotation2: coordinates=hip_adduction_r axis=(1 0 0) LinearFunction(coefficients=1 0)
        TransformAxis rotation3: coordinates=hip_rotation_r axis=(0 1 0) LinearFunction(coefficients=1 0)
    WeldJoint femur_weld_r: socket_parent_frame=femur_r_offset socket_child_frame=femoral_cond_r_offset
      PhysicalOffsetFrame femur_r_offset: socket_parent=/bodyset/femur_r translation=(0 -0.404 0)
      PhysicalOffsetFrame femoral_cond_r_offset: socket_parent=/bodyset/femoral_cond_r translation=(0 0 0)
    CustomJoint Lerner_knee_r: socket_parent_frame=femoral_cond_r_offset
        socket_child_frame=sagittal_articulation_frame_r_offset
      Coordinate knee_angle_r: default_value=0 range=(-2.094395 0.1745329) clamped=true
      Coordinate knee_adduction_r: default_value=0 range=(-0.1745 0.1745) clamped=true locked=true
      PhysicalOffsetFrame femoral_cond_r_offset: socket_parent=/bodyset/femoral_cond_r translation=(0 0 0)
      PhysicalOffsetFrame sagittal_articulation_frame_r_offset: socket_parent=/bodyset/sagittal_articulation_frame_r
          translation=(0 0 0)
      SpatialTransform: axes_held_at_zero=(rotation2 translation3)
        TransformAxis rotation1: coordinates=knee_angle_r axis=(0 0 1) LinearFunction(coefficients=1 0)
        TransformAxis rotation3: coordinates=knee_adduction_r axis=(1 0 0) LinearFunction(coefficients=1 0)
        TransformAxis translation1: coordinates=knee_angle_r axis=(1 0 0)
          SimmSpline: x=(-2.0944 -1.74533 -1.39626 -1.0472 -0.698132 -0.349066 -0.174533 0.197344 0.337395 0.490178 1.52146 2.0944)
              y=(-0.0032 0.00179 0.00411 0.0041 0.00212 -0.001 -0.0031 -0.005227 -0.005435 -0.005574 -0.005435 -0.00525)
        TransformAxis translation2: coordinates=knee_angle_r axis=(0 1 0)
          SimmSpline: x=(-2.0944 -1.22173 -0.523599 -0.349066 -0.174533 0.159149 2.0944)
              y=(-0.0186 -0.0042 0.005 0.0064 0.0074 0.0087 0.008)
    CustomJoint med_cond_joint_r: socket_parent_frame=sagittal_articulation_frame_r_offset
        socket_child_frame=med_cond_r_offset
      Coordinate med_cond_adduction_r: default_value=0 range=(-2.094395 2.094395) clamped=true locked=true
          is_free_to_satisfy_constraints=true
      PhysicalOffsetFrame sagittal_articulation_frame_r_offset: socket_parent=/bodyset/sagittal_articulation_frame_r
          translation=(0 -0.035 -0.02)
      PhysicalOffsetFrame med_cond_r_offset: socket_parent=/bodyset/med_cond_r translation=(0 0 0)
      SpatialTransform: axes_held_at_zero=(rotation2 rotation3 translation1 translation2 translation3)
        TransformAxis rotation1: coordinates=med_cond_adduction_r axis=(1 0 0) LinearFunction(coefficients=1 0)
    CustomJoint lat_cond_joint_r: socket_parent_frame=sagittal_articulation_frame_r_offset
        socket_child_frame=lat_cond_r_offset
      Coordinate lat_cond_adduction_r: default_value=0 range=(-2.094395 2.094395) clamped=true locked=true
          is_free_to_satisfy_constraints=true
      PhysicalOffsetFrame sagittal_articulation_frame_r_offset: socket_parent=/bodyset/sagittal_articulation_frame_r
          translation=(0 -0.035 0.02)
      PhysicalOffsetFrame lat_cond_r_offset: socket_parent=/bodyset/lat_cond_r translation=(0 0 0)
      SpatialTransform: axes_held_at_zero=(rotation2 rotation3 translation1 translation2 translation3)
        TransformAxis rotation1: coordinates=lat_cond_adduction_r axis=(1 0 0) LinearFunction(coefficients=1 0)
    WeldJoint med_cond_weld_r: socket_parent_frame=med_cond_r_offset socket_child_frame=tibial_plat_r_offset
      PhysicalOffsetFrame med_cond_r_offset: socket_parent=/bodyset/med_cond_r translation=(0 0.035 0.02)
      PhysicalOffsetFrame tibial_plat_r_offset: socket_parent=/bodyset/tibial_plat_r translation=(0 0 0)
    WeldJoint tibial_plat_weld_r: socket_parent_frame=tibial_plat_r_offset socket_child_frame=tibia_r_offset
      PhysicalOffsetFrame tibial_plat_r_offset: socket_parent=/bodyset/tibial_plat_r translation=(0 0 0)
      PhysicalOffsetFrame tibia_r_offset: socket_parent=/bodyset/tibia_r translation=(0 0 0)
    CustomJoint fem_pat_r: socket_parent_frame=femoral_cond_r_offset socket_child_frame=patella_r_offset
      Coordinate patella_r_constrained_knee_angle: default_value=0 range=(-999999.9 999999.9) clamped=true
      PhysicalOffsetFrame femoral_cond_r_offset: socket_parent=/bodyset/femoral_cond_r translation=(0 0 0.0024)
      PhysicalOffsetFrame patella_r_offset: socket_parent=/bodyset/patella_r translation=(0 0 0)
      SpatialTransform: axes_held_at_zero=(rotation2 rotation3 translation3)
        TransformAxis rotation1: coordinates=patella_r_constrained_knee_angle axis=(0 0 1)
          SimmSpline: x=(-2.0944 -1.45752 -0.526391 0 0.0523599 0.174533)
              y=(-1.68636 -1.09112 -0.256161 -0.0012 -0.0187016 -0.1054)
        TransformAxis translation1: coordinates=patella_r_constrained_knee_angle axis=(1 0 0)
          SimmSpline: x=(-2.0944 -1.91986 -1.5708 -1.39626 -1.0472 -0.698132 -0.349066 -0.174533 0 0.0872665 0.174533 2.0944)
              y=(-0.03082 -0.02767 -0.01694 -0.00996 0.00548 0.0215 0.03599 0.04069 0.0451 0.04648 0.04761 0.04648)
        TransformAxis translation2: coordinates=patella_r_constrained_knee_angle axis=(0 1 0)
          SimmSpline: x=(-2.0944 -1.91986 -1.5708 -1.39626 -1.0472 -0.698132 -0.349066 -0.174533 0 0.0872665 0.174533 2.0944)
              y=(-0.02263 -0.02892 -0.0391 -0.0424 -0.0447 -0.0406 -0.0297 -0.023 -0.0145 -0.0098 -0.005 -0.0098)
    PinJoint ankle_r: socket_parent_frame=tibia_r_offset socket_child_frame=talus_r_offset
      Coordinate ankle_angle_r: default_value=0 range=(-0.6981317 0.5235988) clamped=true
      PhysicalOffsetFrame tibia_r_offset: socket_parent=/bodyset/tibia_r translation=(-0.01 -0.4 0)
          orientation=(0.175895 -0.105208 0.0186622)
      PhysicalOffsetFrame talus_r_offset: socket_parent=/bodyset/talus_r translation=(0 0 0)
          orientation=(0.175895 -0.105208 0.0186622)
    PinJoint subtalar_r: socket_parent_frame=talus_r_offset socket_child_frame=calcn_r_offset
      Coordinate subtalar_angle_r: default_value=0 range=(-0.3490659 0.3490659) clamped=true
      PhysicalOffsetFrame talus_r_offset: socket_parent=/bodyset/talus_r translation=(-0.04877 -0.04195 0.00792)
          orientation=(-1.76819 0.906223 1.8196)
      PhysicalOffsetFrame calcn_r_offset: socket_parent=/bodyset/calcn_r translation=(0 0 0)
          orientation=(-1.76819 0.906223 1.8196)
    PinJoint mtp_r: socket_parent_frame=calcn_r_offset socket_child_frame=toes_r_offset
      Coordinate mtp_angle_r: default_value=0 range=(-0.5235988 0.5235988) clamped=true locked=true
      PhysicalOffsetFrame calcn_r_offset: socket_parent=/bodyset/calcn_r translation=(0.1788 -0.002 0.00108)
          orientation=(-3.14159 0.619901 0)
      PhysicalOffsetFrame toes_r_offset: socket_parent=/bodyset/toes_r translation=(0 0 0)
          orientation=(-3.14159 0.619901 0)
    CustomJoint hip_l: socket_parent_frame=pelvis_offset socket_child_frame=femur_l_offset
      Coordinate hip_flexion_l: default_value=0 range=(-0.5235988 2.094395) clamped=true
      Coordinate hip_adduction_l: default_value=0 range=(-0.8726646 0.5235988) clamped=true
      Coordinate hip_rotation_l: default_value=0 range=(-0.6981317 0.6981317) clamped=true
      PhysicalOffsetFrame pelvis_offset: socket_parent=/bodyset/pelvis translation=(-0.056276 -0.07849 -0.07726)
      PhysicalOffsetFrame femur_l_offset: socket_parent=/bodyset/femur_l translation=(0 0 0)
      SpatialTransform: axes_held_at_zero=(translation1 translation2 translation3)
        TransformAxis rotation1: coordinates=hip_flexion_l axis=(0 0 1) LinearFunction(coefficients=1 0)
        TransformAxis rotation2: coordinates=hip_adduction_l axis=(1 0 0) LinearFunction(coefficients=-1 0)
        TransformAxis rotation3: coordinates=hip_rotation_l axis=(0 1 0) LinearFunction(coefficients=-1 0)
    WeldJoint femur_weld_l: socket_parent_frame=femur_l_offset socket_child_frame=femoral_cond_l_offset
      PhysicalOffsetFrame femur_l_offset: socket_parent=/bodyset/femur_l translation=(0 -0.404 0)
      PhysicalOffsetFrame femoral_cond_l_offset: socket_parent=/bodyset/femoral_cond_l translation=(0 0 0)
    CustomJoint Lerner_knee_l: socket_parent_frame=femoral_cond_l_offset
        socket_child_frame=sagittal_articulation_frame_l_offset
      Coordinate knee_angle_l: default_value=0 range=(-2.094395 0.1745329) clamped=true
      Coordinate knee_adduction_l: default_value=0 range=(-0.1745 0.1745) clamped=true locked=true
      PhysicalOffsetFrame femoral_cond_l_offset: socket_parent=/bodyset/femoral_cond_l translation=(0 0 0)
      PhysicalOffsetFrame sagittal_articulation_frame_l_offset: socket_parent=/bodyset/sagittal_articulation_frame_l
          translation=(0 0 0)
      SpatialTransform: axes_held_at_zero=(rotation2 translation3)
        TransformAxis rotation1: coordinates=knee_angle_l axis=(0 0 1) LinearFunction(coefficients=1 0)
        TransformAxis rotation3: coordinates=knee_adduction_l axis=(1 0 0) LinearFunction(coefficients=-1 0)
        TransformAxis translation1: coordinates=knee_angle_l axis=(1 0 0)
          SimmSpline: x=(-2.0944 -1.74533 -1.39626 -1.0472 -0.698132 -0.349066 -0.174533 0.197344 0.337395 0.490178 1.52146 2.0944)
              y=(-0.0032 0.00179 0.00411 0.0041 0.00212 -0.001 -0.0031 -0.005227 -0.005435 -0.005574 -0.005435 -0.00525)
        TransformAxis translation2: coordinates=knee_angle_l axis=(0 1 0)
          SimmSpline: x=(-2.0944 -1.22173 -0.523599 -0.349066 -0.174533 0.159149 2.0944)
              y=(-0.0186 -0.0042 0.005 0.0064 0.0074 0.0087 0.008)
    CustomJoint med_cond_joint_l: socket_parent_frame=sagittal_articulation_frame_l_offset
        socket_child_frame=med_cond_l_offset
      Coordinate med_cond_adduction_l: default_value=0 range=(-2.094395 2.094395) clamped=true locked=true
          is_free_to_satisfy_constraints=true
      PhysicalOffsetFrame sagittal_articulation_frame_l_offset: socket_parent=/bodyset/sagittal_articulation_frame_l
          translation=(0 -0.035 0.02)
      PhysicalOffsetFrame med_cond_l_offset: socket_parent=/bodyset/med_cond_l translation=(0 0 0)
      SpatialTransform: axes_held_at_zero=(rotation2 rotation3 translation1 translation2 translation3)
        TransformAxis rotation1: coordinates=med_cond_adduction_l axis=(1 0 0) LinearFunction(coefficients=1 0)
    CustomJoint lat_cond_joint_l: socket_parent_frame=sagittal_articulation_frame_l_offset
        socket_child_frame=lat_cond_l_offset
      Coordinate lat_cond_adduction_l: default_value=0 range=(-2.094395 2.094395) clamped=true locked=true
          is_free_to_satisfy_constraints=true
      PhysicalOffsetFrame sagittal_articulation_frame_l_offset: socket_parent=/bodyset/sagittal_articulation_frame_l
          translation=(0 -0.035 -0.02)
      PhysicalOffsetFrame lat_cond_l_offset: socket_parent=/bodyset/lat_cond_l translation=(0 0 0)
      SpatialTransform: axes_held_at_zero=(rotation2 rotation3 translation1 translation2 translation3)
        TransformAxis rotation1: coordinates=lat_cond_adduction_l axis=(1 0 0) LinearFunction(coefficients=1 0)
    WeldJoint med_cond_weld_l: socket_parent_frame=med_cond_l_offset socket_child_frame=tibial_plat_l_offset
      PhysicalOffsetFrame med_cond_l_offset: socket_parent=/bodyset/med_cond_l translation=(0 0.035 -0.02)
      PhysicalOffsetFrame tibial_plat_l_offset: socket_parent=/bodyset/tibial_plat_l translation=(0 0 0)
    WeldJoint tibial_plat_weld_l: socket_parent_frame=tibial_plat_l_offset socket_child_frame=tibia_l_offset
      PhysicalOffsetFrame tibial_plat_l_offset: socket_parent=/bodyset/tibial_plat_l translation=(0 0 0)
      PhysicalOffsetFrame tibia_l_offset: socket_parent=/bodyset/tibia_l translation=(0 0 0)
    CustomJoint fem_pat_l: socket_parent_frame=femoral_cond_l_offset socket_child_frame=patella_l_offset
      Coordinate patella_l_constrained_knee_angle: default_value=0 range=(-999999.9 999999.9) clamped=true
      PhysicalOffsetFrame femoral_cond_l_offset: socket_parent=/bodyset/femoral_cond_l translation=(0 0 -0.0024)
      PhysicalOffsetFrame patella_l_offset: socket_parent=/bodyset/patella_l translation=(0 0 0)
      SpatialTransform: axes_held_at_zero=(rotation2 rotation3 translation3)
        TransformAxis rotation1: coordinates=patella_l_constrained_knee_angle axis=(0 0 1)
          SimmSpline: x=(-2.0944 -1.45752 -0.526391 0 0.0523599 0.174533)
              y=(-1.68636 -1.09112 -0.256161 -0.0012 -0.0187016 -0.1054)
        TransformAxis translation1: coordinates=patella_l_constrained_knee_angle axis=(1 0 0)
          SimmSpline: x=(-2.0944 -1.91986 -1.5708 -1.39626 -1.0472 -0.698132 -0.349066 -0.174533 0 0.0872665 0.174533 2.0944)
              y=(-0.03082 -0.02767 -0.01694 -0.00996 0.00548 0.0215 0.03599 0.04069 0.0451 0.04648 0.04761 0.04648)
        TransformAxis translation2: coordinates=patella_l_constrained_knee_angle axis=(0 1 0)
          SimmSpline: x=(-2.0944 -1.91986 -1.5708 -1.39626 -1.0472 -0.698132 -0.349066 -0.174533 0 0.0872665 0.174533 2.0944)
              y=(-0.02263 -0.02892 -0.0391 -0.0424 -0.0447 -0.0406 -0.0297 -0.023 -0.0145 -0.0098 -0.005 -0.0098)
    PinJoint ankle_l: socket_parent_frame=tibia_l_offset socket_child_frame=talus_l_offset
      Coordinate ankle_angle_l: default_value=0 range=(-0.6981317 0.5235988) clamped=true
      PhysicalOffsetFrame tibia_l_offset: socket_parent=/bodyset/tibia_l translation=(-0.01 -0.4 0)
          orientation=(-0.175895 0.105208 0.0186622)
      PhysicalOffsetFrame talus_l_offset: socket_parent=/bodyset/talus_l translation=(0 0 0)
          orientation=(-0.175895 0.105208 0.0186622)
    PinJoint subtalar_l: socket_parent_frame=talus_l_offset socket_child_frame=calcn_l_offset
      Coordinate subtalar_angle_l: default_value=0 range=(-0.3490659 0.3490659) clamped=true
      PhysicalOffsetFrame talus_l_offset: socket_parent=/bodyset/talus_l translation=(-0.04877 -0.04195 -0.00792)
          orientation=(1.76819 -0.906223 1.8196)
      PhysicalOffsetFrame calcn_l_offset: socket_parent=/bodyset/calcn_l translation=(0 0 0)
          orientation=(1.76819 -0.906223 1.8196)
    PinJoint mtp_l: socket_parent_frame=calcn_l_offset socket_child_frame=toes_l_offset
      Coordinate mtp_angle_l: default_value=0 range=(-0.5235988 0.5235988) clamped=true locked=true
      PhysicalOffsetFrame calcn_l_offset: socket_parent=/bodyset/calcn_l translation=(0.1788 -0.002 -0.00108)
          orientation=(-3.14159 -0.619901 0)
      PhysicalOffsetFrame toes_l_offset: socket_parent=/bodyset/toes_l translation=(0 0 0)
          orientation=(-3.14159 -0.619901 0)
    CustomJoint back: socket_parent_frame=pelvis_offset socket_child_frame=torso_offset
      Coordinate lumbar_extension: default_value=0 range=(-1.570796 1.570796) clamped=true
      Coordinate lumbar_bending: default_value=0 range=(-1.570796 1.570796) clamped=true
      Coordinate lumbar_rotation: default_value=0 range=(-1.570796 1.570796) clamped=true
      PhysicalOffsetFrame pelvis_offset: socket_parent=/bodyset/pelvis translation=(-0.1007 0.0815 0)
      PhysicalOffsetFrame torso_offset: socket_parent=/bodyset/torso translation=(0 0 0)
      SpatialTransform: axes_held_at_zero=(translation1 translation2 translation3)
        TransformAxis rotation1: coordinates=lumbar_extension axis=(0 0 1) LinearFunction(coefficients=1 0)
        TransformAxis rotation2: coordinates=lumbar_bending axis=(1 0 0) LinearFunction(coefficients=1 0)
        TransformAxis rotation3: coordinates=lumbar_rotation axis=(0 1 0) LinearFunction(coefficients=1 0)
    CustomJoint walker_knee_r: socket_parent_frame=femur_r_offset socket_child_frame=tibia_r_offset
      Coordinate knee_angle_r: default_value=4.877666e-5 range=(0 2.53073) clamped=true
      PhysicalOffsetFrame femur_r_offset: socket_parent=/bodyset/femur_r
          translation=(-0.004238427 -0.3857911 -0.001648277) orientation=(-1.64157 1.44618 1.5708)
      PhysicalOffsetFrame tibia_r_offset: socket_parent=/bodyset/tibia_r
          translation=(-0.008052968 -0.00351882 -0.001478028) orientation=(-1.64157 1.44618 1.5708)
      SpatialTransform:
        TransformAxis rotation1: coordinates=knee_angle_r axis=(1 0 0) LinearFunction(coefficients=1 0)
        TransformAxis rotation2: coordinates=knee_angle_r axis=(0 0 1)
          SimmSpline: x=(0 0.174533 0.349066 0.523599 0.698132 0.872665 1.0472 1.22173 1.39626 1.5708 1.74533 1.91986 2.0944)
              y=(0 0.0126809 0.0226969 0.0296054 0.0332049 0.0335354 0.0308779 0.0257548 0.0189295 0.011407 0.00443314 -0.00050475 -0.0016782)
        TransformAxis rotation3: coordinates=knee_angle_r axis=(0 1 0)
          SimmSpline: x=(0 0.174533 0.349066 0.523599 0.698132 0.872665 1.0472 1.22173 1.39626 1.5708 1.74533 1.91986 2.0944)
              y=(0 0.059461 0.109399 0.150618 0.18392 0.210107 0.229983 0.24435 0.254012 0.25977 0.262428 0.262788 0.261654)
        TransformAxis translation1: coordinates=knee_angle_r axis=(1 0 0)
          MultiplierFunction: scale=0.9418727
            SimmSpline: x=(0 0.174533 0.349066 0.523599 0.698132 0.872665 1.0472 1.22173 1.39626 1.5708 1.74533 1.91986 2.0944)
                y=(0 5.3e-5 0.000188 0.000378 0.000597 0.000825 0.001045 0.001247 0.00142 0.001558 0.001661 0.001728 0.00176)
        TransformAxis translation2: coordinates=knee_angle_r axis=(0 1 0)
          MultiplierFunction: scale=0.9418727
            SimmSpline: x=(0 0.174533 0.349066 0.523599 0.698132 0.872665 1.0472 1.22173 1.39626 1.5708 1.74533 1.91986 2.0944)
                y=(0 0.000301 0.000143 -0.000401 -0.001233 -0.002243 -0.003316 -0.004346 -0.005239 -0.005924 -0.006361 -0.006539 -0.00648)
        TransformAxis translation3: coordinates=knee_angle_r axis=(0 0 1)
          MultiplierFunction: scale=0.9418727
            SimmSpline: x=(0 0.174533 0.349066 0.523599 0.698132 0.872665 1.0472 1.22173 1.39626 1.5708 1.74533 1.91986 2.0944)
                y=(0 0.001055 0.002061 0.00289 0.003447 0.003676 0.003559 0.00311 0.002373 0.001418 0.000329 -0.000805 -0.001898)
    CustomJoint patellofemoral_r: socket_parent_frame=femur_r_offset socket_child_frame=patella_r_offset
      Coordinate knee_angle_r_beta: default_value=4.877666e-5 range=(-99999.9 99999.9) clamped=false
      PhysicalOffsetFrame femur_r_offset: socket_parent=/bodyset/femur_r
          translation=(-0.00761975 -0.3842464 -0.00259015)
      PhysicalOffsetFrame patella_r_offset: socket_parent=/bodyset/patella_r translation=(0 0 0)
      SpatialTransform: axes_held_at_zero=(rotation2 rotation3)
        TransformAxis rotation1: coordinates=knee_angle_r_beta axis=(0 0 1)
          SimmSpline: x=(0 0.174533 0.349066 0.523599 0.698132 0.872665 1.0472 1.22173 1.39626 1.5708 1.74533 1.91986 2.0944)
              y=(0.00113686 -0.00629212 -0.105582 -0.253683 -0.414245 -0.579047 -0.747244 -0.91799 -1.09044 -1.26379 -1.43763 -1.61186 -1.78634)
        TransformAxis translation1: coordinates=knee_angle_r_beta axis=(1 0 0)
          MultiplierFunction: scale=0.9418727
            SimmSpline: x=(0 0.174533 0.349066 0.523599 0.698132 0.872665 1.0472 1.22173 1.39626 1.5708 1.74533 1.91986 2.0944)
                y=(0.0524 0.0488 0.0437 0.0371 0.0296 0.0216 0.0136 0.0057 -0.0019 -0.0088 -0.0148 -0.0196 -0.0227)
        TransformAxis translation2: coordinates=knee_angle_r_beta axis=(0 1 0)
          MultiplierFunction: scale=0.9418727
            SimmSpline: x=(0 0.174533 0.349066 0.523599 0.698132 0.872665 1.0472 1.22173 1.39626 1.5708 1.74533 1.91986 2.0944)
                y=(-0.0108 -0.019 -0.0263 -0.0322 -0.0367 -0.0395 -0.0408 -0.0404 -0.0384 -0.0349 -0.0301 -0.0245 -0.0187)
        TransformAxis translation3: axis=(0 0 1) MultiplierFunction(scale=0.9418727, Constant(value=0.00275))
    CustomJoint walker_knee_l: socket_parent_frame=femur_l_offset socket_child_frame=tibia_l_offset
      Coordinate knee_angle_l: default_value=4.877992e-5 range=(0 2.53073) clamped=true
      PhysicalOffsetFrame femur_l_offset: socket_parent=/bodyset/femur_l
          translation=(-0.004335271 -0.394606 0.001685939) orientation=(1.64157 -1.44618 1.5708)
      PhysicalOffsetFrame tibia_l_offset: socket_parent=/bodyset/tibia_l
          translation=(-0.008121926 -0.003548951 0.001490684) orientation=(1.64157 -1.44618 1.5708)
      SpatialTransform:
        TransformAxis rotation1: coordinates=knee_angle_l axis=(-1 0 0) LinearFunction(coefficients=1 0)
        TransformAxis rotation2: coordinates=knee_angle_l axis=(0 0 1)
          SimmSpline: x=(0 0.174533 0.349066 0.523599 0.698132 0.872665 1.0472 1.22173 1.39626 1.5708 1.74533 1.91986 2.0944)
              y=(0 0.0126809 0.0226969 0.0296054 0.0332049 0.0335354 0.0308779 0.0257548 0.0189295 0.011407 0.00443314 -0.00050475 -0.0016782)
        TransformAxis rotation3: coordinates=knee_angle_l axis=(0 1 0)
          SimmSpline: x=(0 0.174533 0.349066 0.523599 0.698132 0.872665 1.0472 1.22173 1.39626 1.5708 1.74533 1.91986 2.0944)
              y=(0 -0.059461 -0.109399 -0.150618 -0.18392 -0.210107 -0.229983 -0.24435 -0.254012 -0.25977 -0.262428 -0.262788 -0.261654)
        TransformAxis translation1: coordinates=knee_angle_l axis=(1 0 0)
          MultiplierFunction: scale=0.9633935
            SimmSpline: x=(0 0.174533 0.349066 0.523599 0.698132 0.872665 1.0472 1.22173 1.39626 1.5708 1.74533 1.91986 2.0944)
                y=(0 5.3e-5 0.000188 0.000378 0.000597 0.000825 0.001045 0.001247 0.00142 0.001558 0.001661 0.001728 0.00176)
        TransformAxis translation2: coordinates=knee_angle_l axis=(0 1 0)
          MultiplierFunction: scale=0.9633935
            SimmSpline: x=(0 0.174533 0.349066 0.523599 0.698132 0.872665 1.0472 1.22173 1.39626 1.5708 1.74533 1.91986 2.0944)
                y=(0 0.000301 0.000143 -0.000401 -0.001233 -0.002243 -0.003316 -0.004346 -0.005239 -0.005924 -0.006361 -0.006539 -0.00648)
        TransformAxis translation3: coordinates=knee_angle_l axis=(0 0 1)
          MultiplierFunction: scale=0.9633935
            SimmSpline: x=(0 0.174533 0.349066 0.523599 0.698132 0.872665 1.0472 1.22173 1.39626 1.5708 1.74533 1.91986 2.0944)
                y=(0 -0.001055 -0.002061 -0.00289 -0.003447 -0.003676 -0.003559 -0.00311 -0.002373 -0.001418 -0.000329 0.000805 0.001898)
    CustomJoint patellofemoral_l: socket_parent_frame=femur_l_offset socket_child_frame=patella_l_offset
      Coordinate knee_angle_l_beta: default_value=4.877992e-5 range=(-99999.9 99999.9) clamped=false
      PhysicalOffsetFrame femur_l_offset: socket_parent=/bodyset/femur_l
          translation=(-0.007793853 -0.393026 0.002649332)
      PhysicalOffsetFrame patella_l_offset: socket_parent=/bodyset/patella_l translation=(0 0 0)
      SpatialTransform: axes_held_at_zero=(rotation2 rotation3)
        TransformAxis rotation1: coordinates=knee_angle_l_beta axis=(0 0 1)
          SimmSpline: x=(0 0.174533 0.349066 0.523599 0.698132 0.872665 1.0472 1.22173 1.39626 1.5708 1.74533 1.91986 2.0944)
              y=(0.00113686 -0.00629212 -0.105582 -0.253683 -0.414245 -0.579047 -0.747244 -0.91799 -1.09044 -1.26379 -1.43763 -1.61186 -1.78634)
        TransformAxis translation1: coordinates=knee_angle_l_beta axis=(1 0 0)
          MultiplierFunction: scale=0.9633935
            SimmSpline: x=(0 0.174533 0.349066 0.523599 0.698132 0.872665 1.0472 1.22173 1.39626 1.5708 1.74533 1.91986 2.0944)
                y=(0.0524 0.0488 0.0437 0.0371 0.0296 0.0216 0.0136 0.0057 -0.0019 -0.0088 -0.0148 -0.0196 -0.0227)
        TransformAxis translation2: coordinates=knee_angle_l_beta axis=(0 1 0)
          MultiplierFunction: scale=0.9633935
            SimmSpline: x=(0 0.174533 0.349066 0.523599 0.698132 0.872665 1.0472 1.22173 1.39626 1.5708 1.74533 1.91986 2.0944)
                y=(-0.0108 -0.019 -0.0263 -0.0322 -0.0367 -0.0395 -0.0408 -0.0404 -0.0384 -0.0349 -0.0301 -0.0245 -0.0187)
        TransformAxis translation3: axis=(0 0 1) MultiplierFunction(scale=0.9633935, Constant(value=-0.00275))
    CustomJoint acromial_r: socket_parent_frame=torso_offset socket_child_frame=humerus_r_offset
      Coordinate arm_flex_r: default_value=0 range=(-1.570796 3.14159) clamped=true
      Coordinate arm_add_r: default_value=0 range=(-2.094395 1.570796) clamped=true
      Coordinate arm_rot_r: default_value=0 range=(-1.570796 3.14159) clamped=true
      PhysicalOffsetFrame torso_offset: socket_parent=/bodyset/torso translation=(0.003764248 0.4432387 0.1645041)
      PhysicalOffsetFrame humerus_r_offset: socket_parent=/bodyset/humerus_r translation=(0 0 0)
      SpatialTransform: axes_held_at_zero=(translation1 translation2 translation3)
        TransformAxis rotation1: coordinates=arm_flex_r axis=(0 0 1) LinearFunction(coefficients=1 0)
        TransformAxis rotation2: coordinates=arm_add_r axis=(1 0 0) LinearFunction(coefficients=1 0)
        TransformAxis rotation3: coordinates=arm_rot_r axis=(0 1 0) LinearFunction(coefficients=1 0)
    PinJoint elbow_r: socket_parent_frame=humerus_r_offset socket_child_frame=ulna_r_offset
      Coordinate elbow_flex_r: default_value=0 range=(0 2.618) clamped=true
      PhysicalOffsetFrame humerus_r_offset: socket_parent=/bodyset/humerus_r translation=(0.013144 -0.286273 -0.009595)
          orientation=(-0.0228627 0.228018 0.0051689)
      PhysicalOffsetFrame ulna_r_offset: socket_parent=/bodyset/ulna_r translation=(0 0 0)
          orientation=(-0.0228627 0.228018 0.0051689)
    PinJoint radioulnar_r: socket_parent_frame=ulna_r_offset socket_child_frame=radius_r_offset
      Coordinate pro_sup_r: default_value=0 range=(0 1.570796) clamped=true
      PhysicalOffsetFrame ulna_r_offset: socket_parent=/bodyset/ulna_r translation=(-0.006727 -0.013007 0.026083)
          orientation=(-1.56884 0.056428 1.53614)
      PhysicalOffsetFrame radius_r_offset: socket_parent=/bodyset/radius_r translation=(0 0 0)
          orientation=(-1.56884 0.056428 1.53614)
    UniversalJoint radius_hand_r: socket_parent_frame=radius_r_offset socket_child_frame=hand_r_offset
      Coordinate wrist_flex_r: default_value=0 range=(-1.22173 1.22173) clamped=true locked=true
      Coordinate wrist_dev_r: default_value=0 range=(-0.4363323 0.6108652) clamped=true locked=true
      PhysicalOffsetFrame radius_r_offset: socket_parent=/bodyset/radius_r translation=(-0.008797 -0.235841 0.01361)
          orientation=(-1.5708 0 -1.5708)
      PhysicalOffsetFrame hand_r_offset: socket_parent=/bodyset/hand_r translation=(0 0 0)
          orientation=(-1.5708 0 -1.5708)
    CustomJoint acromial_l: socket_parent_frame=torso_offset socket_child_frame=humerus_l_offset
      Coordinate arm_flex_l: default_value=0 range=(-1.570796 3.14159) clamped=true
      Coordinate arm_add_l: default_value=0 range=(-2.094395 1.570796) clamped=true
      Coordinate arm_rot_l: default_value=0 range=(-1.570796 3.14159) clamped=true
      PhysicalOffsetFrame torso_offset: socket_parent=/bodyset/torso translation=(0.003764248 0.4432387 -0.1645041)
      PhysicalOffsetFrame humerus_l_offset: socket_parent=/bodyset/humerus_l translation=(0 0 0)
      SpatialTransform: axes_held_at_zero=(translation1 translation2 translation3)
        TransformAxis rotation1: coordinates=arm_flex_l axis=(0 0 1) LinearFunction(coefficients=1 0)
        TransformAxis rotation2: coordinates=arm_add_l axis=(-1 0 0) LinearFunction(coefficients=1 0)
        TransformAxis rotation3: coordinates=arm_rot_l axis=(0 -1 0) LinearFunction(coefficients=1 0)
    PinJoint elbow_l: socket_parent_frame=humerus_l_offset socket_child_frame=ulna_l_offset
      Coordinate elbow_flex_l: default_value=0 range=(0 2.618) clamped=true
      PhysicalOffsetFrame humerus_l_offset: socket_parent=/bodyset/humerus_l translation=(0.013144 -0.286273 0.009595)
          orientation=(0.0228627 -0.228018 0.0051689)
      PhysicalOffsetFrame ulna_l_offset: socket_parent=/bodyset/ulna_l translation=(0 0 0)
          orientation=(0.0228627 -0.228018 0.0051689)
    PinJoint radioulnar_l: socket_parent_frame=ulna_l_offset socket_child_frame=radius_l_offset
      Coordinate pro_sup_l: default_value=0 range=(0 1.570796) clamped=true
      PhysicalOffsetFrame ulna_l_offset: socket_parent=/bodyset/ulna_l translation=(-0.006727 -0.013007 -0.026083)
          orientation=(1.56884 -0.056428 1.53614)
      PhysicalOffsetFrame radius_l_offset: socket_parent=/bodyset/radius_l translation=(0 0 0)
          orientation=(1.56884 -0.056428 1.53614)
    UniversalJoint radius_hand_l: socket_parent_frame=radius_l_offset socket_child_frame=hand_l_offset
      Coordinate wrist_flex_l: default_value=0 range=(-1.22173 1.22173) clamped=true locked=true
      Coordinate wrist_dev_l: default_value=0 range=(-0.4363323 0.6108652) clamped=true locked=true
      PhysicalOffsetFrame radius_l_offset: socket_parent=/bodyset/radius_l translation=(-0.008797 -0.235841 -0.01361)
          orientation=(1.5708 0 1.5708)
      PhysicalOffsetFrame hand_l_offset: socket_parent=/bodyset/hand_l translation=(0 0 0)
          orientation=(1.5708 0 1.5708)
  ConstraintSet:
    WeldConstraint Lat_Cond_r_Constraint: socket_frame1=lat_cond_r_offset socket_frame2=/bodyset/tibial_plat_r
      PhysicalOffsetFrame lat_cond_r_offset: socket_parent=/bodyset/lat_cond_r translation=(0 0.035 -0.02)
    WeldConstraint Lat_Cond_l_Constraint: socket_frame1=lat_cond_l_offset socket_frame2=/bodyset/tibial_plat_l
      PhysicalOffsetFrame lat_cond_l_offset: socket_parent=/bodyset/lat_cond_l translation=(0 0.035 0.02)
    CoordinateCouplerConstraint: independent_coordinate_names=knee_angle_r
        dependent_coordinate_name=patella_r_constrained_knee_angle scale_factor=1
      coupled_coordinates_function: SimmSpline: x=(-2.0944 -1.45752 -0.526391 0 0.0523599 0.174533)
          y=(-2.0944 -1.45752 -0.526391 0 0.0523599 0.174533)
    CoordinateCouplerConstraint coordinatecouplerconstraint_0: independent_coordinate_names=knee_angle_l
        dependent_coordinate_name=patella_l_constrained_knee_angle scale_factor=1
      coupled_coordinates_function: SimmSpline: x=(-2.0944 -1.99997 -1.45752 -0.526391 0.0279253 0.174533)
          y=(-2.0944 -1.99997 -1.45752 -0.526391 0.0279253 0.174533)
  ForceSet:
    Millard2012EquilibriumMuscle [values shared by the 100 below unless stated]:
      ActiveForceLengthCurve: min_norm_active_fiber_length=0.25 transition_norm_fiber_length=0.77
          max_norm_active_fiber_length=1.9 shallow_ascending_slope=0.75 minimum_value=0
      ForceVelocityCurve: concentric_slope_at_vmax=0 concentric_slope_near_vmax=0.25 isometric_slope=5
          eccentric_slope_at_vmax=0 eccentric_slope_near_vmax=0.15 max_eccentric_velocity_force_multiplier=1.4
      TendonForceLengthCurve
    Millard2012EquilibriumMuscle addbrev_r: max_isometric_force=1877.459 optimal_fiber_length=0.1031
        tendon_slack_length=0.03545029 pennation_angle_at_optimal=0.1147809 fiber_damping=0.01 default_activation=0.01
        minimum_activation=0.01
      PathPoint P1: pelvis (-0.0191 -0.094 0.0154)
      PathPoint P2: femur_r (-0.002 -0.118 0.0249)
      PathWrap: wrap_object=AB_at_femshaft_r method=hybrid
      FiberForceLengthCurve: strain_at_zero_force=-0.1927643 strain_at_one_norm_force=0.5015522
          stiffness_at_low_force=0.2 stiffness_at_one_norm_force=2.880531 curviness=0.75
    Millard2012EquilibriumMuscle addlong_r: max_isometric_force=2750.4 optimal_fiber_length=0.1082
        tendon_slack_length=0.1317994 pennation_angle_at_optimal=0.1377704 fiber_damping=0.01 default_activation=0.01
        minimum_activation=0.01
      PathPoint P1: pelvis (-0.00758 -0.0889 0.01888)
      PathPoint P2: femur_r (0.01126 -0.23937 0.01583)
      PathWrap: wrap_object=AL_at_femshaft_r method=hybrid
      FiberForceLengthCurve: strain_at_zero_force=-0.1917374 strain_at_one_norm_force=0.5002995
          stiffness_at_low_force=0.2 stiffness_at_one_norm_force=2.890019 curviness=0.75
    Millard2012EquilibriumMuscle addmagDist_r: max_isometric_force=1791.885 optimal_fiber_length=0.1772
        tendon_slack_length=0.0873807 pennation_angle_at_optimal=0.194705 fiber_damping=0.01 default_activation=0.01
        minimum_activation=0.01
      PathPoint P1: pelvis (-0.07404 -0.12767 0.03982)
      PathPoint P2: femur_r (0.01125 -0.2625 0.0193)
      PathWrap: wrap_object=AMdist_at_femshaft_r method=hybrid
      FiberForceLengthCurve: strain_at_zero_force=-3.981963e-9 strain_at_one_norm_force=0.7 stiffness_at_low_force=0.2
          stiffness_at_one_norm_force=2.857143 curviness=0.75
    Millard2012EquilibriumMuscle addmagIsch_r: max_isometric_force=1791.885 optimal_fiber_length=0.1562
        tendon_slack_length=0.216343 pennation_angle_at_optimal=0.1680443 fiber_damping=0.01 default_activation=0.01
        minimum_activation=0.01
      PathPoint P1: pelvis (-0.08962 -0.12976 0.04171)
      PathPoint P2: femur_r (0.00481 -0.38797 -0.03273)
      PathWrap: wrap_object=AMisch_at_condyles_r method=hybrid
      FiberForceLengthCurve: strain_at_zero_force=0.007389956 strain_at_one_norm_force=0.7000392
          stiffness_at_low_force=0.2 stiffness_at_one_norm_force=2.887464 curviness=0.75
    Millard2012EquilibriumMuscle addmagMid_r: max_isometric_force=1791.885 optimal_fiber_length=0.1377
        tendon_slack_length=0.0466277 pennation_angle_at_optimal=0.2073076 fiber_damping=0.01 default_activation=0.01
        minimum_activation=0.01
      PathPoint P1: pelvis (-0.05266 -0.12075 0.02854)
      PathPoint P2: femur_r (0.00242 -0.1624 0.02922)
      PathWrap: wrap_object=AMmid_at_femshaft_r method=hybrid
      FiberForceLengthCurve: strain_at_zero_force=-3.981963e-9 strain_at_one_norm_force=0.7 stiffness_at_low_force=0.2
          stiffness_at_one_norm_force=2.857143 curviness=0.75
    Millard2012EquilibriumMuscle addmagProx_r: max_isometric_force=1791.885 optimal_fiber_length=0.1056
        tendon_slack_length=0.0403241 pennation_angle_at_optimal=0.3114833 fiber_damping=0.01 default_activation=0.01
        minimum_activation=0.01
      PathPoint P1: pelvis (-0.03098 -0.10755 0.01365)
      PathPoint P2: femur_r (-0.01527 -0.07886 0.03202)
      PathWrap: wrap_object=AMprox_at_femshaft_r method=hybrid
      FiberForceLengthCurve: strain_at_zero_force=-3.981963e-9 strain_at_one_norm_force=0.7 stiffness_at_low_force=0.2
          stiffness_at_one_norm_force=2.857143 curviness=0.75
    Millard2012EquilibriumMuscle bflh_r: max_isometric_force=3939.551 optimal_fiber_length=0.0976005
        tendon_slack_length=0.3252283 pennation_angle_at_optimal=0.1759182 fiber_damping=0.01 default_activation=0.01
        minimum_activation=0.01
      PathPoint P1: pelvis (-0.104 -0.1191 0.0586)
      PathPoint P2: tibia_r (-0.0337 -0.035 0.0253)
      PathPoint P3: tibia_r (-0.0287 -0.0455 0.0303)
      FiberForceLengthCurve: strain_at_zero_force=0.1965607 strain_at_one_norm_force=0.7068715
          stiffness_at_low_force=0.2 stiffness_at_one_norm_force=3.91918 curviness=0.75
    Millard2012EquilibriumMuscle bfsh_r: max_isometric_force=1671.344 optimal_fiber_length=0.1103007
        tendon_slack_length=0.1058179 pennation_angle_at_optimal=0.2642232 fiber_damping=0.01 default_activation=0.01
        minimum_activation=0.01
      PathPoint P1: femur_r (0.005 -0.2111 0.0234)
      PathPoint P2: tibia_r (-0.0301 -0.0419 0.0318)
      PathWrap: wrap_object=BF_at_gastroc_r method=hybrid
      FiberForceLengthCurve: strain_at_zero_force=0.115251 strain_at_one_norm_force=0.6888986
          stiffness_at_low_force=0.2 stiffness_at_one_norm_force=3.486462 curviness=0.75
    Millard2012EquilibriumMuscle edl_r: max_isometric_force=1810.494 optimal_fiber_length=0.0693
        tendon_slack_length=0.3688752 pennation_angle_at_optimal=0.2182582 fiber_damping=0.01 default_activation=0.01
        minimum_activation=0.01
      PathPoint P1: tibia_r (-0.016 -0.1157 0.0205)
      PathPoint P2: tibia_r (0.0164 -0.376 0.0112)
      PathPoint P3: calcn_r (0.0919 0.036 0.0008)
      PathPoint P4: calcn_r (0.1616 0.0055 0.013)
      PathPoint P5: toes_r (0.0003 0.0047 0.0153)
      PathPoint P6: toes_r (0.0443 -0.0004 0.025)
      FiberForceLengthCurve: strain_at_zero_force=0.1317998 strain_at_one_norm_force=0.7072192
          stiffness_at_low_force=0.2 stiffness_at_one_norm_force=3.475726 curviness=0.75
    Millard2012EquilibriumMuscle ehl_r: max_isometric_force=857.6026 optimal_fiber_length=0.0748
        tendon_slack_length=0.3267953 pennation_angle_at_optimal=0.1972681 fiber_damping=0.01 default_activation=0.01
        minimum_activation=0.01
      PathPoint P1: tibia_r (-0.014 -0.155 0.0189)
      PathPoint P2: tibia_r (0.0071 -0.2909 0.0164)
      PathPoint P3: tibia_r (0.02 -0.3693 -0.0028)
      PathPoint P4: calcn_r (0.097 0.0389 -0.0211)
      PathPoint P5: calcn_r (0.1293 0.0309 -0.0257)
      PathPoint P6: calcn_r (0.1734 0.0139 -0.028)
      PathPoint P7: toes_r (0.0298 0.0041 -0.0245)
      PathPoint P8: toes_r (0.0563 0.0034 -0.0186)
      FiberForceLengthCurve: strain_at_zero_force=0.1051406 strain_at_one_norm_force=0.7178208
          stiffness_at_low_force=0.2 stiffness_at_one_norm_force=3.264346 curviness=0.75
    Millard2012EquilibriumMuscle fdl_r: max_isometric_force=1269.531 optimal_fiber_length=0.0446
        tendon_slack_length=0.3787729 pennation_angle_at_optimal=0.2248391 fiber_damping=0.01 default_activation=0.01
        minimum_activation=0.01
      PathPoint P1: tibia_r (-0.0023 -0.1832 -0.0018)
      PathPoint P2: tibia_r (-0.0176 -0.3645 -0.0124)
      PathPoint P3: calcn_r (0.0436 0.0315 -0.028)
      PathPoint P4: calcn_r (0.0708 0.0176 -0.0263)
      PathPoint P5: calcn_r (0.1658 -0.0081 0.0116)
      PathPoint P6: toes_r (-0.0019 -0.0078 0.0147)
      PathPoint P7: toes_r (0.0285 -0.0071 0.0215)
      PathPoint P8: toes_r (0.0441 -0.006 0.0242)
      FiberForceLengthCurve: strain_at_zero_force=-0.01205975 strain_at_one_norm_force=0.6997089
          stiffness_at_low_force=0.2 stiffness_at_one_norm_force=2.809902 curviness=0.75
    Millard2012EquilibriumMuscle fhl_r: max_isometric_force=2723.518 optimal_fiber_length=0.0527
        tendon_slack_length=0.3543397 pennation_angle_at_optimal=0.2580255 fiber_damping=0.01 default_activation=0.01
        minimum_activation=0.01
      PathPoint P1: tibia_r (-0.031 -0.2163 0.02)
      PathPoint P2: tibia_r (-0.0242 -0.3671 -0.0076)
      PathPoint P3: calcn_r (0.0374 0.0276 -0.0241)
      PathPoint P4: calcn_r (0.1038 0.0068 -0.0256)
      PathPoint P5: calcn_r (0.1726 -0.0053 -0.0269)
      PathPoint P6: toes_r (0.0155 -0.0064 -0.0265)
      PathPoint P7: toes_r (0.0562 -0.0102 -0.0181)
      FiberForceLengthCurve: strain_at_zero_force=0.01130745 strain_at_one_norm_force=0.7002505
          stiffness_at_low_force=0.2 stiffness_at_one_norm_force=2.902997 curviness=0.75
    Millard2012EquilibriumMuscle gaslat_r: max_isometric_force=4725.177 optimal_fiber_length=0.05880011
        tendon_slack_length=0.3760709 pennation_angle_at_optimal=0.2102268 fiber_damping=0.01 default_activation=0.01
        minimum_activation=0.01
      PathPoint P1: femur_r (-0.003 -0.3814 0.0277)
      PathPoint P2: calcn_r (0.0044 0.031 -0.0053)
      PathWrap: wrap_object=GasLat_at_shank_r method=hybrid
      PathWrap pathwrap_0: wrap_object=Gastroc_at_condyles_r method=hybrid
      FiberForceLengthCurve: strain_at_zero_force=-0.05983233 strain_at_one_norm_force=0.7435102
          stiffness_at_low_force=0.2 stiffness_at_one_norm_force=2.489598 curviness=0.75
    Millard2012EquilibriumMuscle gasmed_r: max_isometric_force=9346.544 optimal_fiber_length=0.051
        tendon_slack_length=0.3987163 pennation_angle_at_optimal=0.1656816 fiber_damping=0.01 default_activation=0.01
        minimum_activation=0.01
      PathPoint P1: femur_r (0.008 -0.3788 -0.0208)
      PathPoint P2: calcn_r (0.0044 0.031 -0.0053)
      PathWrap shank: wrap_object=GasMed_at_shank_r method=hybrid
      PathWrap condyles: wrap_object=Gastroc_at_condyles_r method=hybrid
      FiberForceLengthCurve: strain_at_zero_force=0.1998358 strain_at_one_norm_force=0.7902371
          stiffness_at_low_force=0.2 stiffness_at_one_norm_force=3.387526 curviness=0.75
    Millard2012EquilibriumMuscle glmax1_r: max_isometric_force=2951.351 optimal_fiber_length=0.147
        tendon_slack_length=0.04884089 pennation_angle_at_optimal=0.3540118 fiber_damping=0.01 default_activation=0.01
        minimum_activation=0.01
      PathPoint P1: pelvis (-0.1231 0.0345 0.0563)
      PathPoint P2: pelvis (-0.1257 -0.0242 0.0779)
      PathPoint P3: femur_r (-0.0444 -0.0326 0.0302)
      PathPoint P4: femur_r (-0.0277 -0.0566 0.047)
      PathWrap: wrap_object=Gmax1_at_pelvis_r method=hybrid
      FiberForceLengthCurve: strain_at_zero_force=-0.07534176 strain_at_one_norm_force=0.8468075
          stiffness_at_low_force=0.2 stiffness_at_one_norm_force=2.168846 curviness=0.75
    Millard2012EquilibriumMuscle glmax2_r: max_isometric_force=4218.138 optimal_fiber_length=0.157
        tendon_slack_length=0.06788715 pennation_angle_at_optimal=0.3673821 fiber_damping=0.01 default_activation=0.01
        minimum_activation=0.01
      PathPoint P1: pelvis (-0.1317 0.0087 0.0462)
      PathPoint P2: pelvis (-0.1344 -0.0609 0.0813)
      PathPoint P3: femur_r (-0.045 -0.0584 0.0252)
      PathPoint P4: femur_r (-0.0156 -0.1016 0.0419)
      PathWrap: wrap_object=Gmax2_at_pelvis_r method=hybrid
      FiberForceLengthCurve: strain_at_zero_force=0.199275 strain_at_one_norm_force=0.7164175
          stiffness_at_low_force=0.2 stiffness_at_one_norm_force=3.867406 curviness=0.75
    Millard2012EquilibriumMuscle glmax3_r: max_isometric_force=2843.262 optimal_fiber_length=0.167
        tendon_slack_length=0.06971661 pennation_angle_at_optimal=0.3824161 fiber_damping=0.01 default_activation=0.01
        minimum_activation=0.01
      PathPoint P1: pelvis (-0.13 -0.0525 0.009)
      PathPoint P2: pelvis (-0.1273 -0.1263 0.0435)
      PathPoint P3: femur_r (-0.0281 -0.1125 0.0094)
      PathPoint P4: femur_r (-0.006 -0.1419 0.0411)
      PathWrap: wrap_object=Gmax3_at_pelvis_r method=hybrid
      FiberForceLengthCurve: strain_at_zero_force=0.1989714 strain_at_one_norm_force=0.7121937
          stiffness_at_low_force=0.2 stiffness_at_one_norm_force=3.896947 curviness=0.75
    Millard2012EquilibriumMuscle glmed1_r: max_isometric_force=3280.4 optimal_fiber_length=0.07663067
        tendon_slack_length=0.05859289 pennation_angle_at_optimal=0.3165559 fiber_damping=0.01 default_activation=0.01
        minimum_activation=0.01
      PathPoint P1: pelvis (-0.04913741 0.02615326 0.1152884)
      PathPoint P2: femur_r (-0.01389175 -0.01829471 0.05918962)
      FiberForceLengthCurve: strain_at_zero_force=-3.729382e-9 strain_at_one_norm_force=0.7 stiffness_at_low_force=0.2
          stiffness_at_one_norm_force=2.857143 curviness=0.75
    Millard2012EquilibriumMuscle glmed2_r: max_isometric_force=2295.275 optimal_fiber_length=0.08435829
        tendon_slack_length=0.07540107 pennation_angle_at_optimal=0.3165559 fiber_damping=0.01 default_activation=0.01
        minimum_activation=0.01
      PathPoint P1: pelvis (-0.08472733 0.05463392 0.08198352)
      PathPoint P2: femur_r (-0.02203601 -0.009959097 0.05612622)
      FiberForceLengthCurve: strain_at_zero_force=0.06397124 strain_at_one_norm_force=0.7014005
          stiffness_at_low_force=0.2 stiffness_at_one_norm_force=3.137603 curviness=0.75
    Millard2012EquilibriumMuscle glmed3_r: max_isometric_force=2613.598 optimal_fiber_length=0.07803259
        tendon_slack_length=0.04835118 pennation_angle_at_optimal=0.3165559 fiber_damping=0.01 default_activation=0.01
        minimum_activation=0.01
      PathPoint P1: pelvis (-0.0998658 0.01555939 0.06390163)
      PathPoint P2: femur_r (-0.0309 -0.0047 0.0518)
      FiberForceLengthCurve: strain_at_zero_force=0.1252157 strain_at_one_norm_force=0.7030514
          stiffness_at_low_force=0.2 stiffness_at_one_norm_force=3.461191 curviness=0.75
    Millard2012EquilibriumMuscle glmin1_r: max_isometric_force=1122.138 optimal_fiber_length=0.08143895
        tendon_slack_length=0.01932712 pennation_angle_at_optimal=0.1745329 fiber_damping=0.01 default_activation=0.01
        minimum_activation=0.01
      PathPoint P1: pelvis (-0.02957953 -0.0001082166 0.1184545)
      PathPoint P2: femur_r (0.005489319 -0.0154886 0.0560378)
      FiberForceLengthCurve: strain_at_zero_force=-3.729382e-9 strain_at_one_norm_force=0.7 stiffness_at_low_force=0.2
          stiffness_at_one_norm_force=2.857143 curviness=0.75
    Millard2012EquilibriumMuscle glmin2_r: max_isometric_force=1184.459 optimal_fiber_length=0.0687362
        tendon_slack_length=0.03203482 pennation_angle_at_optimal=0 fiber_damping=0.01 default_activation=0.01
        minimum_activation=0.01
      PathPoint P1: pelvis (-0.0616 0.01000027 0.1011453)
      PathPoint P2: femur_r (0.003543541 -0.009012269 0.05246433)
      FiberForceLengthCurve: strain_at_zero_force=0.003039474 strain_at_one_norm_force=0.7000285
          stiffness_at_low_force=0.2 stiffness_at_one_norm_force=2.869486 curviness=0.75
    Millard2012EquilibriumMuscle glmin3_r: max_isometric_force=1340.321 optimal_fiber_length=0.0353855
        tendon_slack_length=0.04737233 pennation_angle_at_optimal=0.01745329 fiber_damping=0.01 default_activation=0.01
        minimum_activation=0.01
      PathPoint P1: pelvis (-0.0789 -0.0155 0.0798)
      PathPoint P2: femur_r (-0.003576137 -0.001266701 0.05126165)
      FiberForceLengthCurve: strain_at_zero_force=0.007461173 strain_at_one_norm_force=0.7002322
          stiffness_at_low_force=0.2 stiffness_at_one_norm_force=2.886957 curviness=0.75
    Millard2012EquilibriumMuscle grac_r: max_isometric_force=843.9344 optimal_fiber_length=0.2278008
        tendon_slack_length=0.1720144 pennation_angle_at_optimal=0.1720016 fiber_damping=0.01 default_activation=0.01
        minimum_activation=0.01
      PathPoint P1: pelvis (-0.04736 -0.12932 0.02456)
      PathPoint P2: tibia_r (-0.01842 -0.04755 -0.02961)
      PathPoint P3: tibia_r (0.00178 -0.06962 -0.01573)
      PathWrap: wrap_object=GR_at_condyles_r method=hybrid
      FiberForceLengthCurve: strain_at_zero_force=-0.1969779 strain_at_one_norm_force=0.8027483
          stiffness_at_low_force=0.2 stiffness_at_one_norm_force=2.000548 curviness=0.75
    Millard2012EquilibriumMuscle iliacus_r: max_isometric_force=3063.423 optimal_fiber_length=0.1066
        tendon_slack_length=0.09612071 pennation_angle_at_optimal=0.279914 fiber_damping=0.01 default_activation=0.01
        minimum_activation=0.01
      PathPoint P1: pelvis (-0.0605 0.0309 0.0843)
      PathPoint P2: pelvis (-0.0135 -0.0557 0.0756)
      PathPoint P3: femur_r (-0.0023 -0.0565 0.0139)
      PathPoint P4: femur_r (-0.0122 -0.0637 0.0196)
      PathWrap: wrap_object=IL_at_brim_r method=hybrid range=(2 3)
      FiberForceLengthCurve: strain_at_zero_force=-0.1703103 strain_at_one_norm_force=0.5005449
          stiffness_at_low_force=0.2 stiffness_at_one_norm_force=2.98127 curviness=0.75
    Millard2012EquilibriumMuscle perbrev_r: max_isometric_force=1563.605 optimal_fiber_length=0.0454
        tendon_slack_length=0.1475275 pennation_angle_at_optimal=0.2052361 fiber_damping=0.01 default_activation=0.01
        minimum_activation=0.01
      PathPoint P1: tibia_r (-0.0243 -0.2532 0.0251)
      PathPoint P2: tibia_r (-0.0339 -0.3893 0.0249)
      PathPoint P3: tibia_r (-0.0285 -0.4004 0.0255)
      PathPoint P4: calcn_r (0.0471 0.027 0.0233)
      PathPoint P5: calcn_r (0.0677 0.0219 0.0343)
      FiberForceLengthCurve: strain_at_zero_force=-0.04234068 strain_at_one_norm_force=0.6987541
          stiffness_at_low_force=0.2 stiffness_at_one_norm_force=2.69871 curviness=0.75
    Millard2012EquilibriumMuscle perlong_r: max_isometric_force=3346.114 optimal_fiber_length=0.0508
        tendon_slack_length=0.3322208 pennation_angle_at_optimal=0.2479525 fiber_damping=0.01 default_activation=0.01
        minimum_activation=0.01
      PathPoint P1: tibia_r (-0.02 -0.1373 0.0282)
      PathPoint P2: tibia_r (-0.0317 -0.39 0.0237)
      PathPoint P3: tibia_r (-0.0272 -0.4014 0.024)
      PathPoint P4: calcn_r (0.0438 0.023 0.0221)
      PathPoint P5: calcn_r (0.0681 0.0106 0.0284)
      PathPoint P6: calcn_r (0.0852 0.0069 0.0118)
      PathPoint P7: calcn_r (0.1203 0.0085 -0.0184)
      FiberForceLengthCurve: strain_at_zero_force=-0.1323481 strain_at_one_norm_force=0.6924185
          stiffness_at_low_force=0.2 stiffness_at_one_norm_force=2.424929 curviness=0.75
    Millard2012EquilibriumMuscle piri_r: max_isometric_force=3089.361 optimal_fiber_length=0.026
        tendon_slack_length=0.1149062 pennation_angle_at_optimal=0.1745329 fiber_damping=0.01 default_activation=0.01
        minimum_activation=0.01
      PathPoint P1: pelvis (-0.10181 -0.00653 0.01351)
      PathPoint P2: pelvis (-0.10202 -0.03066 0.06092)
      PathPoint P3: femur_r (-0.0148 -0.0036 0.0437)
      FiberForceLengthCurve: strain_at_zero_force=0.09922992 strain_at_one_norm_force=0.7028348
          stiffness_at_low_force=0.2 stiffness_at_one_norm_force=3.313426 curviness=0.75
    Millard2012EquilibriumMuscle psoas_r: max_isometric_force=4280.37 optimal_fiber_length=0.1169
        tendon_slack_length=0.09954317 pennation_angle_at_optimal=0.2155251 fiber_damping=0.01 default_activation=0.01
        minimum_activation=0.01
      PathPoint P1: pelvis (-0.0606 0.062 0.039)
      PathPoint P2: pelvis (-0.0205 -0.0654 0.0656)
      PathPoint P3: femur_r (-0.0132 -0.0467 0.0046)
      PathPoint P4: femur_r (-0.0235 -0.0524 0.0088)
      PathWrap: wrap_object=PS_at_brim_r method=hybrid range=(2 3)
      FiberForceLengthCurve: strain_at_zero_force=-0.09543841 strain_at_one_norm_force=0.5010382
          stiffness_at_low_force=0.2 stiffness_at_one_norm_force=3.353023 curviness=0.75
    Millard2012EquilibriumMuscle recfem_r: max_isometric_force=6575.223 optimal_fiber_length=0.07589949
        tendon_slack_length=0.4484905 pennation_angle_at_optimal=0.2170149 fiber_damping=0.01 default_activation=0.01
        minimum_activation=0.01
      PathPoint P1: pelvis (-0.024 -0.0388 0.0933)
      PathPoint P2: patella_r (0.01 0.049 0.0007)
      PathPoint P3: patella_r (0.0121 0.0437 -0.001)
      PathPoint P4: patella_r (0.005 0.00247 3e-5)
      PathPoint P5: tibia_r (0.0326 -0.06312 -0.00047)
      PathWrap: wrap_object=KnExt_at_fem_r method=hybrid
      FiberForceLengthCurve: strain_at_zero_force=0.1999726 strain_at_one_norm_force=0.8999622
          stiffness_at_low_force=0.2 stiffness_at_one_norm_force=2.857186 curviness=0.75
    Millard2012EquilibriumMuscle sart_r: max_isometric_force=748.2393 optimal_fiber_length=0.4030006
        tendon_slack_length=0.124 pennation_angle_at_optimal=0.02613542 fiber_damping=0.01 default_activation=0.01
        minimum_activation=0.01
      PathPoint P1: pelvis (-0.0195 -0.0156 0.1056)
      PathPoint P2: femur_r (-0.003 -0.3568 -0.0421)
      PathPoint P3: tibia_r (-0.0251 -0.0401 -0.0365)
      PathPoint P4: tibia_r (-0.0159 -0.0599 -0.0264)
      PathPoint P5: tibia_r (0.0136 -0.081 -0.0026)
      FiberForceLengthCurve: strain_at_zero_force=-0.1984568 strain_at_one_norm_force=0.7212821
          stiffness_at_low_force=0.2 stiffness_at_one_norm_force=2.17453 curviness=0.75
    Millard2012EquilibriumMuscle semimem_r: max_isometric_force=6602.961 optimal_fiber_length=0.06900039
        tendon_slack_length=0.3475879 pennation_angle_at_optimal=0.2545615 fiber_damping=0.01 default_activation=0.01
        minimum_activation=0.01
      PathPoint P1: pelvis (-0.0987 -0.114 0.0614)
      PathPoint P2: tibia_r (-0.029 -0.0417 -0.0196)
      PathWrap: wrap_object=SM_at_condyles_r method=hybrid
      FiberForceLengthCurve: strain_at_zero_force=0.1994426 strain_at_one_norm_force=0.7353994
          stiffness_at_low_force=0.2 stiffness_at_one_norm_force=3.731644 curviness=0.75
    Millard2012EquilibriumMuscle semiten_r: max_isometric_force=1773.885 optimal_fiber_length=0.1930012
        tendon_slack_length=0.2472005 pennation_angle_at_optimal=0.241295 fiber_damping=0.01 default_activation=0.01
        minimum_activation=0.01
      PathPoint P1: pelvis (-0.1038 -0.1253 0.0515)
      PathPoint P2: tibia_r (-0.0312 -0.0508 -0.0229)
      PathPoint P3: tibia_r (0.0019 -0.0773 -0.0117)
      PathWrap: wrap_object=ST_at_condyles_r method=hybrid
      FiberForceLengthCurve: strain_at_zero_force=0.007279189 strain_at_one_norm_force=0.7803276
          stiffness_at_low_force=0.2 stiffness_at_one_norm_force=2.58716 curviness=0.75
    Millard2012EquilibriumMuscle soleus_r: max_isometric_force=18584.53 optimal_fiber_length=0.044
        tendon_slack_length=0.2767559 pennation_angle_at_optimal=0.3814289 fiber_damping=0.01 default_activation=0.01
        minimum_activation=0.01
      PathPoint P1: tibia_r (-0.0076 -0.0916 0.0098)
      PathPoint P2: calcn_r (0.0044 0.031 -0.0053)
      FiberForceLengthCurve: strain_at_zero_force=0.1569032 strain_at_one_norm_force=0.8506533
          stiffness_at_low_force=0.2 stiffness_at_one_norm_force=2.882882 curviness=0.75
    Millard2012EquilibriumMuscle tfl_r: max_isometric_force=1233.62 optimal_fiber_length=0.09313662
        tendon_slack_length=0.4406804 pennation_angle_at_optimal=0.05235988 fiber_damping=0.01 default_activation=0.01
        minimum_activation=0.01
      PathPoint P1: pelvis (-0.02033979 0.01085135 0.1292975)
      PathPoint P2: femur_r (0.0294 -0.0995 0.0597)
      PathPoint P3: femur_r (0.0107 -0.405 0.0324)
      PathPoint P4: tibia_r (0.0108 -0.041 0.0346)
      FiberForceLengthCurve: strain_at_zero_force=0.07118385 strain_at_one_norm_force=0.7197196
          stiffness_at_low_force=0.2 stiffness_at_one_norm_force=3.08387 curviness=0.75
    Millard2012EquilibriumMuscle tibant_r: max_isometric_force=3682.357 optimal_fiber_length=0.0683
        tendon_slack_length=0.240461 pennation_angle_at_optimal=0.1951828 fiber_damping=0.01 default_activation=0.01
        minimum_activation=0.01
      PathPoint P1: tibia_r (0.0154 -0.1312 0.0162)
      PathPoint P2: tibia_r (0.0251 -0.1906 0.0128)
      PathPoint P3: tibia_r (0.0233 -0.3659 -0.0132)
      PathPoint P4: calcn_r (0.1166 0.0178 -0.0305)
      FiberForceLengthCurve: strain_at_zero_force=0.1892237 strain_at_one_norm_force=0.7076768
          stiffness_at_low_force=0.2 stiffness_at_one_norm_force=3.85763 curviness=0.75
    Millard2012EquilibriumMuscle tibpost_r: max_isometric_force=5190.462 optimal_fiber_length=0.0378
        tendon_slack_length=0.2807796 pennation_angle_at_optimal=0.2264891 fiber_damping=0.01 default_activation=0.01
        minimum_activation=0.01
      PathPoint P1: tibia_r (-0.0041 -0.1304 0.0103)
      PathPoint P2: tibia_r (-0.0164 -0.3655 -0.0175)
      PathPoint P3: calcn_r (0.0417 0.0334 -0.0286)
      PathPoint P4: calcn_r (0.0772 0.0159 -0.0281)
      FiberForceLengthCurve: strain_at_zero_force=-0.1916705 strain_at_one_norm_force=0.6862359
          stiffness_at_low_force=0.2 stiffness_at_one_norm_force=2.278147 curviness=0.75
    Millard2012EquilibriumMuscle vasint_r: max_isometric_force=5092.082 optimal_fiber_length=0.09929882
        tendon_slack_length=0.2022083 pennation_angle_at_optimal=0.06309973 fiber_damping=0.01 default_activation=0.01
        minimum_activation=0.01
      PathPoint P1: femur_r (0.029 -0.1924 0.031)
      PathPoint P2: femur_r (0.0335 -0.2084 0.0285)
      PathPoint P3: patella_r (0.0058 0.048 -0.0006)
      PathPoint P4: patella_r (0.005 0.00247 -0.00039)
      PathPoint P5: tibia_r (0.03257 -0.0632 0.00043)
      PathWrap: wrap_object=KnExt_at_fem_r method=hybrid
      FiberForceLengthCurve: strain_at_zero_force=0.1999153 strain_at_one_norm_force=0.8514363
          stiffness_at_low_force=0.2 stiffness_at_one_norm_force=3.06974 curviness=0.75
    Millard2012EquilibriumMuscle vaslat_r: max_isometric_force=15446.3 optimal_fiber_length=0.09939901
        tendon_slack_length=0.2205991 pennation_angle_at_optimal=0.2528673 fiber_damping=0.01 default_activation=0.01
        minimum_activation=0.01
      PathPoint P1: femur_r (0.0048 -0.1854 0.0349)
      PathPoint P2: femur_r (0.0269 -0.2591 0.0409)
      PathPoint P3: patella_r (0.0103 0.0423 0.0141)
      PathPoint P4: patella_r (0.005 0.00247 0.00733)
      PathPoint P5: tibia_r (0.03254 -0.06338 0.00511)
      PathWrap: wrap_object=KnExt_at_fem_r method=hybrid
      FiberForceLengthCurve: strain_at_zero_force=0.1999632 strain_at_one_norm_force=0.8928189
          stiffness_at_low_force=0.2 stiffness_at_one_norm_force=2.886604 curviness=0.75
    Millard2012EquilibriumMuscle vasmed_r: max_isometric_force=8243.469 optimal_fiber_length=0.09679884
        tendon_slack_length=0.1999019 pennation_angle_at_optimal=0.4222225 fiber_damping=0.01 default_activation=0.01
        minimum_activation=0.01
      PathPoint P1: femur_r (0.014 -0.2099 0.0188)
      PathPoint P2: femur_r (0.0356 -0.2769 0.0009)
      PathPoint P3: patella_r (0.0063 0.0445 -0.017)
      PathPoint P4: patella_r (0.005 0.00247 -0.0085)
      PathPoint P5: tibia_r (0.0319 -0.06357 -0.00678)
      PathWrap: wrap_object=KnExt_at_fem_r method=hybrid
      FiberForceLengthCurve: strain_at_zero_force=0.1999354 strain_at_one_norm_force=0.8518332
          stiffness_at_low_force=0.2 stiffness_at_one_norm_force=3.067965 curviness=0.75
    Millard2012EquilibriumMuscle addbrev_l: max_isometric_force=1877.459 optimal_fiber_length=0.1031
        tendon_slack_length=0.03545029 pennation_angle_at_optimal=0.1147809 fiber_damping=0.01 default_activation=0.01
        minimum_activation=0.01
      PathPoint P1: pelvis (-0.0191 -0.094 -0.0154)
      PathPoint P2: femur_l (-0.002 -0.118 -0.0249)
      PathWrap: wrap_object=AB_at_femshaft_l method=hybrid
      FiberForceLengthCurve: strain_at_zero_force=-0.1927643 strain_at_one_norm_force=0.5015522
          stiffness_at_low_force=0.2 stiffness_at_one_norm_force=2.880531 curviness=0.75
    Millard2012EquilibriumMuscle addlong_l: max_isometric_force=2750.4 optimal_fiber_length=0.1082
        tendon_slack_length=0.1317994 pennation_angle_at_optimal=0.1377704 fiber_damping=0.01 default_activation=0.01
        minimum_activation=0.01
      PathPoint P1: pelvis (-0.00758 -0.0889 -0.01888)
      PathPoint P2: femur_l (0.01126 -0.23937 -0.01583)
      PathWrap: wrap_object=AL_at_femshaft_l method=hybrid
      FiberForceLengthCurve: strain_at_zero_force=-0.1917374 strain_at_one_norm_force=0.5002995
          stiffness_at_low_force=0.2 stiffness_at_one_norm_force=2.890019 curviness=0.75
    Millard2012EquilibriumMuscle addmagDist_l: max_isometric_force=1791.885 optimal_fiber_length=0.1772
        tendon_slack_length=0.0873807 pennation_angle_at_optimal=0.194705 fiber_damping=0.01 default_activation=0.01
        minimum_activation=0.01
      PathPoint P1: pelvis (-0.07404 -0.12767 -0.03982)
      PathPoint P2: femur_l (0.01125 -0.2625 -0.0193)
      PathWrap: wrap_object=AMdist_at_femshaft_l method=hybrid
      FiberForceLengthCurve: strain_at_zero_force=-3.981963e-9 strain_at_one_norm_force=0.7 stiffness_at_low_force=0.2
          stiffness_at_one_norm_force=2.857143 curviness=0.75
    Millard2012EquilibriumMuscle addmagIsch_l: max_isometric_force=1791.885 optimal_fiber_length=0.1562
        tendon_slack_length=0.216343 pennation_angle_at_optimal=0.1680443 fiber_damping=0.01 default_activation=0.01
        minimum_activation=0.01
      PathPoint P1: pelvis (-0.08962 -0.12976 -0.04171)
      PathPoint P2: femur_l (0.00481 -0.38797 0.03273)
      PathWrap: wrap_object=AMisch_at_condyles_l method=hybrid
      FiberForceLengthCurve: strain_at_zero_force=0.007389956 strain_at_one_norm_force=0.7000392
          stiffness_at_low_force=0.2 stiffness_at_one_norm_force=2.887464 curviness=0.75
    Millard2012EquilibriumMuscle addmagMid_l: max_isometric_force=1791.885 optimal_fiber_length=0.1377
        tendon_slack_length=0.0466277 pennation_angle_at_optimal=0.2073076 fiber_damping=0.01 default_activation=0.01
        minimum_activation=0.01
      PathPoint P1: pelvis (-0.05266 -0.12075 -0.02854)
      PathPoint P2: femur_l (0.00242 -0.1624 -0.02922)
      PathWrap: wrap_object=AMmid_at_femshaft_l method=hybrid
      FiberForceLengthCurve: strain_at_zero_force=-3.981963e-9 strain_at_one_norm_force=0.7 stiffness_at_low_force=0.2
          stiffness_at_one_norm_force=2.857143 curviness=0.75
    Millard2012EquilibriumMuscle addmagProx_l: max_isometric_force=1791.885 optimal_fiber_length=0.1056
        tendon_slack_length=0.0403241 pennation_angle_at_optimal=0.3114833 fiber_damping=0.01 default_activation=0.01
        minimum_activation=0.01
      PathPoint P1: pelvis (-0.03098 -0.10755 -0.01365)
      PathPoint P2: femur_l (-0.01527 -0.07886 -0.03202)
      PathWrap: wrap_object=AMprox_at_femshaft_l method=hybrid
      FiberForceLengthCurve: strain_at_zero_force=-3.981963e-9 strain_at_one_norm_force=0.7 stiffness_at_low_force=0.2
          stiffness_at_one_norm_force=2.857143 curviness=0.75
    Millard2012EquilibriumMuscle bflh_l: max_isometric_force=3939.551 optimal_fiber_length=0.09760034
        tendon_slack_length=0.3252278 pennation_angle_at_optimal=0.1759182 fiber_damping=0.01 default_activation=0.01
        minimum_activation=0.01
      PathPoint P1: pelvis (-0.104 -0.1191 -0.0586)
      PathPoint P2: tibia_l (-0.0337 -0.035 -0.0253)
      PathPoint P3: tibia_l (-0.0287 -0.0455 -0.0303)
      FiberForceLengthCurve: strain_at_zero_force=0.1965607 strain_at_one_norm_force=0.7068715
          stiffness_at_low_force=0.2 stiffness_at_one_norm_force=3.91918 curviness=0.75
    Millard2012EquilibriumMuscle bfsh_l: max_isometric_force=1671.344 optimal_fiber_length=0.1103005
        tendon_slack_length=0.1058177 pennation_angle_at_optimal=0.2642232 fiber_damping=0.01 default_activation=0.01
        minimum_activation=0.01
      PathPoint P1: femur_l (0.005 -0.2111 -0.0234)
      PathPoint P2: tibia_l (-0.0301 -0.0419 -0.0318)
      PathWrap: wrap_object=BF_at_gastroc_l method=hybrid
      FiberForceLengthCurve: strain_at_zero_force=0.115251 strain_at_one_norm_force=0.6888986
          stiffness_at_low_force=0.2 stiffness_at_one_norm_force=3.486462 curviness=0.75
    Millard2012EquilibriumMuscle edl_l: max_isometric_force=1810.494 optimal_fiber_length=0.0693
        tendon_slack_length=0.3688752 pennation_angle_at_optimal=0.2182582 fiber_damping=0.01 default_activation=0.01
        minimum_activation=0.01
      PathPoint P1: tibia_l (-0.016 -0.1157 -0.0205)
      PathPoint P2: tibia_l (0.0164 -0.376 -0.0112)
      PathPoint P3: calcn_l (0.0919 0.036 -0.0008)
      PathPoint P4: calcn_l (0.1616 0.0055 -0.013)
      PathPoint P5: toes_l (0.0003 0.0047 -0.0153)
      PathPoint P6: toes_l (0.0443 -0.0004 -0.025)
      FiberForceLengthCurve: strain_at_zero_force=0.1317998 strain_at_one_norm_force=0.7072192
          stiffness_at_low_force=0.2 stiffness_at_one_norm_force=3.475726 curviness=0.75
    Millard2012EquilibriumMuscle ehl_l: max_isometric_force=857.6026 optimal_fiber_length=0.0748
        tendon_slack_length=0.3267953 pennation_angle_at_optimal=0.1972681 fiber_damping=0.01 default_activation=0.01
        minimum_activation=0.01
      PathPoint P1: tibia_l (-0.014 -0.155 -0.0189)
      PathPoint P2: tibia_l (0.0071 -0.2909 -0.0164)
      PathPoint P3: tibia_l (0.02 -0.3693 0.0028)
      PathPoint P4: calcn_l (0.097 0.0389 0.0211)
      PathPoint P5: calcn_l (0.1293 0.0309 0.0257)
      PathPoint P6: calcn_l (0.1734 0.0139 0.028)
      PathPoint P7: toes_l (0.0298 0.0041 0.0245)
      PathPoint P8: toes_l (0.0563 0.0034 0.0186)
      FiberForceLengthCurve: strain_at_zero_force=0.1051406 strain_at_one_norm_force=0.7178208
          stiffness_at_low_force=0.2 stiffness_at_one_norm_force=3.264346 curviness=0.75
    Millard2012EquilibriumMuscle fdl_l: max_isometric_force=1269.531 optimal_fiber_length=0.0446
        tendon_slack_length=0.3787729 pennation_angle_at_optimal=0.2248391 fiber_damping=0.01 default_activation=0.01
        minimum_activation=0.01
      PathPoint P1: tibia_l (-0.0023 -0.1832 0.0018)
      PathPoint P2: tibia_l (-0.0176 -0.3645 0.0124)
      PathPoint P3: calcn_l (0.0436 0.0315 0.028)
      PathPoint P4: calcn_l (0.0708 0.0176 0.0263)
      PathPoint P5: calcn_l (0.1658 -0.0081 -0.0116)
      PathPoint P6: toes_l (-0.0019 -0.0078 -0.0147)
      PathPoint P7: toes_l (0.0285 -0.0071 -0.0215)
      PathPoint P8: toes_l (0.0441 -0.006 -0.0242)
      FiberForceLengthCurve: strain_at_zero_force=-0.01205975 strain_at_one_norm_force=0.6997089
          stiffness_at_low_force=0.2 stiffness_at_one_norm_force=2.809902 curviness=0.75
    Millard2012EquilibriumMuscle fhl_l: max_isometric_force=2723.518 optimal_fiber_length=0.0527
        tendon_slack_length=0.3543397 pennation_angle_at_optimal=0.2580255 fiber_damping=0.01 default_activation=0.01
        minimum_activation=0.01
      PathPoint P1: tibia_l (-0.031 -0.2163 -0.02)
      PathPoint P2: tibia_l (-0.0242 -0.3671 0.0076)
      PathPoint P3: calcn_l (0.0374 0.0276 0.0241)
      PathPoint P4: calcn_l (0.1038 0.0068 0.0256)
      PathPoint P5: calcn_l (0.1726 -0.0053 0.0269)
      PathPoint P6: toes_l (0.0155 -0.0064 0.0265)
      PathPoint P7: toes_l (0.0562 -0.0102 0.0181)
      FiberForceLengthCurve: strain_at_zero_force=0.01130745 strain_at_one_norm_force=0.7002505
          stiffness_at_low_force=0.2 stiffness_at_one_norm_force=2.902997 curviness=0.75
    Millard2012EquilibriumMuscle gaslat_l: max_isometric_force=4725.177 optimal_fiber_length=0.05880007
        tendon_slack_length=0.3760706 pennation_angle_at_optimal=0.2102268 fiber_damping=0.01 default_activation=0.01
        minimum_activation=0.01
      PathPoint P1: femur_l (-0.003 -0.3814 -0.0277)
      PathPoint P2: calcn_l (0.0044 0.031 0.0053)
      PathWrap: wrap_object=GasLat_at_shank_l method=hybrid
      PathWrap pathwrap_0: wrap_object=Gastroc_at_condyles_l method=hybrid
      FiberForceLengthCurve: strain_at_zero_force=-0.05983233 strain_at_one_norm_force=0.7435102
          stiffness_at_low_force=0.2 stiffness_at_one_norm_force=2.489598 curviness=0.75
    Millard2012EquilibriumMuscle gasmed_l: max_isometric_force=9346.544 optimal_fiber_length=0.051
        tendon_slack_length=0.3987163 pennation_angle_at_optimal=0.1656816 fiber_damping=0.01 default_activation=0.01
        minimum_activation=0.01
      PathPoint P1: femur_l (0.008 -0.3788 0.0208)
      PathPoint P2: calcn_l (0.0044 0.031 0.0053)
      PathWrap shank: wrap_object=GasMed_at_shank_l method=hybrid
      PathWrap condyles: wrap_object=Gastroc_at_condyles_l method=hybrid
      FiberForceLengthCurve: strain_at_zero_force=0.1998358 strain_at_one_norm_force=0.7902371
          stiffness_at_low_force=0.2 stiffness_at_one_norm_force=3.387526 curviness=0.75
    Millard2012EquilibriumMuscle glmax1_l: max_isometric_force=2951.351 optimal_fiber_length=0.147
        tendon_slack_length=0.04884089 pennation_angle_at_optimal=0.3540118 fiber_damping=0.01 default_activation=0.01
        minimum_activation=0.01
      PathPoint P1: pelvis (-0.1231 0.0345 -0.0563)
      PathPoint P2: pelvis (-0.1257 -0.0242 -0.0779)
      PathPoint P3: femur_l (-0.0444 -0.0326 -0.0302)
      PathPoint P4: femur_l (-0.0277 -0.0566 -0.047)
      PathWrap: wrap_object=Gmax1_at_pelvis_l method=hybrid
      FiberForceLengthCurve: strain_at_zero_force=-0.07534176 strain_at_one_norm_force=0.8468075
          stiffness_at_low_force=0.2 stiffness_at_one_norm_force=2.168846 curviness=0.75
    Millard2012EquilibriumMuscle glmax2_l: max_isometric_force=4218.138 optimal_fiber_length=0.157
        tendon_slack_length=0.06788715 pennation_angle_at_optimal=0.3673821 fiber_damping=0.01 default_activation=0.01
        minimum_activation=0.01
      PathPoint P1: pelvis (-0.1317 0.0087 -0.0462)
      PathPoint P2: pelvis (-0.1344 -0.0609 -0.0813)
      PathPoint P3: femur_l (-0.045 -0.0584 -0.0252)
      PathPoint P4: femur_l (-0.0156 -0.1016 -0.0419)
      PathWrap: wrap_object=Gmax2_at_pelvis_l method=hybrid
      FiberForceLengthCurve: strain_at_zero_force=0.199275 strain_at_one_norm_force=0.7164175
          stiffness_at_low_force=0.2 stiffness_at_one_norm_force=3.867406 curviness=0.75
    Millard2012EquilibriumMuscle glmax3_l: max_isometric_force=2843.262 optimal_fiber_length=0.167
        tendon_slack_length=0.06971661 pennation_angle_at_optimal=0.3824161 fiber_damping=0.01 default_activation=0.01
        minimum_activation=0.01
      PathPoint P1: pelvis (-0.13 -0.0525 -0.009)
      PathPoint P2: pelvis (-0.1273 -0.1263 -0.0435)
      PathPoint P3: femur_l (-0.0281 -0.1125 -0.0094)
      PathPoint P4: femur_l (-0.006 -0.1419 -0.0411)
      PathWrap: wrap_object=Gmax3_at_pelvis_l method=hybrid
      FiberForceLengthCurve: strain_at_zero_force=0.1989714 strain_at_one_norm_force=0.7121937
          stiffness_at_low_force=0.2 stiffness_at_one_norm_force=3.896947 curviness=0.75
    Millard2012EquilibriumMuscle glmed1_l: max_isometric_force=3280.4 optimal_fiber_length=0.07640202
        tendon_slack_length=0.05841807 pennation_angle_at_optimal=0.3165559 fiber_damping=0.01 default_activation=0.01
        minimum_activation=0.01
      PathPoint P1: pelvis (-0.049 0.026 -0.115)
      PathPoint P2: femur_l (-0.014 -0.018 -0.059)
      FiberForceLengthCurve: strain_at_zero_force=-3.729382e-9 strain_at_one_norm_force=0.7 stiffness_at_low_force=0.2
          stiffness_at_one_norm_force=2.857143 curviness=0.75
    Millard2012EquilibriumMuscle glmed2_l: max_isometric_force=2295.275 optimal_fiber_length=0.08455121
        tendon_slack_length=0.07557351 pennation_angle_at_optimal=0.3165559 fiber_damping=0.01 default_activation=0.01
        minimum_activation=0.01
      PathPoint P1: pelvis (-0.085 0.055 -0.082)
      PathPoint P2: femur_l (-0.022 -0.01 -0.056)
      FiberForceLengthCurve: strain_at_zero_force=0.06397124 strain_at_one_norm_force=0.7014005
          stiffness_at_low_force=0.2 stiffness_at_one_norm_force=3.137603 curviness=0.75
    Millard2012EquilibriumMuscle glmed3_l: max_isometric_force=2613.598 optimal_fiber_length=0.07824677
        tendon_slack_length=0.04848389 pennation_angle_at_optimal=0.3165559 fiber_damping=0.01 default_activation=0.01
        minimum_activation=0.01
      PathPoint P1: pelvis (-0.1 0.016 -0.064)
      PathPoint P2: femur_l (-0.0309 -0.0047 -0.0518)
      FiberForceLengthCurve: strain_at_zero_force=0.1252157 strain_at_one_norm_force=0.7030514
          stiffness_at_low_force=0.2 stiffness_at_one_norm_force=3.461191 curviness=0.75
    Millard2012EquilibriumMuscle glmin1_l: max_isometric_force=1122.138 optimal_fiber_length=0.08119896
        tendon_slack_length=0.01927016 pennation_angle_at_optimal=0.1745329 fiber_damping=0.01 default_activation=0.01
        minimum_activation=0.01
      PathPoint P1: pelvis (-0.03 0 -0.118)
      PathPoint P2: femur_l (0.005 -0.015 -0.056)
      FiberForceLengthCurve: strain_at_zero_force=-3.729382e-9 strain_at_one_norm_force=0.7 stiffness_at_low_force=0.2
          stiffness_at_one_norm_force=2.857143 curviness=0.75
    Millard2012EquilibriumMuscle glmin2_l: max_isometric_force=1184.459 optimal_fiber_length=0.06869564
        tendon_slack_length=0.03201591 pennation_angle_at_optimal=0 fiber_damping=0.01 default_activation=0.01
        minimum_activation=0.01
      PathPoint P1: pelvis (-0.0616 0.01 -0.101)
      PathPoint P2: femur_l (0.004 -0.009 -0.052)
      FiberForceLengthCurve: strain_at_zero_force=0.003039474 strain_at_one_norm_force=0.7000285
          stiffness_at_low_force=0.2 stiffness_at_one_norm_force=2.869486 curviness=0.75
    Millard2012EquilibriumMuscle glmin3_l: max_isometric_force=1340.321 optimal_fiber_length=0.03519014
        tendon_slack_length=0.0471108 pennation_angle_at_optimal=0.01745329 fiber_damping=0.01 default_activation=0.01
        minimum_activation=0.01
      PathPoint P1: pelvis (-0.0789 -0.0155 -0.0798)
      PathPoint P2: femur_l (-0.004 -0.001 -0.051)
      FiberForceLengthCurve: strain_at_zero_force=0.007461173 strain_at_one_norm_force=0.7002322
          stiffness_at_low_force=0.2 stiffness_at_one_norm_force=2.886957 curviness=0.75
    Millard2012EquilibriumMuscle grac_l: max_isometric_force=843.9344 optimal_fiber_length=0.2278006
        tendon_slack_length=0.1720142 pennation_angle_at_optimal=0.1720016 fiber_damping=0.01 default_activation=0.01
        minimum_activation=0.01
      PathPoint P1: pelvis (-0.04736 -0.12932 -0.02456)
      PathPoint P2: tibia_l (-0.01842 -0.04755 0.02961)
      PathPoint P3: tibia_l (0.00178 -0.06962 0.01573)
      PathWrap: wrap_object=GR_at_condyles_l method=hybrid
      FiberForceLengthCurve: strain_at_zero_force=-0.1969779 strain_at_one_norm_force=0.8027483
          stiffness_at_low_force=0.2 stiffness_at_one_norm_force=2.000548 curviness=0.75
    Millard2012EquilibriumMuscle iliacus_l: max_isometric_force=3063.423 optimal_fiber_length=0.1066
        tendon_slack_length=0.09612071 pennation_angle_at_optimal=0.279914 fiber_damping=0.01 default_activation=0.01
        minimum_activation=0.01
      PathPoint P1: pelvis (-0.0605 0.0309 -0.0843)
      PathPoint P2: pelvis (-0.0135 -0.0557 -0.0756)
      PathPoint P3: femur_l (-0.0023 -0.0565 -0.0139)
      PathPoint P4: femur_l (-0.0122 -0.0637 -0.0196)
      PathWrap: wrap_object=IL_at_brim_l method=hybrid range=(2 3)
      FiberForceLengthCurve: strain_at_zero_force=-0.1703103 strain_at_one_norm_force=0.5005449
          stiffness_at_low_force=0.2 stiffness_at_one_norm_force=2.98127 curviness=0.75
    Millard2012EquilibriumMuscle perbrev_l: max_isometric_force=1563.605 optimal_fiber_length=0.0454
        tendon_slack_length=0.1475275 pennation_angle_at_optimal=0.2052361 fiber_damping=0.01 default_activation=0.01
        minimum_activation=0.01
      PathPoint P1: tibia_l (-0.0243 -0.2532 -0.0251)
      PathPoint P2: tibia_l (-0.0339 -0.3893 -0.0249)
      PathPoint P3: tibia_l (-0.0285 -0.4004 -0.0255)
      PathPoint P4: calcn_l (0.0471 0.027 -0.0233)
      PathPoint P5: calcn_l (0.0677 0.0219 -0.0343)
      FiberForceLengthCurve: strain_at_zero_force=-0.04234068 strain_at_one_norm_force=0.6987541
          stiffness_at_low_force=0.2 stiffness_at_one_norm_force=2.69871 curviness=0.75
    Millard2012EquilibriumMuscle perlong_l: max_isometric_force=3346.114 optimal_fiber_length=0.0508
        tendon_slack_length=0.3322208 pennation_angle_at_optimal=0.2479525 fiber_damping=0.01 default_activation=0.01
        minimum_activation=0.01
      PathPoint P1: tibia_l (-0.02 -0.1373 -0.0282)
      PathPoint P2: tibia_l (-0.0317 -0.39 -0.0237)
      PathPoint P3: tibia_l (-0.0272 -0.4014 -0.024)
      PathPoint P4: calcn_l (0.0438 0.023 -0.0221)
      PathPoint P5: calcn_l (0.0681 0.0106 -0.0284)
      PathPoint P6: calcn_l (0.0852 0.0069 -0.0118)
      PathPoint P7: calcn_l (0.1203 0.0085 0.0184)
      FiberForceLengthCurve: strain_at_zero_force=-0.1323481 strain_at_one_norm_force=0.6924185
          stiffness_at_low_force=0.2 stiffness_at_one_norm_force=2.424929 curviness=0.75
    Millard2012EquilibriumMuscle piri_l: max_isometric_force=3089.361 optimal_fiber_length=0.026
        tendon_slack_length=0.1149062 pennation_angle_at_optimal=0.1745329 fiber_damping=0.01 default_activation=0.01
        minimum_activation=0.01
      PathPoint P1: pelvis (-0.10181 -0.00653 -0.01351)
      PathPoint P2: pelvis (-0.10202 -0.03066 -0.06092)
      PathPoint P3: femur_l (-0.0148 -0.0036 -0.0437)
      FiberForceLengthCurve: strain_at_zero_force=0.09922992 strain_at_one_norm_force=0.7028348
          stiffness_at_low_force=0.2 stiffness_at_one_norm_force=3.313426 curviness=0.75
    Millard2012EquilibriumMuscle psoas_l: max_isometric_force=4280.37 optimal_fiber_length=0.1169
        tendon_slack_length=0.09954317 pennation_angle_at_optimal=0.2155251 fiber_damping=0.01 default_activation=0.01
        minimum_activation=0.01
      PathPoint P1: pelvis (-0.0606 0.062 -0.039)
      PathPoint P2: pelvis (-0.0205 -0.0654 -0.0656)
      PathPoint P3: femur_l (-0.0132 -0.0467 -0.0046)
      PathPoint P4: femur_l (-0.0235 -0.0524 -0.0088)
      PathWrap: wrap_object=PS_at_brim_l method=hybrid range=(2 3)
      FiberForceLengthCurve: strain_at_zero_force=-0.09543841 strain_at_one_norm_force=0.5010382
          stiffness_at_low_force=0.2 stiffness_at_one_norm_force=3.353023 curviness=0.75
    Millard2012EquilibriumMuscle recfem_l: max_isometric_force=6575.223 optimal_fiber_length=0.07589965
        tendon_slack_length=0.4484915 pennation_angle_at_optimal=0.2170149 fiber_damping=0.01 default_activation=0.01
        minimum_activation=0.01
      PathPoint P1: pelvis (-0.024 -0.0388 -0.0933)
      PathPoint P2: patella_l (0.01 0.049 -0.0007)
      PathPoint P3: patella_l (0.0121 0.0437 0.001)
      PathPoint P4: patella_l (0.005 0.00247 -3e-5)
      PathPoint P5: tibia_l (0.0326 -0.06312 0.00047)
      PathWrap: wrap_object=KnExt_at_fem_l method=hybrid
      FiberForceLengthCurve: strain_at_zero_force=0.1999726 strain_at_one_norm_force=0.8999622
          stiffness_at_low_force=0.2 stiffness_at_one_norm_force=2.857186 curviness=0.75
    Millard2012EquilibriumMuscle sart_l: max_isometric_force=748.2393 optimal_fiber_length=0.4030004
        tendon_slack_length=0.1239999 pennation_angle_at_optimal=0.02613542 fiber_damping=0.01 default_activation=0.01
        minimum_activation=0.01
      PathPoint P1: pelvis (-0.0195 -0.0156 -0.1056)
      PathPoint P2: femur_l (-0.003 -0.3568 0.0421)
      PathPoint P3: tibia_l (-0.0251 -0.0401 0.0365)
      PathPoint P4: tibia_l (-0.0159 -0.0599 0.0264)
      PathPoint P5: tibia_l (0.0136 -0.081 0.0026)
      FiberForceLengthCurve: strain_at_zero_force=-0.1984568 strain_at_one_norm_force=0.7212821
          stiffness_at_low_force=0.2 stiffness_at_one_norm_force=2.17453 curviness=0.75
    Millard2012EquilibriumMuscle semimem_l: max_isometric_force=6602.961 optimal_fiber_length=0.06900027
        tendon_slack_length=0.3475873 pennation_angle_at_optimal=0.2545615 fiber_damping=0.01 default_activation=0.01
        minimum_activation=0.01
      PathPoint P1: pelvis (-0.0987 -0.114 -0.0614)
      PathPoint P2: tibia_l (-0.029 -0.0417 0.0196)
      PathWrap: wrap_object=SM_at_condyles_l method=hybrid
      FiberForceLengthCurve: strain_at_zero_force=0.1994426 strain_at_one_norm_force=0.7353994
          stiffness_at_low_force=0.2 stiffness_at_one_norm_force=3.731644 curviness=0.75
    Millard2012EquilibriumMuscle semiten_l: max_isometric_force=1773.885 optimal_fiber_length=0.1930008
        tendon_slack_length=0.2472 pennation_angle_at_optimal=0.241295 fiber_damping=0.01 default_activation=0.01
        minimum_activation=0.01
      PathPoint P1: pelvis (-0.1038 -0.1253 -0.0515)
      PathPoint P2: tibia_l (-0.0312 -0.0508 0.0229)
      PathPoint P3: tibia_l (0.0019 -0.0773 0.0117)
      PathWrap: wrap_object=ST_at_condyles_l method=hybrid
      FiberForceLengthCurve: strain_at_zero_force=0.007279189 strain_at_one_norm_force=0.7803276
          stiffness_at_low_force=0.2 stiffness_at_one_norm_force=2.58716 curviness=0.75
    Millard2012EquilibriumMuscle soleus_l: max_isometric_force=18584.53 optimal_fiber_length=0.044
        tendon_slack_length=0.2767559 pennation_angle_at_optimal=0.3814289 fiber_damping=0.01 default_activation=0.01
        minimum_activation=0.01
      PathPoint P1: tibia_l (-0.0076 -0.0916 -0.0098)
      PathPoint P2: calcn_l (0.0044 0.031 0.0053)
      FiberForceLengthCurve: strain_at_zero_force=0.1569032 strain_at_one_norm_force=0.8506533
          stiffness_at_low_force=0.2 stiffness_at_one_norm_force=2.882882 curviness=0.75
    Millard2012EquilibriumMuscle tfl_l: max_isometric_force=1233.62 optimal_fiber_length=0.09316665
        tendon_slack_length=0.4408225 pennation_angle_at_optimal=0.05235988 fiber_damping=0.01 default_activation=0.01
        minimum_activation=0.01
      PathPoint P1: pelvis (-0.02 0.011 -0.129)
      PathPoint P2: femur_l (0.0294 -0.0995 -0.0597)
      PathPoint P3: femur_l (0.0107 -0.405 -0.0324)
      PathPoint P4: tibia_l (0.0108 -0.041 -0.0346)
      FiberForceLengthCurve: strain_at_zero_force=0.07118385 strain_at_one_norm_force=0.7197196
          stiffness_at_low_force=0.2 stiffness_at_one_norm_force=3.08387 curviness=0.75
    Millard2012EquilibriumMuscle tibant_l: max_isometric_force=3682.357 optimal_fiber_length=0.0683
        tendon_slack_length=0.240461 pennation_angle_at_optimal=0.1951828 fiber_damping=0.01 default_activation=0.01
        minimum_activation=0.01
      PathPoint P1: tibia_l (0.0154 -0.1312 -0.0162)
      PathPoint P2: tibia_l (0.0251 -0.1906 -0.0128)
      PathPoint P3: tibia_l (0.0233 -0.3659 0.0132)
      PathPoint P4: calcn_l (0.1166 0.0178 0.0305)
      FiberForceLengthCurve: strain_at_zero_force=0.1892237 strain_at_one_norm_force=0.7076768
          stiffness_at_low_force=0.2 stiffness_at_one_norm_force=3.85763 curviness=0.75
    Millard2012EquilibriumMuscle tibpost_l: max_isometric_force=5190.462 optimal_fiber_length=0.0378
        tendon_slack_length=0.2807796 pennation_angle_at_optimal=0.2264891 fiber_damping=0.01 default_activation=0.01
        minimum_activation=0.01
      PathPoint P1: tibia_l (-0.0041 -0.1304 -0.0103)
      PathPoint P2: tibia_l (-0.0164 -0.3655 0.0175)
      PathPoint P3: calcn_l (0.0417 0.0334 0.0286)
      PathPoint P4: calcn_l (0.0772 0.0159 0.0281)
      FiberForceLengthCurve: strain_at_zero_force=-0.1916705 strain_at_one_norm_force=0.6862359
          stiffness_at_low_force=0.2 stiffness_at_one_norm_force=2.278147 curviness=0.75
    Millard2012EquilibriumMuscle vasint_l: max_isometric_force=5092.082 optimal_fiber_length=0.09929919
        tendon_slack_length=0.202209 pennation_angle_at_optimal=0.06309973 fiber_damping=0.01 default_activation=0.01
        minimum_activation=0.01
      PathPoint P1: femur_l (0.029 -0.1924 -0.031)
      PathPoint P2: femur_l (0.0335 -0.2084 -0.0285)
      PathPoint P3: patella_l (0.0058 0.048 0.0006)
      PathPoint P4: patella_l (0.005 0.00247 0.00039)
      PathPoint P5: tibia_l (0.03257 -0.0632 -0.00043)
      PathWrap: wrap_object=KnExt_at_fem_l method=hybrid
      FiberForceLengthCurve: strain_at_zero_force=0.1999153 strain_at_one_norm_force=0.8514363
          stiffness_at_low_force=0.2 stiffness_at_one_norm_force=3.06974 curviness=0.75
    Millard2012EquilibriumMuscle vaslat_l: max_isometric_force=15446.3 optimal_fiber_length=0.09939932
        tendon_slack_length=0.2205998 pennation_angle_at_optimal=0.2528673 fiber_damping=0.01 default_activation=0.01
        minimum_activation=0.01
      PathPoint P1: femur_l (0.0048 -0.1854 -0.0349)
      PathPoint P2: femur_l (0.0269 -0.2591 -0.0409)
      PathPoint P3: patella_l (0.0103 0.0423 -0.0141)
      PathPoint P4: patella_l (0.005 0.00247 -0.00733)
      PathPoint P5: tibia_l (0.03254 -0.06338 -0.00511)
      PathWrap: wrap_object=KnExt_at_fem_l method=hybrid
      FiberForceLengthCurve: strain_at_zero_force=0.1999632 strain_at_one_norm_force=0.8928189
          stiffness_at_low_force=0.2 stiffness_at_one_norm_force=2.886604 curviness=0.75
    Millard2012EquilibriumMuscle vasmed_l: max_isometric_force=8243.469 optimal_fiber_length=0.09679921
        tendon_slack_length=0.1999026 pennation_angle_at_optimal=0.4222225 fiber_damping=0.01 default_activation=0.01
        minimum_activation=0.01
      PathPoint P1: femur_l (0.014 -0.2099 -0.0188)
      PathPoint P2: femur_l (0.0356 -0.2769 -0.0009)
      PathPoint P3: patella_l (0.0063 0.0445 0.017)
      PathPoint P4: patella_l (0.005 0.00247 0.0085)
      PathPoint P5: tibia_l (0.0319 -0.06357 0.00678)
      PathWrap: wrap_object=KnExt_at_fem_l method=hybrid
      FiberForceLengthCurve: strain_at_zero_force=0.1999354 strain_at_one_norm_force=0.8518332
          stiffness_at_low_force=0.2 stiffness_at_one_norm_force=3.067965 curviness=0.75
    CoordinateActuator lumbar_ext: coordinate=lumbar_extension optimal_force=10
    CoordinateActuator lumbar_bend: coordinate=lumbar_bending optimal_force=10
    CoordinateActuator lumbar_rot: coordinate=lumbar_rotation optimal_force=10
    Millard2012EquilibriumMuscle quad_fem_r: optimal_force=1 max_isometric_force=416.25 optimal_fiber_length=0.0637
        tendon_slack_length=0.0091 pennation_angle_at_optimal=0.065 max_contraction_velocity=10
        activation_time_constant=0.01 deactivation_time_constant=0.04 minimum_activation=0.01
      PathPoint P1: pelvis (-0.1143 -0.1151 0.052)
      PathPoint P2: femur_r (-0.0381 -0.0359 0.0366)
      ActiveForceLengthCurve: minimum_value=0
      FiberForceLengthCurve
    Millard2012EquilibriumMuscle obt_internus1_r: optimal_force=1 max_isometric_force=172.233
        optimal_fiber_length=0.0877 tendon_slack_length=0.0495 pennation_angle_at_optimal=0.0436
        minimum_activation=0.01
      PathPoint obt_int_r-P1: pelvis (-0.04740879 -0.07059094 0.0411667)
      PathPoint obt_int_r-P2: femur_r (-0.036 -0.01 0.035)
      PathWrap: wrap_object=pelvisOITorus1_r method=hybrid
      PathWrap pathwrap_0: wrap_object=femHeadOISphere1_r method=hybrid
      ActiveForceLengthCurve: minimum_value=0
      FiberForceLengthCurve
    Millard2012EquilibriumMuscle obt_internus2_r: optimal_force=1 max_isometric_force=172.233
        optimal_fiber_length=0.0877 tendon_slack_length=0.0469 pennation_angle_at_optimal=0.0436
        minimum_activation=0.01
      PathPoint obt_int2_r-P1: pelvis (-0.04358845 -0.102801 0.0169339)
      PathPoint obt_int2_r-P2: femur_r (-0.0356 -0.0104 0.035)
      PathWrap: wrap_object=pelvisOITorus2_r method=hybrid
      PathWrap pathwrap_0: wrap_object=femHeadOISphere2_r method=hybrid
      ActiveForceLengthCurve: minimum_value=0
      FiberForceLengthCurve
    Millard2012EquilibriumMuscle obt_internus3_r: optimal_force=1 max_isometric_force=172.233
        optimal_fiber_length=0.0877 tendon_slack_length=0.0406 pennation_angle_at_optimal=0.0436
        minimum_activation=0.01
      PathPoint obt_int_r3-P1: pelvis (-0.08892614 -0.11 0.03055858)
      PathPoint obt_int_r3-P2: femur_r (-0.0356 -0.0104 0.035)
      PathWrap: wrap_object=pelvisOITorus3_r method=hybrid
      PathWrap pathwrap_0: wrap_object=femHeadOISphere3_r method=hybrid
      ActiveForceLengthCurve: minimum_value=0
      FiberForceLengthCurve
    Millard2012EquilibriumMuscle obt_externus1_r: optimal_force=1 max_isometric_force=371.52
        optimal_fiber_length=0.0804 tendon_slack_length=0.021 pennation_angle_at_optimal=0.079 minimum_activation=0.01
      PathPoint obt_ext_r-P1: pelvis (-0.03651545 -0.1031187 0.024808)
      PathPoint obt_ext_r-P2: femur_r (-0.03020025 -0.02017453 0.02907675)
      PathWrap: wrap_object=femHeadSphere_OE1_r method=hybrid
      ActiveForceLengthCurve: minimum_value=0
      FiberForceLengthCurve
    Millard2012EquilibriumMuscle obt_externus2_r: optimal_force=1 max_isometric_force=371.52
        optimal_fiber_length=0.0804 tendon_slack_length=0.015 pennation_angle_at_optimal=0.079 minimum_activation=0.01
      PathPoint obt_ext2_r-P1: pelvis (-0.06455122 -0.1217164 0.03932585)
      PathPoint obt_ext2_r-P2: femur_r (-0.03020025 -0.02017453 0.02907675)
      PathWrap: wrap_object=femHeadSphere_OE2_r method=hybrid
      ActiveForceLengthCurve: minimum_value=0
      FiberForceLengthCurve
    Millard2012EquilibriumMuscle obt_externus3_r: optimal_force=1 max_isometric_force=371.52
        optimal_fiber_length=0.0804 tendon_slack_length=0.0206 pennation_angle_at_optimal=0.079 minimum_activation=0.01
      PathPoint obt_ext3_r-P1: pelvis (-0.03263117 -0.08787715 0.04663426)
      PathPoint obt_ext3_r-P2: femur_r (-0.03020025 -0.02017453 0.02907675)
      PathWrap: wrap_object=femHeadSphere_OE3_r method=hybrid
      ActiveForceLengthCurve: minimum_value=0
      FiberForceLengthCurve
    Millard2012EquilibriumMuscle gemelli_sup_r: optimal_force=1 max_isometric_force=265.2 optimal_fiber_length=0.0485
        tendon_slack_length=0.00632 pennation_angle_at_optimal=0.0118 minimum_activation=0.01
      PathPoint gem_sup_r-P1: pelvis (-0.105 -0.064 0.054)
      PathPoint gem_sup_r-P2: femur_r (-0.036 -0.01 0.035)
      PathWrap pathwrap_0: wrap_object=GEMsup_at_Ischium_r method=hybrid
      ActiveForceLengthCurve: minimum_value=0
      FiberForceLengthCurve
    Millard2012EquilibriumMuscle gemelli_inf_r: optimal_force=1 max_isometric_force=265.2 optimal_fiber_length=0.0546
        tendon_slack_length=0.00669 pennation_angle_at_optimal=0.0087 minimum_activation=0.01
      PathPoint gem_inf_r-P1: pelvis (-0.1062094 -0.09384321 0.06366018)
      PathPoint gem_inf_r-P2: femur_r (-0.036 -0.01 0.035)
      PathWrap: wrap_object=femHeadGEMinfSphere_r method=hybrid
      ActiveForceLengthCurve: minimum_value=0
      FiberForceLengthCurve
    Millard2012EquilibriumMuscle pect_r: optimal_force=1 max_isometric_force=698.4 optimal_fiber_length=0.1038
        tendon_slack_length=0.0182 pennation_angle_at_optimal=0.002967 minimum_activation=0.01
      PathPoint P1: pelvis (-0.017 -0.09 0.034)
      PathPoint P1_0: femur_r (-0.01028188 -0.08132697 0.0228727)
      ActiveForceLengthCurve: minimum_value=0
      FiberForceLengthCurve
    Millard2012EquilibriumMuscle quad_fem_l: optimal_force=1 max_isometric_force=879.531 optimal_fiber_length=0.0637
        tendon_slack_length=0.0091 pennation_angle_at_optimal=0.065 max_contraction_velocity=10
        activation_time_constant=0.01 deactivation_time_constant=0.04 minimum_activation=0.01
      PathPoint P1: pelvis (-0.1143 -0.1151 -0.052)
      PathPoint P2: femur_l (-0.0381 -0.0359 -0.0366)
      ActiveForceLengthCurve: minimum_value=0
      FiberForceLengthCurve
    Millard2012EquilibriumMuscle obt_internus1_l: optimal_force=1 max_isometric_force=172.233
        optimal_fiber_length=0.0877 tendon_slack_length=0.0495 pennation_angle_at_optimal=0.0436
        minimum_activation=0.01
      PathPoint obt_int_l-P1: pelvis (-0.04740879 -0.07059094 -0.0411667)
      PathPoint obt_int_r-P2: femur_l (-0.036 -0.01 -0.035)
      PathWrap: wrap_object=pelvisOITorus1_l method=hybrid
      PathWrap pathwrap_0: wrap_object=femHeadOISphere1_l method=hybrid
      ActiveForceLengthCurve: minimum_value=0
      FiberForceLengthCurve
    Millard2012EquilibriumMuscle obt_internus2_l: optimal_force=1 max_isometric_force=172.233
        optimal_fiber_length=0.0877 tendon_slack_length=0.0469 pennation_angle_at_optimal=0.0436
        minimum_activation=0.01
      PathPoint obt_int2_l-P1: pelvis (-0.04358845 -0.102801 -0.0169339)
      PathPoint obt_int2_r-P2: femur_l (-0.0356 -0.0104 -0.035)
      PathWrap: wrap_object=pelvisOITorus2_l method=hybrid
      PathWrap pathwrap_0: wrap_object=femHeadOISphere2_l method=hybrid
      ActiveForceLengthCurve: minimum_value=0
      FiberForceLengthCurve
    Millard2012EquilibriumMuscle obt_internus3_l: optimal_force=1 max_isometric_force=172.233
        optimal_fiber_length=0.0877 tendon_slack_length=0.0406 pennation_angle_at_optimal=0.0436
        minimum_activation=0.01
      PathPoint obt_int_l3-P1: pelvis (-0.08892614 -0.11 -0.03055858)
      PathPoint obt_int_r3-P2: femur_l (-0.0356 -0.0104 -0.035)
      PathWrap: wrap_object=pelvisOITorus3_l method=hybrid
      PathWrap pathwrap_0: wrap_object=femHeadOISphere3_l method=hybrid
      ActiveForceLengthCurve: minimum_value=0
      FiberForceLengthCurve
    Millard2012EquilibriumMuscle obt_externus1_l: optimal_force=1 max_isometric_force=371.547
        optimal_fiber_length=0.0804 tendon_slack_length=0.021 pennation_angle_at_optimal=0.079 minimum_activation=0.01
      PathPoint obt_ext_l-P1: pelvis (-0.03651545 -0.1031187 -0.024808)
      PathPoint obt_ext_l-P2: femur_l (-0.03020025 -0.02017453 -0.02907675)
      PathWrap: wrap_object=femHeadSphere_OE1_l method=hybrid
      ActiveForceLengthCurve: minimum_value=0
      FiberForceLengthCurve
    Millard2012EquilibriumMuscle obt_externus2_l: optimal_force=1 max_isometric_force=371.547
        optimal_fiber_length=0.0804 tendon_slack_length=0.0149 pennation_angle_at_optimal=0.079 minimum_activation=0.01
      PathPoint obt_ext2_l-P1: pelvis (-0.06455122 -0.1217164 -0.03932585)
      PathPoint obt_ext2_r-P2: femur_l (-0.03020025 -0.02017453 -0.02907675)
      PathWrap: wrap_object=femHeadSphere_OE2_l method=hybrid
      ActiveForceLengthCurve: minimum_value=0
      FiberForceLengthCurve
    Millard2012EquilibriumMuscle obt_externus3_l: optimal_force=1 max_isometric_force=371.547
        optimal_fiber_length=0.0804 tendon_slack_length=0.0206 pennation_angle_at_optimal=0.079 minimum_activation=0.01
      PathPoint obt_ext3_l-P1: pelvis (-0.03263117 -0.08787715 -0.047)
      PathPoint obt_ext3_r-P2: femur_l (-0.03020025 -0.02017453 -0.02907675)
      PathWrap: wrap_object=femHeadSphere_OE3_l method=hybrid
      ActiveForceLengthCurve: minimum_value=0
      FiberForceLengthCurve
    Millard2012EquilibriumMuscle gemelli_sup_l: optimal_force=1 max_isometric_force=262.212 optimal_fiber_length=0.0485
        tendon_slack_length=0.00632 pennation_angle_at_optimal=0.0118 minimum_activation=0.01
      PathPoint gem_sup_l-P1: pelvis (-0.105 -0.064 -0.054)
      PathPoint gem_sup_l-P2: femur_l (-0.036 -0.01 -0.035)
      PathWrap pathwrap_0: wrap_object=GEMsup_at_Ischium_l method=hybrid
      ActiveForceLengthCurve: minimum_value=0
      FiberForceLengthCurve
    Millard2012EquilibriumMuscle gemelli_inf_l: optimal_force=1 max_isometric_force=262.212 optimal_fiber_length=0.0546
        tendon_slack_length=0.00669 pennation_angle_at_optimal=0.0087 minimum_activation=0.01
      PathPoint obt_int_l-P1: pelvis (-0.106 -0.094 -0.064)
      PathPoint obt_int_l-P2: femur_l (-0.036 -0.01 -0.035)
      PathWrap: wrap_object=femHeadGEMinfSphere_l method=hybrid
      ActiveForceLengthCurve: minimum_value=0
      FiberForceLengthCurve
    Millard2012EquilibriumMuscle pect_l: optimal_force=1 max_isometric_force=698.277 optimal_fiber_length=0.1038
        tendon_slack_length=0.0182 pennation_angle_at_optimal=0.002967 minimum_activation=0.01
      PathPoint P1: pelvis (-0.017 -0.09 -0.034)
      PathPoint P1_0: femur_l (-0.01028188 -0.08132697 -0.0228727)
      ActiveForceLengthCurve: minimum_value=0
      FiberForceLengthCurve
    ObjectGroup right_leg: members=(addbrev_r addlong_r addmagDist_r addmagIsch_r addmagMid_r addmagProx_r bflh_r bfsh_r edl_r ehl_r fdl_r fhl_r gaslat_r gasmed_r glmax1_r glmax2_r glmax3_r glmed1_r glmed2_r glmed3_r glmin1_r glmin2_r glmin3_r grac_r iliacus_r perbrev_r perlong_r piri_r psoas_r recfem_r sart_r semimem_r semiten_r soleus_r tfl_r tibant_r tibpost_r vasint_r vaslat_r vasmed_r)
    ObjectGroup left_leg: members=(addbrev_l addlong_l addmagDist_l addmagIsch_l addmagMid_l addmagProx_l bflh_l bfsh_l edl_l ehl_l fdl_l fhl_l gaslat_l gasmed_l glmax1_l glmax2_l glmax3_l glmed1_l glmed2_l glmed3_l glmin1_l glmin2_l glmin3_l grac_l iliacus_l perbrev_l perlong_l piri_l psoas_l recfem_l sart_l semimem_l semiten_l soleus_l tfl_l tibant_l tibpost_l vasint_l vaslat_l vasmed_l)
    ObjectGroup hip_add_r: members=(addbrev_r addlong_r addmagDist_r addmagIsch_r addmagMid_r addmagProx_r bflh_r grac_r semimem_r semiten_r)
    ObjectGroup hip_abd_r: members=(glmax1_r glmed1_r glmed2_r glmed3_r glmin1_r glmin2_r glmin3_r piri_r sart_r tfl_r)
    ObjectGroup hip_flex_r: members=(addbrev_r addlong_r glmin1_r grac_r iliacus_r psoas_r recfem_r sart_r tfl_r)
    ObjectGroup hip_ext_r: members=(addlong_r addmagDist_r addmagIsch_r addmagMid_r addmagProx_r bflh_r glmax1_r glmax2_r glmax3_r glmed1_r glmed2_r glmed3_r glmin3_r semimem_r semiten_r)
    ObjectGroup hip_inrot_r: members=(glmed1_r glmed2_r glmed3_r glmin1_r iliacus_r psoas_r tfl_r)
    ObjectGroup hip_exrot_r: members=(glmin3_r piri_r)
    ObjectGroup knee_flex_r: members=(bflh_r bfsh_r gaslat_r gasmed_r grac_r sart_r semimem_r semiten_r)
    ObjectGroup knee_ext_r: members=(recfem_r vasint_r vaslat_r vasmed_r)
    ObjectGroup ankle_df_r: members=(edl_r ehl_r tibant_r)
    ObjectGroup ankle_pf_r: members=(fdl_r fhl_r gaslat_r gasmed_r perbrev_r perlong_r soleus_r tibpost_r)
    ObjectGroup everter_r: members=(edl_r perbrev_r perlong_r)
    ObjectGroup inverter_r: members=(ehl_r fdl_r fhl_r tibant_r tibpost_r)
    ObjectGroup hip_add_l: members=(addbrev_l addlong_l addmagDist_l addmagIsch_l addmagMid_l addmagProx_l bflh_l grac_l semimem_l semiten_l)
    ObjectGroup hip_abd_l: members=(glmax1_l glmed1_l glmed2_l glmed3_l glmin1_l glmin2_l glmin3_l piri_l sart_l tfl_l)
    ObjectGroup hip_flex_l: members=(addbrev_l addlong_l glmin1_l grac_l iliacus_l psoas_l recfem_l sart_l tfl_l)
    ObjectGroup hip_ext_l: members=(addlong_l addmagDist_l addmagIsch_l addmagMid_l addmagProx_l bflh_l glmax1_l glmax2_l glmax3_l glmed1_l glmed2_l glmed3_l glmin3_l semimem_l semiten_l)
    ObjectGroup hip_exrot_l: members=(glmin3_l piri_l)
    ObjectGroup hip_inrot_l: members=(glmed1_l glmed2_l glmed3_l glmin1_l iliacus_l psoas_l tfl_l)
    ObjectGroup knee_flex_l: members=(bflh_l bfsh_l gaslat_l gasmed_l grac_l sart_l semimem_l semiten_l)
    ObjectGroup knee_ext_l: members=(recfem_l vasint_l vaslat_l vasmed_l)
    ObjectGroup ankle_df_l: members=(edl_l ehl_l tibant_l)
    ObjectGroup ankle_pf_l: members=(fdl_l fhl_l gaslat_l gasmed_l perbrev_l perlong_l soleus_l tibpost_l)
    ObjectGroup everter_l: members=(edl_l perbrev_l perlong_l)
    ObjectGroup inverter_l: members=(ehl_l fdl_l fhl_l tibant_l tibpost_l)
  MarkerSet:
    Marker RASI: pelvis (0.006437494 0.00524467 0.128)
    Marker SACROL: pelvis (-0.176009 0.0646429 0)
    Marker RTHOL: femur_r (0.018 -0.2 0.064)
    Marker RTH2: femur_r (0.021084 -0.242485 0.06)
    Marker RTH3: femur_r (-0.0116293 -0.243342 0.0625124)
    Marker RKNEL: femur_r (1.921503e-11 -0.3957605 0.05)
    Marker RKNEM: femur_r (1.417681e-11 -0.3979209 -0.05)
    Marker RSHAOL: tibia_r (0.00500574 -0.180004 0.0500002)
    Marker RSHA2: tibia_r (0.00443791 -0.232138 0.0500005)
    Marker RSHA3: tibia_r (-0.0296339 -0.232529 0.0565549)
    Marker RMALL: tibia_r (-0.005 -0.41 0.053)
    Marker RMALM: tibia_r (0.006 -0.3888 -0.038)
    Marker RHEE: calcn_r (-0.02 0.02 0)
    Marker RM5: calcn_r (0.1357823 0.01183907 0.0600055)
    Marker RTOE: calcn_r (0.1897302 0.02072521 -0.048888)
    Marker LTHOL: femur_l (0.018 -0.2 -0.064)
    Marker LTH2: femur_l (-0.01162931 -0.243342 -0.06251242)
    Marker LTH3: femur_l (0.02108399 -0.2424848 -0.06)
    Marker LHJCWK: femur_l (0 0 0) fixed=true
    Marker LKNEL: femur_l (1.9215e-11 -0.39576 -0.05)
    Marker LKNEM: femur_l (1.41768e-11 -0.397921 0.05)
    Marker LSHAOL: tibia_l (0.005005745 -0.1800041 -0.05000018)
    Marker LSHA2: tibia_l (-0.02963388 -0.2325293 -0.05655489)
    Marker LSHA3: tibia_l (0.004437908 -0.2321383 -0.05000053)
    Marker LMALL: tibia_l (-0.005 -0.41 -0.053)
    Marker LMALM: tibia_l (0.006 -0.3888 0.038)
    Marker LHEE: calcn_l (-0.02 0.02 0)
    Marker LM5: calcn_l (0.135782 0.0118391 -0.0600055)
    Marker LTOE: calcn_l (0.18973 0.0207252 0.048888)
    Marker RHJCWK: femur_r (0 0 0) fixed=true
    Marker LAJCWK: talus_l (0 0 0) fixed=true
    Marker RAJCWK: talus_r (0 0 0) fixed=true
    Marker LASI: pelvis (0.00643749 0.00524467 -0.128)
    Marker SACR2: pelvis (-0.1992715 0.01536895 0.03467559)
    Marker SACR3: pelvis (-0.2046079 0.0157629 0)
    Marker STRN: torso (0.08055624 0.33924 0)
    Marker XIPH: torso (0.1055154 0.2418046 0)
    Marker LPSI: pelvis (-0.1514852 0.01617428 -0.03799507)
    Marker RPSI: pelvis (-0.151485 0.0161743 0.0379951)
    Marker RFIB: tibia_r (-0.006806388 -0.07935324 0.06378708)
    Marker LFIB: tibia_l (-0.00680639 -0.0793532 -0.0637871)
    Marker BL: ground (0.11 -0.7437867 -0.9648039)
    Marker BR: ground (0.11 -0.743787 0.964804)
    Marker RKJCWK: tibia_r (-3.698603e-7 0.007404499 -1.186885e-8)
    Marker LKJCWK: tibia_l (-3.6986e-7 0.0074045 1.18689e-8)
