# OpenSim document version 40500
ScaleTool Catelli_high_hip_flexion_V4.0:
  mass: 94.5
  height: 1.6
  age: 33
  GenericModelMaker:
    model_file: c:\Git\1_current_projects\powerlifing_model\models\athlete_03\templates/Catelli-V4.0.osim
    marker_set_file: c:\Git\1_current_projects\powerlifing_model\models\athlete_03\templates/generic_skin_markers.xml
  ModelScaler:
    apply: true
    scaling_order: measurements
    marker_file: c:\Git\1_current_projects\powerlifing_model\models\athlete_03\motion_lab/static/static_01/task.trc
    time_range: 0 3.46
    preserve_mass_distribution: true
    output_model_file: c:\Git\1_current_projects\powerlifing_model\models\athlete_03\final_results\generic_scaled\scaled_model.osim
    output_scale_file: c:\Git\1_current_projects\powerlifing_model\models\athlete_03\final_results\generic_scaled\output_scale_file.txt
    MeasurementSet:
      Measurement pelvis width: apply=true
        MarkerPair: markers=(LASI RASI)
        MarkerPair: markers=(LPSI RPSI)
        BodyScale pelvis: axes=(X Z)
      Measurement pelvis height: apply=true
        MarkerPair: markers=(LASI LMKNE)
        MarkerPair: markers=(RASI RMKNE)
        BodyScale pelvis: axes=Y
      Measurement torso height: apply=true
        MarkerPair: markers=(PE01 C7)
        BodyScale torso: axes=(Y Z)
      Measurement torso depth: apply=true
        MarkerPair: markers=(T10 STRN)
        BodyScale torso: axes=X
      Measurement femur_r_length: apply=true
        MarkerPair: markers=(RASI RMKNE)
        MarkerPair: markers=(RGT RKNE)
        BodyScale femur_r: axes=(X Y Z)
        BodyScale patella_r: axes=(X Y Z)
      Measurement femur_l_length: apply=true
        MarkerPair: markers=(LASI LMKNE)
        MarkerPair: markers=(LGT LKNE)
        BodyScale femur_l: axes=(X Y Z)
        BodyScale patella_l: axes=(X Y Z)
      Measurement tibia_r_length: apply=true
        MarkerPair: markers=(RKNE RANK)
        MarkerPair: markers=(RMKNE RHEE)
        BodyScale tibia_r: axes=(X Y Z)
      Measurement tibia_l_length: apply=true
        MarkerPair: markers=(LKNE LANK)
        MarkerPair: markers=(LMKNE LHEE)
        BodyScale tibia_l: axes=(X Y Z)
      Measurement foot_horiz_l: apply=true
        MarkerPair: markers=(LHEE LTOE)
        BodyScale talus_l: axes=(X Z)
        BodyScale calcn_l: axes=(X Z)
        BodyScale toes_l: axes=(X Z)
      Measurement foot_horiz_r: apply=true
        MarkerPair: markers=(RHEE RTOE)
        BodyScale talus_r: axes=(X Z)
        BodyScale calcn_r: axes=(X Z)
        BodyScale toes_r: axes=(X Z)
      Measurement foot_vertic_l: apply=true
        MarkerPair: markers=(LHEE LANK)
        MarkerPair: markers=(LHEE LMMA)
        BodyScale talus_l: axes=Y
        BodyScale calcn_l: axes=Y
        BodyScale toes_l: axes=Y
      Measurement foot_vertic_r: apply=true
        MarkerPair: markers=(RHEE RANK)
        MarkerPair: markers=(RHEE RMMA)
        BodyScale talus_r: axes=Y
        BodyScale calcn_r: axes=Y
        BodyScale toes_r: axes=Y
  MarkerPlacer:
    apply: true
    marker_file: c:\Git\1_current_projects\powerlifing_model\models\athlete_03\motion_lab/static/static_01/task.trc
    time_range: 0 3.46
    output_model_file: c:\Git\1_current_projects\powerlifing_model\models\athlete_03\final_results\generic_scaled\scaled_model.osim
    max_marker_movement: -1
    IKTaskSet:
      IKMarkerTask C7: apply=true weight=1
      IKMarkerTask RBAK: apply=true weight=1
      IKMarkerTask CLAV: apply=true weight=1
      IKMarkerTask STRN: apply=true weight=1
      IKMarkerTask T10: apply=true weight=1
      IKMarkerTask RASI: apply=true weight=1
      IKMarkerTask RPSI: apply=true weight=1
      IKMarkerTask LPSI: apply=true weight=1
      IKMarkerTask LASI: apply=true weight=1
      IKMarkerTask PE01: apply=false weight=1
      IKMarkerTask PE02: apply=false weight=1
      IKMarkerTask PE03: apply=false weight=1
      IKMarkerTask RTH1: apply=false weight=1
      IKMarkerTask RTH2: apply=false weight=1
      IKMarkerTask RTH3: apply=false weight=1
      IKMarkerTask RGT: apply=true weight=1
      IKMarkerTask RKNE: apply=true weight=1
      IKMarkerTask RMKNE: apply=true weight=1
      IKMarkerTask LTH1: apply=false weight=1
      IKMarkerTask LTH2: apply=false weight=1
      IKMarkerTask LTH3: apply=false weight=1
      IKMarkerTask LGT: apply=true weight=1
      IKMarkerTask LKNE: apply=true weight=1
      IKMarkerTask LMKNE: apply=true weight=1
      IKMarkerTask RTB1: apply=false weight=1
      IKMarkerTask RTB2: apply=false weight=1
      IKMarkerTask RTB3: apply=false weight=1
      IKMarkerTask RANK: apply=true weight=1
      IKMarkerTask RMMA: apply=true weight=1
      IKMarkerTask LTB1: apply=false weight=1
      IKMarkerTask LTB2: apply=false weight=1
      IKMarkerTask LTB3: apply=false weight=1
      IKMarkerTask LANK: apply=true weight=1
      IKMarkerTask LMMA: apply=true weight=1
      IKMarkerTask RHEE: apply=true weight=1
      IKMarkerTask RD5M: apply=true weight=1
      IKMarkerTask RTOE: apply=true weight=1
      IKMarkerTask LHEE: apply=true weight=1
      IKMarkerTask LD5M: apply=true weight=1
      IKMarkerTask LTOE: apply=true weight=1
