# OpenSim document version 40000
MarkerSet:
  Marker RASI: pelvis (0.016 0.00444607 0.125113)
  Marker LASI: pelvis (0.016 0.00444607 -0.127328)
  Marker SACR: pelvis (-0.1533926 0.04975455 0)
  Marker RHJC: femur_r (-0.003097156 0.00917997 -0.0056739)
  Marker RT1: femur_r (0.0245009 -0.176222 0.0792525)
  Marker RT2: femur_r (-0.0295388 -0.272816 0.0792525)
  Marker RT3: femur_r (0.0494339 -0.272816 0.0792525)
  Marker RKNM: femur_r (0.003130824 -0.4062395 -0.05198935)
  Marker RS1: tibia_r (0.0245009 -0.176222 0.05912653)
  Marker RS2: tibia_r (-0.0295388 -0.272816 0.05684301)
  Marker RS3: tibia_r (0.0494339 -0.272816 0.05473687)
  Marker RANK: tibia_r (-0.0105021 -0.3982995 0.03139254)
  Marker RANM: tibia_r (-0.0105021 -0.3850181 -0.02973605)
  Marker RHEE: calcn_r (-0.0190614 0.0244548 -0.008146477)
  Marker RTOE: toes_r (-0.0186142 0.0244548 0.0123424)
  Marker RKJC: femur_r (0 -0.404 0)
  Marker RAJC: tibia_r (-0.0105021 -0.385018 0)
  Marker RKNE: femur_r (0.008860758 -0.4012377 0.05237352)
  Marker LTOE: toes_l (-0.01861418 0.0244548 -0.01234236)
  Marker LAJC: tibia_l (-0.0105021 -0.385018 0)
  Marker LHEE: calcn_l (-0.0190614 0.0244548 0.00814648)
  Marker LANK: tibia_l (-0.0105021 -0.3983 -0.0313925)
  Marker LANM: tibia_l (-0.0105021 -0.385018 0.0297361)
  Marker LS2: tibia_l (-0.0295388 -0.272816 -0.0792525)
  Marker LS3: tibia_l (0.0494339 -0.272816 -0.0792525)
  Marker LS1: tibia_l (0.0245009 -0.176222 -0.0792525)
  Marker LKNM: femur_l (0.0064815 -0.4085018 0.0519894)
  Marker LKJC: femur_l (0 -0.404 0)
  Marker LKNE: femur_l (0 -0.4052335 -0.0492517)
  Marker LT1: femur_l (0.0245009 -0.176222 -0.0792525)
  Marker LT2: femur_l (-0.0295388 -0.272816 -0.0792525)
  Marker LT3: femur_l (0.0494339 -0.272816 -0.0792525)
  Marker LHJC: femur_l (-0.00309716 0.00917997 -0.0056739)
  Marker CLAV: torso (0.05995042 0.3675069 0)
  Marker STRN: torso (0.09084894 0.2238154 0)
  Marker T10: torso (-0.1102465 0.1962332 -3.185404e-5) fixed=true
  Marker RBAK: torso (-0.1030789 0.3403753 0.08037563) fixed=true
  Marker C7: torso (-0.0784382 0.3908128 0)
