# OpenSim document version 40500
Model Athlete_03_increased_force_times_3:
  gravity: 0 -9.8066 0
  length_units: meters
  force_units: N
  credits:
    This model was created by Katelyn Burkhart, Brett Allaire, Jacob Banks, and Dennis Anderson.
  publications:
    Burkhart K, Grindle D, Bouxsein ML and Anderson DE. Between-session Reliability of Subject-Specific Musculoskeletal Models of the Spine Derived from Optoelectronic Motion Capture Data. Journal of Biomechanics, 112:110044, 2020. doi: 10.1016/j.jbiomech.2020.110044.
    Bruno AG, Burkhart KA, Allaire B, Anderson DE, and Bouxsein ML. Spinal Loading Patterns From Biomechanical Modeling Explain the High Incidence of Vertebral Fractures in the Thoracolumbar Region. Journal of Bone and Mineral Research, 32(6):1282-1290, 2017. doi: 10.1002/jbmr.3113.
    Bruno AG, Bouxsein ML, and Anderson DE. Development and validation of a musculoskeletal model of the fully articulated thoracolumbar spine and rib cage. Journal of Biomechanical Engineering, 137(8), 081003, 2015. doi: 10.1115/1.4030408.
  Ground: meshes=
  BodySet:
    Body pelvis: mass=9.342037 [kg] mass_center=(-0.07370576 -0.01188505 0)
        inertia=(0.06921866 0.05864731 0.03898595 0 0 0) meshes=(r_pelvis.vtp l_pelvis.vtp)
      WrapCylinder Gmax1_at_pelvis_r: xyz_body_rotation=(-0.6 0.45 0.5)
          translation=(-0.05620064 -0.07140246 0.08291898) quadrant=-x radius=0.03593156 length=0.1105586
      WrapEllipsoid Gmax2_at_pelvis_r: xyz_body_rotation=(-0.5 0.39 0) translation=(-0.05343668 -0.03961685 0.08291898)
          quadrant=all dimensions=(0.06172858 0.06172858 0.0921322)
      WrapCylinder Gmax3_at_pelvis_r: xyz_body_rotation=(-0.1 0 0) translation=(-0.07646973 -0.08107634 0.0626499)
          quadrant=all radius=0.03685288 length=0.0921322
      WrapCylinder Post_at_pelvis_r: xyz_body_rotation=(-0.1 0 0) translation=(-0.05527932 -0.06449254 0.0626499)
          quadrant=all radius=0.03685288 length=0.1105586
      WrapCylinder Gmed_at_pelvis_r: xyz_body_rotation=(-1 0.6 0.7) translation=(-0.02763966 -0.05067271 0.0921322)
          quadrant=-x radius=0.03685288 length=0.1381983
      WrapCylinder Gmax1_at_pelvis_l: xyz_body_rotation=(0.6 -0.45 0.5)
          translation=(-0.05620064 -0.07140246 -0.08291898) quadrant=-x radius=0.03593156 length=0.1105586
      WrapEllipsoid Gmax2_at_pelvis_l: xyz_body_rotation=(0.5 -0.39 0)
          translation=(-0.05343668 -0.03961685 -0.08291898) quadrant=all dimensions=(0.06172858 0.06172858 0.0921322)
      WrapCylinder Gmax3_at_pelvis_l: xyz_body_rotation=(0.1 0 0) translation=(-0.07646973 -0.08107634 -0.0626499)
          quadrant=all radius=0.03685288 length=0.0921322
      WrapCylinder Post_at_pelvis_l: xyz_body_rotation=(0.1 0 0) translation=(-0.05527932 -0.06449254 -0.0626499)
          quadrant=all radius=0.03685288 length=0.1105586
      WrapCylinder Gmed_at_pelvis_l: xyz_body_rotation=(1 -0.6 0.7) translation=(-0.02763966 -0.05067271 -0.0921322)
          quadrant=-x radius=0.03685288 length=0.1381983
      WrapCylinder PS_at_brim_r: xyz_body_rotation=(-0.25 -0.27 0.1) translation=(-0.06817783 -0.05527932 0.06043873)
          quadrant=-y radius=0.0460661 length=0.0921322
      WrapCylinder PS_at_brim_l: xyz_body_rotation=(0.25 0.27 0.1) translation=(-0.06817783 -0.05527932 -0.06043873)
          quadrant=-y radius=0.0460661 length=0.0921322
      WrapCylinder IL_at_brim_r: xyz_body_rotation=(-0.32 -0.24 0.9) translation=(-0.06541387 -0.05988593 0.06965195)
          quadrant=-y radius=0.05058058 length=0.0921322
      WrapCylinder IL_at_brim_l: xyz_body_rotation=(0.32 0.24 0.9) translation=(-0.06541387 -0.05988593 -0.06965195)
          quadrant=-y radius=0.05058058 length=0.0921322
    Body sacrum: mass=0.0001119759 mass_center=(0 0 0) inertia=(9.504898e-5 9.504898e-5 9.504898e-5 0 0 0)
        meshes=sacrum.vtp
    Body femur_r: mass=10.41533 mass_center=(0 -0.1597671 0) inertia=(0.1324287 0.03471431 0.1396485 0 0 0)
        meshes=r_femur.vtp
      WrapCylinder GasLat_at_condyles_r: translation=(0.004699033 -0.3853207 0) quadrant=all radius=0.02443497
          length=0.09398066
      WrapCylinder GasMed_at_condyles_r: translation=(0.004699033 -0.3853207 0) quadrant=all radius=0.02349516
          length=0.09398066
      WrapCylinder KnExt_at_fem_r: xyz_body_rotation=(-0.0623366 0.0507601 0)
          translation=(-0.001785632 -0.3784902 0.001965239) quadrant=all radius=0.03759226 length=0.09398066
      WrapCylinder KnExtVL_at_fem_r: xyz_body_rotation=(-0.0623366 0.0507601 0)
          translation=(-0.003759226 -0.3784902 0.001965239) quadrant=all radius=0.03759226 length=0.09398066
      WrapCylinder AB_at_femshaft_r: xyz_body_rotation=(1.66157 0.186644 0)
          translation=(0.01376196 -0.1058175 0.02195858) quadrant=all radius=0.01550681 length=0.06578646
      WrapCylinder AL_at_femshaft_r: xyz_body_rotation=(1.77711 0.136489 0)
          translation=(0.02888279 -0.2179496 0.01420395) quadrant=all radius=0.01889011 length=0.09398066
      WrapCylinder AMprox_at_femshaft_r: xyz_body_rotation=(1.61126 0.18656 0)
          translation=(0.004871008 -0.06850701 0.02387391) quadrant=all radius=0.01982992 length=0.06578646
      WrapCylinder AMmid_at_femshaft_r: xyz_body_rotation=(1.61139 0.13656 0)
          translation=(0.0216273 -0.1510373 0.01934517) quadrant=all radius=0.02011186 length=0.1127768
      WrapCylinder AMdist_at_femshaft_r: xyz_body_rotation=(1.71188 0.186636 0)
          translation=(0.029704 -0.2450414 0.008800913) quadrant=all radius=0.02048778 length=0.1879613
      WrapCylinder AMisch_at_condyles_r: xyz_body_rotation=(1.71115 -0.463363 0)
          translation=(-0.02128765 -0.3541482 -0.002964498) quadrant=all radius=0.03759226 length=0.2255536
      WrapCylinder PECT_at_femshaft_r: xyz_body_rotation=(1.81295 0.276344 0)
          translation=(0.005719409 -0.07941638 0.02860818) quadrant=all radius=0.0140971 length=0.04699033
      WrapCylinder Flex_at_femhead_r: translation=(-0.004699033 0 0.009398066) quadrant=all radius=0.02255536
          length=0.05638839
      WrapCylinder FleAbd_at_femhead_r: translation=(-0.004699033 0 0.009398066) quadrant=all radius=0.02255536
          length=0.05638839
    Body tibia_r: mass=4.151506 mass_center=(0 -0.2004813 0) inertia=(0.06507499 0.006584969 0.06597881 0 0 0)
        meshes=(r_tibia.vtp r_fibula.vtp)
      WrapCylinder GasLat_at_shank_r: xyz_body_rotation=(2.96723 -0.279725 -1.47812)
          translation=(-0.007946232 -0.07946232 -0.00354359) quadrant=-y radius=0.05905983 length=0.1073815
      WrapCylinder GasMed_at_shank_r: xyz_body_rotation=(2.96723 0.0279725 -1.47812)
          translation=(-0.007946232 -0.07946232 -0.00354359) quadrant=-y radius=0.06335509 length=0.1073815
      WrapCylinder GR_at_condyles_r: xyz_body_rotation=(0 -0.4 0) translation=(-0.003221445 -0.0214763 0) quadrant=all
          radius=0.03865734 length=0.1073815
      WrapCylinder SM_at_condyles_r: xyz_body_rotation=(0 -0.1 0) translation=(-0.001073815 -0.0214763 0) quadrant=all
          radius=0.03704662 length=0.1073815
      WrapCylinder ST_at_condyles_r: xyz_body_rotation=(0 -0.2 0) translation=(-0.00214763 -0.02201321 0) quadrant=all
          radius=0.04563714 length=0.1073815
      WrapCylinder BF140_at_gastroc_r: translation=(-0.04187879 -0.06442891 0) quadrant=y radius=0.03114064
          length=0.1610723
    Body patella_r: mass=0.09652322 mass_center=(0.001691652 0.02481089 0)
        inertia=(2.838464e-6 1.296594e-5 1.296594e-5 0 0 0) meshes=r_patella.vtp
    Body talus_r: mass=0.1119759 mass_center=(0 0 0) inertia=(0.001131139 0.001131139 0.001131139 0 0 0)
        meshes=r_talus.vtp
    Body calcn_r: mass=1.399699 mass_center=(0.1005069 0.03015206 0)
        inertia=(0.001583595 0.004411443 0.004637671 0 0 0) meshes=r_foot.vtp
    Body toes_r: mass=0.2425398 mass_center=(0.03477538 0.006030413 -0.0175887)
        inertia=(0.0001131139 0.0002262279 0.001131139 0 0 0) meshes=r_bofoot.vtp
    Body femur_l: mass=10.41533 mass_center=(0 -0.1563182 0) inertia=(0.1267729 0.03323172 0.1336843 0 0 0)
        meshes=l_femur.vtp
      WrapCylinder GasLat_at_condyles_l: translation=(0.004597594 -0.3770027 0) quadrant=all radius=0.02390749
          length=0.09195188
      WrapCylinder Flex_at_femhead_r: translation=(-0.004597594 0 0.009195188) quadrant=all radius=0.02206845
          length=0.05517113
      WrapCylinder GasMed_at_condyles_l: translation=(0.004597594 -0.3770027 0) quadrant=all radius=0.02298797
          length=0.09195188
      WrapCylinder KnExt_at_fem_l: xyz_body_rotation=(0.0623366 -0.0507601 0)
          translation=(-0.001747086 -0.3703196 -0.001922815) quadrant=all radius=0.03678075 length=0.09195188
      WrapCylinder KnExtVL_at_fem_l: xyz_body_rotation=(0.0623366 -0.0507601 0)
          translation=(-0.003678075 -0.3703196 -0.001922815) quadrant=all radius=0.03678075 length=0.09195188
      WrapCylinder AB_at_femshaft_l: xyz_body_rotation=(-1.66157 -0.186644 0)
          translation=(0.01346488 -0.1035332 -0.02148456) quadrant=all radius=0.01517206 length=0.06436632
      WrapCylinder AL_at_femshaft_l: xyz_body_rotation=(-1.77711 -0.136489 0)
          translation=(0.0282593 -0.2132447 -0.01389733) quadrant=all radius=0.01848233 length=0.09195188
      WrapCylinder AMprox_at_femshaft_l: xyz_body_rotation=(-1.61126 -0.18656 0)
          translation=(0.004765857 -0.06702814 -0.02335854) quadrant=all radius=0.01940185 length=0.06436632
      WrapCylinder AMmid_at_femshaft_l: xyz_body_rotation=(-1.61139 -0.13656 0)
          translation=(0.02116043 -0.1477768 -0.01892756) quadrant=all radius=0.0196777 length=0.1103423
      WrapCylinder AMdist_at_femshaft_l: xyz_body_rotation=(-1.71188 -0.186636 0)
          translation=(0.02906277 -0.2397517 -0.008610926) quadrant=all radius=0.02004551 length=0.1839038
      WrapCylinder AMisch_at_condyles_l: xyz_body_rotation=(-1.71115 0.463363 0)
          translation=(-0.02082811 -0.3465032 0.002900503) quadrant=all radius=0.03678075 length=0.2206845
      WrapCylinder PECT_at_femshaft_l: xyz_body_rotation=(-1.81295 -0.276344 0)
          translation=(0.005595943 -0.07770201 -0.02799061) quadrant=all radius=0.01379278 length=0.04597594
      WrapCylinder Flex_at_femhead_l: translation=(-0.004597594 0 -0.009195188) quadrant=all radius=0.02206845
          length=0.05517113
    Body tibia_l: mass=4.151506 mass_center=(0 -0.2012021 0) inertia=(0.0655438 0.006632409 0.06645413 0 0 0)
        meshes=(l_tibia.vtp l_fibula.vtp)
      WrapCylinder GasLat_at_shank_l: xyz_body_rotation=(-2.96723 0.279725 -1.47812)
          translation=(-0.007974804 -0.07974804 0.003556331) quadrant=-y radius=0.05927219 length=0.1077676
      WrapCylinder GasMed_at_shank_l: xyz_body_rotation=(-2.96723 -0.0279725 -1.47812)
          translation=(-0.007974804 -0.07974804 0.003556331) quadrant=-y radius=0.0635829 length=0.1077676
      WrapCylinder GR_at_condyles_l: xyz_body_rotation=(0 0.4 0) translation=(-0.003233029 -0.02155352 0) quadrant=all
          radius=0.03879634 length=0.1077676
      WrapCylinder SM_at_condyles_l: xyz_body_rotation=(0 0.1 0) translation=(-0.001077676 -0.02155352 0) quadrant=all
          radius=0.03717983 length=0.1077676
      WrapCylinder ST_at_condyles_l: xyz_body_rotation=(0 0.2 0) translation=(-0.002155352 -0.02209236 0) quadrant=all
          radius=0.04580124 length=0.1077676
      WrapCylinder BF140_at_gastroc_l: translation=(-0.04202937 -0.06466057 0) quadrant=all radius=0.03125261
          length=0.1616514
    Body patella_l: mass=0.09652322 mass_center=(0.001655134 0.0242753 0)
        inertia=(2.717238e-6 1.241219e-5 1.241219e-5 0 0 0) meshes=l_patella.vtp
    Body talus_l: mass=0.1119759 mass_center=(0 0 0) inertia=(0.001141973 0.001141973 0.001141973 0 0 0)
        meshes=l_talus.vtp
    Body calcn_l: mass=1.399699 mass_center=(0.100987 0.03029611 0) inertia=(0.001598762 0.004453695 0.004682089 0 0 0)
        meshes=l_foot.vtp
    Body toes_l: mass=0.2425398 mass_center=(0.03494152 0.006059223 0.01767273)
        inertia=(0.0001141973 0.0002283946 0.001141973 0 0 0) meshes=l_bofoot.vtp
  JointSet:
    CustomJoint ground_pelvis: socket_parent_frame=ground_offset socket_child_frame=pelvis_offset
      Coordinate pelvis_rotation: default_value=0 range=(-3.14159 3.14159) clamped=true
      Coordinate pelvis_tilt: default_value=0 range=(-1.570796 1.570796) clamped=true
      Coordinate pelvis_list: default_value=0 range=(-1.570796 1.570796) clamped=true
      Coordinate pelvis_tx: default_value=0 range=(-5 5) clamped=true
      Coordinate pelvis_ty: default_value=0 range=(-1 2) clamped=true
      Coordinate pelvis_tz: default_value=0 range=(-3 3) clamped=true
      PhysicalOffsetFrame ground_offset: socket_parent=/ground translation=(0 0 0) [meters]
      PhysicalOffsetFrame pelvis_offset: socket_parent=/bodyset/pelvis translation=(-0.07370576 -0.07278444 0)
      SpatialTransform:
        TransformAxis rotation1: coordinates=pelvis_rotation axis=(0 1 0) LinearFunction(coefficients=1 0)
        TransformAxis rotation2: coordinates=pelvis_tilt axis=(0 0 1) LinearFunction(coefficients=1 0)
        TransformAxis rotation3: coordinates=pelvis_list axis=(1 0 0) LinearFunction(coefficients=1 0)
        TransformAxis translation1: coordinates=pelvis_tx axis=(1 0 0) LinearFunction(coefficients=1 0)
        TransformAxis translation2: coordinates=pelvis_ty axis=(0 1 0) LinearFunction(coefficients=1 0)
        TransformAxis translation3: coordinates=pelvis_tz axis=(0 0 1) LinearFunction(coefficients=1 0)
    WeldJoint pelvis_sacrum: socket_parent_frame=pelvis_offset socket_child_frame=sacrum_offset
      PhysicalOffsetFrame pelvis_offset: socket_parent=/bodyset/pelvis translation=(0 0 0)
      PhysicalOffsetFrame sacrum_offset: socket_parent=/bodyset/sacrum translation=(0 0.04514478 0)
    CustomJoint hip_r: socket_parent_frame=pelvis_offset socket_child_frame=femur_r_offset
      Coordinate hip_flexion_r: default_value=2.332052e-9 range=(-0.5235988 2.8) clamped=true
      Coordinate hip_adduction_r: default_value=-1.199293e-9 range=(-0.8726646 0.5235988) clamped=true
      Coordinate hip_rotation_r: default_value=0 range=(-0.6981317 0.6981317) clamped=true
      PhysicalOffsetFrame pelvis_offset: socket_parent=/bodyset/pelvis translation=(-0.05184832 -0.07231457 0.07118134)
      PhysicalOffsetFrame femur_r_offset: socket_parent=/bodyset/femur_r translation=(0 0 0)
      SpatialTransform: axes_held_at_zero=(translation1 translation2 translation3)
        TransformAxis rotation1: coordinates=hip_flexion_r axis=(0 0 1) LinearFunction(coefficients=1 0)
        TransformAxis rotation2: coordinates=hip_adduction_r axis=(1 0 0) LinearFunction(coefficients=1 0)
        TransformAxis rotation3: coordinates=hip_rotation_r axis=(0 1 0) LinearFunction(coefficients=1 0)
    CustomJoint walker_knee_r: socket_parent_frame=femur_r_offset socket_child_frame=tibia_r_offset
      Coordinate knee_angle_r: default_value=4.877666e-5 range=(0 2.53073) clamped=true
      Coordinate knee_rotation_r: default_value=0 range=(-0.1745 0.1745) clamped=true
      Coordinate knee_adduction_r: default_value=0 range=(-0.1745 0.1745) clamped=true
      PhysicalOffsetFrame femur_r_offset: socket_parent=/bodyset/femur_r
          translation=(-0.00422913 -0.3849448 -0.001644661) orientation=(-1.64157 1.44618 1.5708) [radians]
      PhysicalOffsetFrame tibia_r_offset: socket_parent=/bodyset/tibia_r
          translation=(-0.00868667 -0.003795722 -0.001594336) orientation=(-1.64157 1.44618 1.5708)
      SpatialTransform:
        TransformAxis rotation1: coordinates=knee_angle_r axis=(1 0 0) LinearFunction(coefficients=1 0)
        TransformAxis rotation2: coordinates=knee_rotation_r axis=(0 0 1) LinearFunction(coefficients=1 0)
        TransformAxis rotation3: coordinates=knee_adduction_r axis=(0 1 0) LinearFunction(coefficients=1 0)
        TransformAxis translation1: coordinates=knee_angle_r axis=(1 0 0)
          MultiplierFunction: scale=0.9398066
            SimmSpline: x=(0 0.174533 0.349066 0.523599 0.698132 0.872665 1.0472 1.22173 1.39626 1.5708 1.74533 1.91986 2.0944)
                y=(0 5.3e-5 0.000188 0.000378 0.000597 0.000825 0.001045 0.001247 0.00142 0.001558 0.001661 0.001728 0.00176)
        TransformAxis translation2: coordinates=knee_angle_r axis=(0 1 0)
          MultiplierFunction: scale=0.9398066
            SimmSpline: x=(0 0.174533 0.349066 0.523599 0.698132 0.872665 1.0472 1.22173 1.39626 1.5708 1.74533 1.91986 2.0944)
                y=(0 0.000301 0.000143 -0.000401 -0.001233 -0.002243 -0.003316 -0.004346 -0.005239 -0.005924 -0.006361 -0.006539 -0.00648)
        TransformAxis translation3: coordinates=knee_angle_r axis=(0 0 1)
          MultiplierFunction: scale=0.9398066
            SimmSpline: x=(0 0.174533 0.349066 0.523599 0.698132 0.872665 1.0472 1.22173 1.39626 1.5708 1.74533 1.91986 2.0944)
                y=(0 0.001055 0.002061 0.00289 0.003447 0.003676 0.003559 0.00311 0.002373 0.001418 0.000329 -0.000805 -0.001898)
    CustomJoint patellofemoral_r: socket_parent_frame=femur_r_offset socket_child_frame=patella_r_offset
      Coordinate knee_angle_r_beta: default_value=4.877666e-5 range=(-99999.9 99999.9) clamped=true
      PhysicalOffsetFrame femur_r_offset: socket_parent=/bodyset/femur_r
          translation=(-0.007603035 -0.3834035 -0.002584468)
      PhysicalOffsetFrame patella_r_offset: socket_parent=/bodyset/patella_r translation=(0 0 0)
      SpatialTransform: axes_held_at_zero=(rotation2 rotation3)
        TransformAxis rotation1: coordinates=knee_angle_r_beta axis=(0 0 1)
          SimmSpline: x=(0 0.174533 0.349066 0.523599 0.698132 0.872665 1.0472 1.22173 1.39626 1.5708 1.74533 1.91986 2.0944)
              y=(0.00113686 -0.00629212 -0.105582 -0.253683 -0.414245 -0.579047 -0.747244 -0.91799 -1.09044 -1.26379 -1.43763 -1.61186 -1.78634)
        TransformAxis translation1: coordinates=knee_angle_r_beta axis=(1 0 0)
          MultiplierFunction: scale=0.9398066
            SimmSpline: x=(0 0.174533 0.349066 0.523599 0.698132 0.872665 1.0472 1.22173 1.39626 1.5708 1.74533 1.91986 2.0944)
                y=(0.0524 0.0488 0.0437 0.0371 0.0296 0.0216 0.0136 0.0057 -0.0019 -0.0088 -0.0148 -0.0196 -0.0227)
        TransformAxis translation2: coordinates=knee_angle_r_beta axis=(0 1 0)
          MultiplierFunction: scale=0.9398066
            SimmSpline: x=(0 0.174533 0.349066 0.523599 0.698132 0.872665 1.0472 1.22173 1.39626 1.5708 1.74533 1.91986 2.0944)
                y=(-0.0108 -0.019 -0.0263 -0.0322 -0.0367 -0.0395 -0.0408 -0.0404 -0.0384 -0.0349 -0.0301 -0.0245 -0.0187)
        TransformAxis translation3: axis=(0 0 1) MultiplierFunction(scale=0.9398066, Constant(value=0.00275))
    PinJoint ankle_r: socket_parent_frame=tibia_r_offset socket_child_frame=talus_r_offset
      Coordinate ankle_angle_r: default_value=-1.182866e-9 range=(-0.6981317 1.5) clamped=true
      PhysicalOffsetFrame tibia_r_offset: socket_parent=/bodyset/tibia_r translation=(-0.01073815 -0.429526 0)
          orientation=(0.175895 -0.105208 0.0186622)
      PhysicalOffsetFrame talus_r_offset: socket_parent=/bodyset/talus_r translation=(0 0 0)
          orientation=(0.175895 -0.105208 0.0186622)
    PinJoint subtalar_r: socket_parent_frame=talus_r_offset socket_child_frame=calcn_r_offset
      Coordinate subtalar_angle_r: default_value=0 range=(-0.85 0.85) clamped=true
      PhysicalOffsetFrame talus_r_offset: socket_parent=/bodyset/talus_r
          translation=(-0.0490172 -0.04216264 0.007960145) orientation=(-1.76819 0.906223 1.8196)
      PhysicalOffsetFrame calcn_r_offset: socket_parent=/bodyset/calcn_r translation=(0 0 0)
          orientation=(-1.76819 0.906223 1.8196)
    PinJoint mtp_r: socket_parent_frame=calcn_r_offset socket_child_frame=toes_r_offset
      Coordinate mtp_angle_r: default_value=0 range=(-0.5235988 0.5235988) clamped=true locked=true
      PhysicalOffsetFrame calcn_r_offset: socket_parent=/bodyset/calcn_r
          translation=(0.1797063 -0.002010138 0.001085474) orientation=(-3.14159 0.619901 0)
      PhysicalOffsetFrame toes_r_offset: socket_parent=/bodyset/toes_r translation=(0 0 0)
          orientation=(-3.14159 0.619901 0)
    CustomJoint hip_l: socket_parent_frame=pelvis_offset socket_child_frame=femur_l_offset
      Coordinate hip_flexion_l: default_value=2.332052e-9 range=(-0.5235988 2.8) clamped=true
      Coordinate hip_adduction_l: default_value=-1.199293e-9 range=(-0.8726646 0.5235988) clamped=true
      Coordinate hip_rotation_l: default_value=0 range=(-0.6981317 0.6981317) clamped=true
      PhysicalOffsetFrame pelvis_offset: socket_parent=/bodyset/pelvis
          translation=(-0.05184832 -0.07231457 -0.07118134)
      PhysicalOffsetFrame femur_l_offset: socket_parent=/bodyset/femur_l translation=(0 0 0)
      SpatialTransform: axes_held_at_zero=(translation1 translation2 translation3)
        TransformAxis rotation1: coordinates=hip_flexion_l axis=(0 0 1) LinearFunction(coefficients=1 0)
        TransformAxis rotation2: coordinates=hip_adduction_l axis=(1 0 0) LinearFunction(coefficients=-1 0)
        TransformAxis rotation3: coordinates=hip_rotation_l axis=(0 1 0) LinearFunction(coefficients=-1 0)
    CustomJoint walker_knee_l: socket_parent_frame=femur_l_offset socket_child_frame=tibia_l_offset
      Coordinate knee_angle_l: default_value=4.877992e-5 range=(0 2.53073) clamped=true
      Coordinate knee_rotation_l: default_value=0 range=(-0.1745 0.1745) clamped=true
      Coordinate knee_adduction_l: default_value=0 range=(-0.1745 0.1745) clamped=true
      PhysicalOffsetFrame femur_l_offset: socket_parent=/bodyset/femur_l
          translation=(-0.004137835 -0.3766349 0.001609158) orientation=(1.64157 -1.44618 1.5708)
      PhysicalOffsetFrame tibia_l_offset: socket_parent=/bodyset/tibia_l
          translation=(-0.008717905 -0.00380937 0.001600069) orientation=(1.64157 -1.44618 1.5708)
      SpatialTransform:
        TransformAxis rotation1: coordinates=knee_angle_l axis=(-1 0 0) LinearFunction(coefficients=1 0)
        TransformAxis rotation2: coordinates=knee_rotation_l axis=(0 0 1) LinearFunction(coefficients=1 0)
        TransformAxis rotation3: coordinates=knee_adduction_l axis=(0 1 0) LinearFunction(coefficients=1 0)
        TransformAxis translation1: coordinates=knee_angle_l axis=(1 0 0)
          MultiplierFunction: scale=0.9195188
            SimmSpline: x=(0 0.174533 0.349066 0.523599 0.698132 0.872665 1.0472 1.22173 1.39626 1.5708 1.74533 1.91986 2.0944)
                y=(0 5.3e-5 0.000188 0.000378 0.000597 0.000825 0.001045 0.001247 0.00142 0.001558 0.001661 0.001728 0.00176)
        TransformAxis translation2: coordinates=knee_angle_l axis=(0 1 0)
          MultiplierFunction: scale=0.9195188
            SimmSpline: x=(0 0.174533 0.349066 0.523599 0.698132 0.872665 1.0472 1.22173 1.39626 1.5708 1.74533 1.91986 2.0944)
                y=(0 0.000301 0.000143 -0.000401 -0.001233 -0.002243 -0.003316 -0.004346 -0.005239 -0.005924 -0.006361 -0.006539 -0.00648)
        TransformAxis translation3: coordinates=knee_angle_l axis=(0 0 1)
          MultiplierFunction: scale=0.9195188
            SimmSpline: x=(0 0.174533 0.349066 0.523599 0.698132 0.872665 1.0472 1.22173 1.39626 1.5708 1.74533 1.91986 2.0944)
                y=(0 -0.001055 -0.002061 -0.00289 -0.003447 -0.003676 -0.003559 -0.00311 -0.002373 -0.001418 -0.000329 0.000805 0.001898)
    CustomJoint patellofemoral_l: socket_parent_frame=femur_l_offset socket_child_frame=patella_l_offset
      Coordinate knee_angle_l_beta: default_value=4.877992e-5 range=(-99999.9 99999.9) clamped=true
      PhysicalOffsetFrame femur_l_offset: socket_parent=/bodyset/femur_l
          translation=(-0.007438907 -0.3751269 0.002528677)
      PhysicalOffsetFrame patella_l_offset: socket_parent=/bodyset/patella_l translation=(0 0 0)
      SpatialTransform: axes_held_at_zero=(rotation2 rotation3)
        TransformAxis rotation1: coordinates=knee_angle_l_beta axis=(0 0 1)
          SimmSpline: x=(0 0.174533 0.349066 0.523599 0.698132 0.872665 1.0472 1.22173 1.39626 1.5708 1.74533 1.91986 2.0944)
              y=(0.00113686 -0.00629212 -0.105582 -0.253683 -0.414245 -0.579047 -0.747244 -0.91799 -1.09044 -1.26379 -1.43763 -1.61186 -1.78634)
        TransformAxis translation1: coordinates=knee_angle_l_beta axis=(1 0 0)
          MultiplierFunction: scale=0.9195188
            SimmSpline: x=(0 0.174533 0.349066 0.523599 0.698132 0.872665 1.0472 1.22173 1.39626 1.5708 1.74533 1.91986 2.0944)
                y=(0.0524 0.0488 0.0437 0.0371 0.0296 0.0216 0.0136 0.0057 -0.0019 -0.0088 -0.0148 -0.0196 -0.0227)
        TransformAxis translation2: coordinates=knee_angle_l_beta axis=(0 1 0)
          MultiplierFunction: scale=0.9195188
            SimmSpline: x=(0 0.174533 0.349066 0.523599 0.698132 0.872665 1.0472 1.22173 1.39626 1.5708 1.74533 1.91986 2.0944)
                y=(-0.0108 -0.019 -0.0263 -0.0322 -0.0367 -0.0395 -0.0408 -0.0404 -0.0384 -0.0349 -0.0301 -0.0245 -0.0187)
        TransformAxis translation3: axis=(0 0 1) MultiplierFunction(scale=0.9195188, Constant(value=-0.00275))
    PinJoint ankle_l: socket_parent_frame=tibia_l_offset socket_child_frame=talus_l_offset
      Coordinate ankle_angle_l: default_value=8.352658e-11 range=(-0.6981317 1.5) clamped=true
      PhysicalOffsetFrame tibia_l_offset: socket_parent=/bodyset/tibia_l translation=(-0.01077676 -0.4310705 0)
          orientation=(-0.175895 0.105208 0.0186622)
      PhysicalOffsetFrame talus_l_offset: socket_parent=/bodyset/talus_l translation=(0 0 0)
          orientation=(-0.175895 0.105208 0.0186622)
    PinJoint subtalar_l: socket_parent_frame=talus_l_offset socket_child_frame=calcn_l_offset
      Coordinate subtalar_angle_l: default_value=0 range=(-0.85 0.85) clamped=true
      PhysicalOffsetFrame talus_l_offset: socket_parent=/bodyset/talus_l
          translation=(-0.04925138 -0.04236407 -0.007998174) orientation=(1.76819 -0.906223 1.8196)
      PhysicalOffsetFrame calcn_l_offset: socket_parent=/bodyset/calcn_l translation=(0 0 0)
          orientation=(1.76819 -0.906223 1.8196)
    PinJoint mtp_l: socket_parent_frame=calcn_l_offset socket_child_frame=toes_l_offset
      Coordinate mtp_angle_l: default_value=0 range=(-0.5235988 0.5235988) clamped=true locked=true
      PhysicalOffsetFrame calcn_l_offset: socket_parent=/bodyset/calcn_l
          translation=(0.1805648 -0.002019741 -0.00109066) orientation=(-3.14159 -0.619901 0)
      PhysicalOffsetFrame toes_l_offset: socket_parent=/bodyset/toes_l translation=(0 0 0)
          orientation=(-3.14159 -0.619901 0)
  ConstraintSet:
    CoordinateCouplerConstraint patellofemoral_knee_angle_r_con: independent_coordinate_names=knee_angle_r
        dependent_coordinate_name=knee_angle_r_beta scale_factor=1
        coupled_coordinates_function=LinearFunction(coefficients=1 0)
    CoordinateCouplerConstraint patellofemoral_knee_angle_l_con: independent_coordinate_names=knee_angle_l
        dependent_coordinate_name=knee_angle_l_beta scale_factor=1
        coupled_coordinates_function=LinearFunction(coefficients=1 0)
  ForceSet:
    Millard2012EquilibriumMuscle [values shared by the 80 below unless stated]: fiber_damping=0.01
        default_activation=0.01 minimum_activation=0.01
      ActiveForceLengthCurve: min_norm_active_fiber_length=0.25 transition_norm_fiber_length=0.77
          max_norm_active_fiber_length=1.9 shallow_ascending_slope=0.75 minimum_value=0
      ForceVelocityCurve: concentric_slope_at_vmax=0 concentric_slope_near_vmax=0.25 isometric_slope=5
          eccentric_slope_at_vmax=0 eccentric_slope_near_vmax=0.15 max_eccentric_velocity_force_multiplier=1.4
      FiberForceLengthCurve: strain_at_zero_force=0 strain_at_one_norm_force=0.7
      TendonForceLengthCurve
    Millard2012EquilibriumMuscle addbrev_r: max_isometric_force=6073.59 optimal_fiber_length=0.0963892
        tendon_slack_length=0.03314282 pennation_angle_at_optimal=0.1147809 [radians] ignore_tendon_compliance=true
      PathPoint P1: pelvis (-0.01759725 -0.08660427 0.01418836)
      PathPoint P2: femur_r (-0.001879613 -0.1108972 0.02340118)
      PathWrap: wrap_object=AB_at_femshaft_r method=hybrid
    Millard2012EquilibriumMuscle addlong_r: max_isometric_force=8897.559 optimal_fiber_length=0.1015586
        tendon_slack_length=0.1237095 pennation_angle_at_optimal=0.1377704
      PathPoint P1: pelvis (-0.006983621 -0.08190553 0.01739456)
      PathPoint P2: femur_r (0.01058222 -0.2249615 0.01487714)
      PathWrap: wrap_object=AL_at_femshaft_r method=hybrid
    Millard2012EquilibriumMuscle addmagDist_r: max_isometric_force=5796.758 optimal_fiber_length=0.1670598
        tendon_slack_length=0.08238038 pennation_angle_at_optimal=0.194705 ignore_tendon_compliance=true
      PathPoint P1: pelvis (-0.06821468 -0.1176252 0.03668704)
      PathPoint P2: femur_r (0.01057282 -0.2466992 0.01813827)
      PathWrap: wrap_object=AMdist_at_femshaft_r method=hybrid
      PathWrap pathwrap_0: wrap_object=Post_at_pelvis_r method=hybrid
    Millard2012EquilibriumMuscle addmagIsch_r: max_isometric_force=5796.758 optimal_fiber_length=0.1472006
        tendon_slack_length=0.2038785 pennation_angle_at_optimal=0.1680443
      PathPoint P1: pelvis (-0.08256888 -0.1195507 0.03842834)
      PathPoint P2: femur_r (0.00452047 -0.3646168 -0.03075987)
      PathWrap: wrap_object=AMisch_at_condyles_r method=hybrid
      PathWrap pathwrap_0: wrap_object=Post_at_pelvis_r method=hybrid
    Millard2012EquilibriumMuscle addmagMid_r: max_isometric_force=5796.758 optimal_fiber_length=0.129577
        tendon_slack_length=0.04387711 pennation_angle_at_optimal=0.2073076 ignore_tendon_compliance=true
      PathPoint P1: pelvis (-0.04851682 -0.1112496 0.02629453)
      PathPoint P2: femur_r (0.002274332 -0.1526246 0.02746115)
      PathWrap: wrap_object=AMmid_at_femshaft_r method=hybrid
      PathWrap pathwrap_0: wrap_object=Post_at_pelvis_r method=hybrid
    Millard2012EquilibriumMuscle addmagProx_r: max_isometric_force=5796.758 optimal_fiber_length=0.09843283
        tendon_slack_length=0.03758726 pennation_angle_at_optimal=0.3114833 ignore_tendon_compliance=true
      PathPoint P1: pelvis (-0.02854256 -0.09908819 0.01257605)
      PathPoint P2: femur_r (-0.01435085 -0.07411315 0.03009261)
      PathWrap: wrap_object=AMprox_at_femshaft_r method=hybrid
    Millard2012EquilibriumMuscle bflh_r: max_isometric_force=12744.47 optimal_fiber_length=0.09350557
        tendon_slack_length=0.3185512 pennation_angle_at_optimal=0.1759182
      PathPoint P1: pelvis (-0.09581749 -0.1097295 0.05398947)
      PathPoint P2: tibia_r (-0.03689629 -0.03917278 0.03885063)
      PathPoint P3: tibia_r (-0.02903596 -0.05377666 0.03732581)
      PathWrap: wrap_object=Post_at_pelvis_r method=hybrid
    Millard2012EquilibriumMuscle bfsh_r: max_isometric_force=5406.808 optimal_fiber_length=0.1058043
        tendon_slack_length=0.1015042 pennation_angle_at_optimal=0.2642232 ignore_tendon_compliance=true
      PathPoint P1: femur_r (0.004699033 -0.1983932 0.02199147)
      PathPoint P2: tibia_r (-0.03077554 -0.03526409 0.03440504)
      PathWrap: wrap_object=BF140_at_gastroc_r method=hybrid
    Millard2012EquilibriumMuscle edl_r: max_isometric_force=5856.959 optimal_fiber_length=0.07262131
        tendon_slack_length=0.3865542 pennation_angle_at_optimal=0.2182582
      PathPoint P1: tibia_r (-0.01718104 -0.1242404 0.02201321)
      PathPoint P2: tibia_r (0.01761057 -0.4037545 0.01202673)
      PathPoint P3: calcn_r (0.09236582 0.03618248 0.000804055)
      PathPoint P4: calcn_r (0.1624191 0.005527878 0.01306589)
      PathPoint P5: toes_r (0.0003015206 0.004723823 0.01537755)
      PathPoint P6: toes_r (0.04452455 -0.0004020275 0.02512672)
    Millard2012EquilibriumMuscle ehl_r: max_isometric_force=2774.349 optimal_fiber_length=0.07813245
        tendon_slack_length=0.3413545 pennation_angle_at_optimal=0.1972681
      PathPoint P1: tibia_r (-0.01503341 -0.1664413 0.02029511)
      PathPoint P2: tibia_r (0.007624087 -0.3123728 0.01761057)
      PathPoint P3: tibia_r (0.0214763 -0.3965599 -0.003006682)
      PathPoint P4: calcn_r (0.09749167 0.03909718 -0.02120695)
      PathPoint P5: calcn_r (0.1299554 0.03105663 -0.02583027)
      PathPoint P6: calcn_r (0.1742789 0.01397046 -0.02814193)
      PathPoint P7: toes_r (0.02995105 0.004120782 -0.02462419)
      PathPoint P8: toes_r (0.05658537 0.003417234 -0.01869428)
    Millard2012EquilibriumMuscle fdl_r: max_isometric_force=4106.94 optimal_fiber_length=0.0463869
        tendon_slack_length=0.3939484 pennation_angle_at_optimal=0.2248391
      PathPoint P1: tibia_r (-0.002469775 -0.1967229 -0.001932867)
      PathPoint P2: tibia_r (-0.01889915 -0.3914056 -0.01331531)
      PathPoint P3: calcn_r (0.043821 0.03165967 -0.02814193)
      PathPoint P4: calcn_r (0.07115887 0.01768921 -0.02643331)
      PathPoint P5: calcn_r (0.1666404 -0.008141057 0.0116588)
      PathPoint P6: toes_r (-0.001909631 -0.007839536 0.01477451)
      PathPoint P7: toes_r (0.02864446 -0.007135988 0.02160898)
      PathPoint P8: toes_r (0.04432353 -0.006030413 0.02432266)
    Millard2012EquilibriumMuscle fhl_r: max_isometric_force=8810.595 optimal_fiber_length=0.05462741
        tendon_slack_length=0.367299 pennation_angle_at_optimal=0.2580255
      PathPoint P1: tibia_r (-0.03328827 -0.2322662 0.0214763)
      PathPoint P2: tibia_r (-0.02598633 -0.3941975 -0.008160995)
      PathPoint P3: calcn_r (0.03758957 0.0277399 -0.02422216)
      PathPoint P4: calcn_r (0.1043261 0.006834468 -0.02572976)
      PathPoint P5: calcn_r (0.1734749 -0.005326865 -0.02703635)
      PathPoint P6: toes_r (0.01557857 -0.00643244 -0.02663432)
      PathPoint P7: toes_r (0.05648487 -0.0102517 -0.01819174)
    Millard2012EquilibriumMuscle gaslat_r: max_isometric_force=15285.97 optimal_fiber_length=0.07360034
        tendon_slack_length=0.3989352 pennation_angle_at_optimal=0.2102268
      PathPoint P1: femur_r (0.001879613 -0.3580663 0.01935062)
      PathPoint P2: calcn_r (0.004422303 0.03115713 -0.005326865)
      PathWrap: wrap_object=GasLat_at_shank_r method=hybrid
      PathWrap pathwrap_0: wrap_object=GasLat_at_condyles_r method=hybrid
    Millard2012EquilibriumMuscle gasmed_r: max_isometric_force=30236.12 optimal_fiber_length=0.06290782
        tendon_slack_length=0.4126327 pennation_angle_at_optimal=0.1656816
      PathPoint P1: femur_r (0.005638839 -0.3618255 -0.02067574)
      PathPoint P2: calcn_r (0.004422303 0.03115713 -0.005326865)
      PathWrap: wrap_object=GasMed_at_shank_r method=hybrid
      PathWrap pathwrap_0: wrap_object=GasMed_at_condyles_r method=hybrid
    Millard2012EquilibriumMuscle glmax1_r: max_isometric_force=9547.636 optimal_fiber_length=0.1363077
        tendon_slack_length=0.08095008 pennation_angle_at_optimal=0.3540118 ignore_tendon_compliance=true
      PathPoint P1: pelvis (-0.1134147 0.03178561 0.05187043)
      PathPoint P2: pelvis (-0.1158102 -0.02229599 0.07177099)
      PathPoint P3: femur_r (-0.04172741 -0.03063769 0.02838216)
      PathPoint P4: femur_r (-0.02603264 -0.05319305 0.04417091)
      PathWrap: wrap_object=Gmax1_at_pelvis_r method=hybrid
    Millard2012EquilibriumMuscle glmax2_r: max_isometric_force=13645.7 optimal_fiber_length=0.1459239
        tendon_slack_length=0.1013102 pennation_angle_at_optimal=0.3673821 ignore_tendon_compliance=true
      PathPoint P1: pelvis (-0.1213381 0.008015502 0.04256508)
      PathPoint P2: pelvis (-0.1238257 -0.05610851 0.07490348)
      PathPoint P3: femur_r (-0.0422913 -0.0548847 0.02368313)
      PathPoint P4: femur_r (-0.01466098 -0.09548435 0.0393779)
      PathWrap: wrap_object=Gmax2_at_pelvis_r method=hybrid
    Millard2012EquilibriumMuscle glmax3_r: max_isometric_force=9197.969 optimal_fiber_length=0.1555868
        tendon_slack_length=0.09596069 pennation_angle_at_optimal=0.3824161 ignore_tendon_compliance=true
      PathPoint P1: pelvis (-0.1197719 -0.04836941 0.008291898)
      PathPoint P2: pelvis (-0.1172843 -0.116363 0.04007751)
      PathPoint P3: femur_r (-0.02640856 -0.1057282 0.008834182)
      PathPoint P4: femur_r (-0.005638839 -0.1333586 0.03862605)
      PathWrap: wrap_object=Gmax3_at_pelvis_r method=hybrid
    Millard2012EquilibriumMuscle glmed1_r: max_isometric_force=10612.11 optimal_fiber_length=0.0675323
        tendon_slack_length=0.05163615 pennation_angle_at_optimal=0.3165559 ignore_tendon_compliance=true
      PathPoint P1: pelvis (-0.04099883 0.02257239 0.1079789)
      PathPoint P2: femur_r (-0.02048778 -0.01099574 0.05215926)
      PathWrap: wrap_object=Gmed_at_pelvis_r method=hybrid
    Millard2012EquilibriumMuscle glmed2_r: max_isometric_force=7425.227 optimal_fiber_length=0.06756111
        tendon_slack_length=0.06038743 pennation_angle_at_optimal=0.3165559 ignore_tendon_compliance=true
      PathPoint P1: pelvis (-0.07831237 0.02911378 0.06218924)
      PathPoint P2: femur_r (-0.02424701 -0.005450878 0.04952781)
      PathWrap: wrap_object=Gmed_at_pelvis_r method=hybrid
    Millard2012EquilibriumMuscle glmed3_r: max_isometric_force=8455.003 optimal_fiber_length=0.0676353
        tendon_slack_length=0.04190872 pennation_angle_at_optimal=0.3165559 ignore_tendon_compliance=true
      PathPoint P1: pelvis (-0.1061363 -0.006725651 0.04846154)
      PathPoint P2: femur_r (-0.02904002 -0.004417091 0.04868198)
      PathWrap: wrap_object=Gmed_at_pelvis_r method=hybrid
    Millard2012EquilibriumMuscle glmin1_r: max_isometric_force=3630.121 optimal_fiber_length=0.06313344
        tendon_slack_length=0.01498285 pennation_angle_at_optimal=0.1745329 ignore_tendon_compliance=true
      PathPoint P1: pelvis (-0.04274934 -0.0137277 0.09600176)
      PathPoint P2: femur_r (-0.006766607 -0.009773988 0.05262917)
    Millard2012EquilibriumMuscle glmin2_r: max_isometric_force=3831.731 optimal_fiber_length=0.05202346
        tendon_slack_length=0.02424577 pennation_angle_at_optimal=0 ignore_tendon_compliance=true
      PathPoint P1: pelvis (-0.05675344 -0.01308277 0.08946037)
      PathPoint P2: femur_r (-0.009022143 -0.009773988 0.05262917)
    Millard2012EquilibriumMuscle glmin3_r: max_isometric_force=4335.947 optimal_fiber_length=0.03530941
        tendon_slack_length=0.04727048 pennation_angle_at_optimal=0.01745329
      PathPoint P1: pelvis (-0.07269231 -0.01428049 0.0735215)
      PathPoint P2: femur_r (-0.01268739 -0.007800394 0.05168936)
    Millard2012EquilibriumMuscle grac_r: max_isometric_force=2730.132 optimal_fiber_length=0.2200778
        tendon_slack_length=0.1661827 pennation_angle_at_optimal=0.1720016 ignore_tendon_compliance=true
      PathPoint P1: pelvis (-0.04363381 -0.1191454 0.02262767)
      PathPoint P2: tibia_r (-0.01977967 -0.05105991 -0.03179567)
      PathPoint P3: tibia_r (0.001911391 -0.07475901 -0.01689111)
      PathWrap: wrap_object=GR_at_condyles_r method=hybrid
    Millard2012EquilibriumMuscle iliacus_r: max_isometric_force=9910.189 optimal_fiber_length=0.09877711
        tendon_slack_length=0.08906685 pennation_angle_at_optimal=0.279914 ignore_tendon_compliance=true
      PathPoint P1: pelvis (-0.05573998 0.02846885 0.07766745)
      PathPoint P2: pelvis (-0.01243785 -0.05131764 0.06965195)
      PathPoint P3: femur_r (-0.002161555 -0.05309907 0.01306331)
      PathPoint P4: femur_r (-0.01146564 -0.05986568 0.01842021)
      PathWrap: wrap_object=IL_at_brim_r method=hybrid range=(2 3)
    Millard2012EquilibriumMuscle perbrev_r: max_isometric_force=5058.27 optimal_fiber_length=0.04813633
        tendon_slack_length=0.1564193 pennation_angle_at_optimal=0.2052361
      PathPoint P1: tibia_r (-0.02609371 -0.27189 0.02695276)
      PathPoint P2: tibia_r (-0.03640233 -0.4180362 0.026738)
      PathPoint P3: tibia_r (-0.03060373 -0.4299556 0.02738229)
      PathPoint P4: calcn_r (0.04733874 0.02713686 0.0234181)
      PathPoint P5: calcn_r (0.06804316 0.02201101 0.03447386)
    Millard2012EquilibriumMuscle perlong_r: max_isometric_force=10824.7 optimal_fiber_length=0.05348673
        tendon_slack_length=0.3497914 pennation_angle_at_optimal=0.2479525
      PathPoint P1: tibia_r (-0.0214763 -0.1474348 0.03028159)
      PathPoint P2: tibia_r (-0.03403994 -0.4187879 0.02544942)
      PathPoint P3: tibia_r (-0.02920777 -0.4310294 0.02577156)
      PathPoint P4: calcn_r (0.04402201 0.02311658 0.02221202)
      PathPoint P5: calcn_r (0.06844518 0.01065373 0.02854395)
      PathPoint P6: calcn_r (0.08563186 0.006934975 0.01185981)
      PathPoint P7: calcn_r (0.1209098 0.008543085 -0.01849327)
    Millard2012EquilibriumMuscle piri_r: max_isometric_force=9994.098 optimal_fiber_length=0.02405131
        tendon_slack_length=0.1062941 pennation_angle_at_optimal=0.1745329
      PathPoint P1: pelvis (-0.0937998 -0.006016233 0.01244706)
      PathPoint P2: pelvis (-0.09399328 -0.02824773 0.05612694)
      PathPoint P3: femur_r (-0.01390914 -0.003383304 0.04106955)
    Millard2012EquilibriumMuscle psoas_r: max_isometric_force=13847.02 optimal_fiber_length=0.1082197
        tendon_slack_length=0.09215166 pennation_angle_at_optimal=0.2155251 ignore_tendon_compliance=true
      PathPoint P1: pelvis (-0.05583212 0.05712197 0.03593156)
      PathPoint P2: pelvis (-0.0188871 -0.06025446 0.06043873)
      PathPoint P3: femur_r (-0.01240545 -0.04388897 0.00432311)
      PathPoint P4: femur_r (-0.02208545 -0.04924586 0.008270298)
      PathWrap: wrap_object=PS_at_brim_r method=hybrid range=(2 3)
    Millard2012EquilibriumMuscle recfem_r: max_isometric_force=21270.88 optimal_fiber_length=0.07224557
        tendon_slack_length=0.4287142 pennation_angle_at_optimal=0.2170149
      PathPoint P1: pelvis (-0.02211173 -0.0357473 0.08595935)
      PathPoint P2: patella_r (0.009398066 0.04605052 0.0006578646)
      PathPoint P3: patella_r (0.01137166 0.04106955 -0.0009398066)
      PathPoint P4: patella_r (0.004699033 0.002321322 2.81942e-5)
      PathPoint P5: tibia_r (0.03500637 -0.06777921 -0.0005046931)
      PathWrap: wrap_object=KnExt_at_fem_r method=hybrid
      PathWrap pathwrap_0: wrap_object=Flex_at_femhead_r method=hybrid
    Millard2012EquilibriumMuscle sart_r: max_isometric_force=2420.558 optimal_fiber_length=0.3875886
        tendon_slack_length=0.1192579 pennation_angle_at_optimal=0.02613542 ignore_tendon_compliance=true
      PathPoint P1: pelvis (-0.01796578 -0.01437262 0.09729161)
      PathPoint P2: femur_r (-0.00281942 -0.335323 -0.03956586)
      PathPoint P3: tibia_r (-0.02695276 -0.04305999 -0.03919425)
      PathPoint P4: tibia_r (-0.01707366 -0.06432153 -0.02834872)
      PathPoint P5: tibia_r (0.01460389 -0.08697902 -0.002791919)
      PathWrap: wrap_object=Flex_at_femhead_r method=hybrid
    Millard2012EquilibriumMuscle semimem_r: max_isometric_force=21360.61 optimal_fiber_length=0.08202819
        tendon_slack_length=0.3195284 pennation_angle_at_optimal=0.2545615
      PathPoint P1: pelvis (-0.09093449 -0.1050307 0.05656917)
      PathPoint P2: tibia_r (-0.02899301 -0.04402642 -0.02104678)
      PathWrap: wrap_object=SM_at_condyles_r method=hybrid
      PathWrap pathwrap_0: wrap_object=Post_at_pelvis_r method=hybrid
    Millard2012EquilibriumMuscle semiten_r: max_isometric_force=5738.528 optimal_fiber_length=0.1869736
        tendon_slack_length=0.2394802 pennation_angle_at_optimal=0.241295
      PathPoint P1: pelvis (-0.09563323 -0.1154417 0.04744809)
      PathPoint P2: tibia_r (-0.03350303 -0.05454981 -0.02459037)
      PathPoint P3: tibia_r (0.002040249 -0.08300591 -0.01256364)
      PathWrap: wrap_object=ST_at_condyles_r method=hybrid
      PathWrap pathwrap_0: wrap_object=Post_at_pelvis_r method=hybrid
    Millard2012EquilibriumMuscle soleus_r: max_isometric_force=60121.05 optimal_fiber_length=0.04708837
        tendon_slack_length=0.301098 pennation_angle_at_optimal=0.3814289
      PathPoint P1: tibia_r (-0.008160995 -0.09836147 0.01052339)
      PathPoint P2: calcn_r (0.004422303 0.03115713 -0.005326865)
    Millard2012EquilibriumMuscle tfl_r: max_isometric_force=3990.766 optimal_fiber_length=0.08996389
        tendon_slack_length=0.4256685 pennation_angle_at_optimal=0.05235988
      PathPoint P1: pelvis (-0.02865312 0.01971629 0.1143361)
      PathPoint P2: femur_r (0.02763031 -0.09351075 0.05610645)
      PathPoint P3: femur_r (0.01005593 -0.3806217 0.03044973)
      PathPoint P4: tibia_r (0.0115972 -0.04402642 0.037154)
    Millard2012EquilibriumMuscle tibant_r: max_isometric_force=11912.45 optimal_fiber_length=0.07246994
        tendon_slack_length=0.255142 pennation_angle_at_optimal=0.1951828
      PathPoint P1: tibia_r (0.01653675 -0.1408845 0.0173958)
      PathPoint P2: tibia_r (0.02695276 -0.2046692 0.01374483)
      PathPoint P3: tibia_r (0.02501989 -0.392909 -0.01417436)
      PathPoint P4: calcn_r (0.117191 0.01789022 -0.0306546)
    Millard2012EquilibriumMuscle tibpost_r: max_isometric_force=16791.17 optimal_fiber_length=0.04018878
        tendon_slack_length=0.2985236 pennation_angle_at_optimal=0.2264891
      PathPoint P1: tibia_r (-0.004402642 -0.1400255 0.0110603)
      PathPoint P2: tibia_r (-0.01761057 -0.3924794 -0.01879176)
      PathPoint P3: calcn_r (0.04191137 0.0335693 -0.02874497)
      PathPoint P4: calcn_r (0.07759131 0.01598059 -0.02824243)
    Millard2012EquilibriumMuscle vasint_r: max_isometric_force=16472.91 optimal_fiber_length=0.1128127
        tendon_slack_length=0.1976633 pennation_angle_at_optimal=0.06309973
      PathPoint P1: femur_r (0.02725439 -0.1808188 0.029134)
      PathPoint P2: femur_r (0.03148352 -0.1958557 0.02678449)
      PathPoint P3: patella_r (0.005450878 0.04511072 -0.0005638839)
      PathPoint P4: patella_r (0.004699033 0.002321322 -0.0003665246)
      PathPoint P5: tibia_r (0.03497416 -0.06786512 0.0004617405)
      PathWrap: wrap_object=KnExt_at_fem_r method=hybrid
    Millard2012EquilibriumMuscle vaslat_r: max_isometric_force=49968.87 optimal_fiber_length=0.1126771
        tendon_slack_length=0.2128345 pennation_angle_at_optimal=0.2528673
      PathPoint P1: femur_r (0.004511072 -0.1742401 0.03279925)
      PathPoint P2: femur_r (0.0252808 -0.2435039 0.03843809)
      PathPoint P3: patella_r (0.009680008 0.03975382 0.01325127)
      PathPoint P4: patella_r (0.004699033 0.002321322 0.006888782)
      PathPoint P5: tibia_r (0.03494194 -0.0680584 0.005487195)
      PathWrap: wrap_object=KnExtVL_at_fem_r method=hybrid
    Millard2012EquilibriumMuscle vasmed_r: max_isometric_force=26667.67 optimal_fiber_length=0.1061713
        tendon_slack_length=0.2007604 pennation_angle_at_optimal=0.4222225
      PathPoint P1: femur_r (0.01315729 -0.1972654 0.01766836)
      PathPoint P2: femur_r (0.03345711 -0.2602324 0.0008458259)
      PathPoint P3: patella_r (0.005920781 0.04182139 -0.01597671)
      PathPoint P4: patella_r (0.004699033 0.002321322 -0.007988356)
      PathPoint P5: tibia_r (0.0342547 -0.06826243 -0.007280467)
      PathWrap: wrap_object=KnExt_at_fem_r method=hybrid
    Millard2012EquilibriumMuscle addbrev_l: max_isometric_force=6073.59 optimal_fiber_length=0.09485206
        tendon_slack_length=0.03261429 pennation_angle_at_optimal=0.1147809 ignore_tendon_compliance=true
      PathPoint P1: pelvis (-0.01759725 -0.08660427 -0.01418836)
      PathPoint P2: femur_l (-0.001839038 -0.1085032 -0.02289602)
      PathWrap: wrap_object=AB_at_femshaft_l method=hybrid
    Millard2012EquilibriumMuscle addlong_l: max_isometric_force=8897.559 optimal_fiber_length=0.09950466
        tendon_slack_length=0.1212075 pennation_angle_at_optimal=0.1377704
      PathPoint P1: pelvis (-0.006983621 -0.08190553 -0.01739456)
      PathPoint P2: femur_l (0.01035378 -0.2201052 -0.01455598)
      PathWrap: wrap_object=AL_at_femshaft_l method=hybrid
    Millard2012EquilibriumMuscle addmagDist_l: max_isometric_force=5796.758 optimal_fiber_length=0.1628876
        tendon_slack_length=0.08032299 pennation_angle_at_optimal=0.194705 ignore_tendon_compliance=true
      PathPoint P1: pelvis (-0.06821468 -0.1176252 -0.03668704)
      PathPoint P2: femur_l (0.01034459 -0.2413737 -0.01774671)
      PathWrap: wrap_object=AMdist_at_femshaft_l method=hybrid
      PathWrap pathwrap_0: wrap_object=Post_at_pelvis_l method=hybrid
    Millard2012EquilibriumMuscle addmagIsch_l: max_isometric_force=5796.758 optimal_fiber_length=0.1435896
        tendon_slack_length=0.1988772 pennation_angle_at_optimal=0.1680443
      PathPoint P1: pelvis (-0.08256888 -0.1195507 -0.03842834)
      PathPoint P2: femur_l (0.004422885 -0.3567457 0.03009585)
      PathWrap: wrap_object=AMisch_at_condyles_l method=hybrid
      PathWrap pathwrap_0: wrap_object=Post_at_pelvis_l method=hybrid
    Millard2012EquilibriumMuscle addmagMid_l: max_isometric_force=5796.758 optimal_fiber_length=0.1266021
        tendon_slack_length=0.04286975 pennation_angle_at_optimal=0.2073076 ignore_tendon_compliance=true
      PathPoint P1: pelvis (-0.04851682 -0.1112496 -0.02629453)
      PathPoint P2: femur_l (0.002225236 -0.1493299 -0.02686834)
      PathWrap: wrap_object=AMmid_at_femshaft_l method=hybrid
      PathWrap pathwrap_0: wrap_object=Post_at_pelvis_l method=hybrid
    Millard2012EquilibriumMuscle addmagProx_l: max_isometric_force=5796.758 optimal_fiber_length=0.09718077
        tendon_slack_length=0.03710916 pennation_angle_at_optimal=0.3114833 ignore_tendon_compliance=true
      PathPoint P1: pelvis (-0.02854256 -0.09908819 -0.01257605)
      PathPoint P2: femur_l (-0.01404105 -0.07251325 -0.02944299)
      PathWrap: wrap_object=AMprox_at_femshaft_l method=hybrid
    Millard2012EquilibriumMuscle bflh_l: max_isometric_force=12744.47 optimal_fiber_length=0.09165198
        tendon_slack_length=0.3122365 pennation_angle_at_optimal=0.1759182
      PathPoint P1: pelvis (-0.09581749 -0.1097295 -0.05398947)
      PathPoint P2: tibia_l (-0.03702895 -0.03931363 -0.03899032)
      PathPoint P3: tibia_l (-0.02914036 -0.05397002 -0.03746002)
      PathWrap: wrap_object=Post_at_pelvis_l method=hybrid
    Millard2012EquilibriumMuscle bfsh_l: max_isometric_force=5406.808 optimal_fiber_length=0.1039589
        tendon_slack_length=0.09973388 pennation_angle_at_optimal=0.2642232 ignore_tendon_compliance=true
      PathPoint P1: femur_l (0.004597594 -0.1941104 -0.02151674)
      PathPoint P2: tibia_l (-0.0308862 -0.03539089 -0.03452875)
      PathWrap: wrap_object=BF140_at_gastroc_l method=hybrid
    Millard2012EquilibriumMuscle edl_l: max_isometric_force=5856.959 optimal_fiber_length=0.07291318
        tendon_slack_length=0.3881077 pennation_angle_at_optimal=0.2182582
      PathPoint P1: tibia_l (-0.01724282 -0.1246871 -0.02209236)
      PathPoint P2: tibia_l (0.01767389 -0.4052063 -0.01206997)
      PathPoint P3: calcn_l (0.09280709 0.03635534 -0.0008078964)
      PathPoint P4: calcn_l (0.1631951 0.005554287 -0.01312832)
      PathPoint P5: toes_l (0.0003029611 0.004746391 -0.01545102)
      PathPoint P6: toes_l (0.04473726 -0.0004039482 -0.02524676)
    Millard2012EquilibriumMuscle ehl_l: max_isometric_force=2774.349 optimal_fiber_length=0.07845089
        tendon_slack_length=0.3427457 pennation_angle_at_optimal=0.1972681
      PathPoint P1: tibia_l (-0.01508747 -0.1670398 -0.02036808)
      PathPoint P2: tibia_l (0.007651501 -0.313496 -0.01767389)
      PathPoint P3: tibia_l (0.02155352 -0.3979858 0.003017493)
      PathPoint P4: calcn_l (0.09795743 0.03928396 0.02130827)
      PathPoint P5: calcn_l (0.1305762 0.031205 0.02595367)
      PathPoint P6: calcn_l (0.1751115 0.0140372 0.02827637)
      PathPoint P7: toes_l (0.03009414 0.004140469 0.02474183)
      PathPoint P8: toes_l (0.05685571 0.00343356 0.01878359)
    Millard2012EquilibriumMuscle fdl_l: max_isometric_force=4106.94 optimal_fiber_length=0.04657967
        tendon_slack_length=0.3955855 pennation_angle_at_optimal=0.2248391
      PathPoint P1: tibia_l (-0.002478655 -0.1974303 0.001939817)
      PathPoint P2: tibia_l (-0.0189671 -0.392813 0.01336318)
      PathPoint P3: calcn_l (0.04403035 0.03181092 0.02827637)
      PathPoint P4: calcn_l (0.07149883 0.01777372 0.02655959)
      PathPoint P5: calcn_l (0.1674365 -0.008179951 -0.0117145)
      PathPoint P6: toes_l (-0.001918754 -0.00787699 -0.0148451)
      PathPoint P7: toes_l (0.02878131 -0.00717008 -0.02171221)
      PathPoint P8: toes_l (0.04453529 -0.006059223 -0.02443886)
    Millard2012EquilibriumMuscle fhl_l: max_isometric_force=8810.595 optimal_fiber_length=0.0548577
        tendon_slack_length=0.3688475 pennation_angle_at_optimal=0.2580255
      PathPoint P1: tibia_l (-0.03340796 -0.2331014 -0.02155352)
      PathPoint P2: tibia_l (-0.02607976 -0.3956149 0.008190339)
      PathPoint P3: calcn_l (0.03776915 0.02787242 0.02433788)
      PathPoint P4: calcn_l (0.1048246 0.006867119 0.02585268)
      PathPoint P5: calcn_l (0.1743036 -0.005352313 0.02716552)
      PathPoint P6: toes_l (0.01565299 -0.006463171 0.02676157)
      PathPoint P7: toes_l (0.05675472 -0.01030068 0.01827866)
    Millard2012EquilibriumMuscle gaslat_l: max_isometric_force=15285.97 optimal_fiber_length=0.07379996
        tendon_slack_length=0.4000172 pennation_angle_at_optimal=0.2102268
      PathPoint P1: femur_l (0.001839038 -0.3503367 -0.01893289)
      PathPoint P2: calcn_l (0.00444343 0.03130598 0.005352313)
      PathWrap: wrap_object=GasLat_at_shank_l method=hybrid
      PathWrap pathwrap_0: wrap_object=GasLat_at_condyles_l method=hybrid
    Millard2012EquilibriumMuscle gasmed_l: max_isometric_force=30236.12 optimal_fiber_length=0.06307259
        tendon_slack_length=0.4137134 pennation_angle_at_optimal=0.1656816
      PathPoint P1: femur_l (0.005517113 -0.3540147 0.02022941)
      PathPoint P2: calcn_l (0.00444343 0.03130598 0.005352313)
      PathWrap: wrap_object=GasMed_at_shank_l method=hybrid
      PathWrap pathwrap_0: wrap_object=GasMed_at_condyles_l method=hybrid
    Millard2012EquilibriumMuscle glmax1_l: max_isometric_force=9547.636 optimal_fiber_length=0.1353496
        tendon_slack_length=0.08038112 pennation_angle_at_optimal=0.3540118 ignore_tendon_compliance=true
      PathPoint P1: pelvis (-0.1134147 0.03178561 -0.05187043)
      PathPoint P2: pelvis (-0.1158102 -0.02229599 -0.07177099)
      PathPoint P3: femur_l (-0.04082663 -0.02997631 -0.02776947)
      PathPoint P4: femur_l (-0.02547067 -0.05204476 -0.04321738)
      PathWrap: wrap_object=Gmax1_at_pelvis_l method=hybrid
    Millard2012EquilibriumMuscle glmax2_l: max_isometric_force=13645.7 optimal_fiber_length=0.1445238
        tendon_slack_length=0.1003382 pennation_angle_at_optimal=0.3673821 ignore_tendon_compliance=true
      PathPoint P1: pelvis (-0.1213381 0.008015502 -0.04256508)
      PathPoint P2: pelvis (-0.1238257 -0.05610851 -0.07490348)
      PathPoint P3: femur_l (-0.04137835 -0.0536999 -0.02317187)
      PathPoint P4: femur_l (-0.01434449 -0.09342311 -0.03852784)
      PathWrap: wrap_object=Gmax2_at_pelvis_l method=hybrid
    Millard2012EquilibriumMuscle glmax3_l: max_isometric_force=9197.969 optimal_fiber_length=0.1536938
        tendon_slack_length=0.09479317 pennation_angle_at_optimal=0.3824161 ignore_tendon_compliance=true
      PathPoint P1: pelvis (-0.1197719 -0.04836941 -0.008291898)
      PathPoint P2: pelvis (-0.1172843 -0.116363 -0.04007751)
      PathPoint P3: femur_l (-0.02583848 -0.1034459 -0.008643477)
      PathPoint P4: femur_l (-0.005517113 -0.1304797 -0.03779222)
      PathWrap: wrap_object=Gmax3_at_pelvis_l method=hybrid
    Millard2012EquilibriumMuscle glmed1_l: max_isometric_force=10612.11 optimal_fiber_length=0.06722991
        tendon_slack_length=0.05140494 pennation_angle_at_optimal=0.3165559 ignore_tendon_compliance=true
      PathPoint P1: pelvis (-0.04099883 0.02257239 -0.1079789)
      PathPoint P2: femur_l (-0.02004551 -0.01075837 -0.05103329)
      PathWrap: wrap_object=Gmed_at_pelvis_l method=hybrid
    Millard2012EquilibriumMuscle glmed2_l: max_isometric_force=7425.227 optimal_fiber_length=0.06722701
        tendon_slack_length=0.0600888 pennation_angle_at_optimal=0.3165559 ignore_tendon_compliance=true
      PathPoint P1: pelvis (-0.07831237 0.02911378 -0.06218924)
      PathPoint P2: femur_l (-0.02372359 -0.005333209 -0.04845864)
      PathWrap: wrap_object=Gmed_at_pelvis_l method=hybrid
    Millard2012EquilibriumMuscle glmed3_l: max_isometric_force=8455.003 optimal_fiber_length=0.06721987
        tendon_slack_length=0.04165131 pennation_angle_at_optimal=0.3165559 ignore_tendon_compliance=true
      PathPoint P1: pelvis (-0.1061363 -0.006725651 -0.04846154)
      PathPoint P2: femur_l (-0.02841313 -0.004321738 -0.04763107)
      PathWrap: wrap_object=Gmed_at_pelvis_l method=hybrid
    Millard2012EquilibriumMuscle glmin1_l: max_isometric_force=3630.121 optimal_fiber_length=0.0626032
        tendon_slack_length=0.01485701 pennation_angle_at_optimal=0.1745329 ignore_tendon_compliance=true
      PathPoint P1: pelvis (-0.04274934 -0.0137277 -0.09600176)
      PathPoint P2: femur_l (-0.006620535 -0.009562996 -0.05149305)
    Millard2012EquilibriumMuscle glmin2_l: max_isometric_force=3831.731 optimal_fiber_length=0.05155249
        tendon_slack_length=0.02402627 pennation_angle_at_optimal=0 ignore_tendon_compliance=true
      PathPoint P1: pelvis (-0.05675344 -0.01308277 -0.08946037)
      PathPoint P2: femur_l (-0.008827381 -0.009562996 -0.05149305)
    Millard2012EquilibriumMuscle glmin3_l: max_isometric_force=4335.947 optimal_fiber_length=0.03498123
        tendon_slack_length=0.04683112 pennation_angle_at_optimal=0.01745329
      PathPoint P1: pelvis (-0.07269231 -0.01428049 -0.0735215)
      PathPoint P2: femur_l (-0.0124135 -0.007632006 -0.05057353)
    Millard2012EquilibriumMuscle grac_l: max_isometric_force=2730.132 optimal_fiber_length=0.2159516
        tendon_slack_length=0.163067 pennation_angle_at_optimal=0.1720016 ignore_tendon_compliance=true
      PathPoint P1: pelvis (-0.04363381 -0.1191454 -0.02262767)
      PathPoint P2: tibia_l (-0.0198508 -0.0512435 0.03190999)
      PathPoint P3: tibia_l (0.001918264 -0.07502782 0.01695185)
      PathWrap: wrap_object=GR_at_condyles_l method=hybrid
    Millard2012EquilibriumMuscle iliacus_l: max_isometric_force=9910.189 optimal_fiber_length=0.09815817
        tendon_slack_length=0.08850875 pennation_angle_at_optimal=0.279914 ignore_tendon_compliance=true
      PathPoint P1: pelvis (-0.05573998 0.02846885 -0.07766745)
      PathPoint P2: pelvis (-0.01243785 -0.05131764 -0.06965195)
      PathPoint P3: femur_l (-0.002114893 -0.05195281 -0.01278131)
      PathPoint P4: femur_l (-0.01121813 -0.05857335 -0.01802257)
      PathWrap: wrap_object=IL_at_brim_l method=hybrid range=(2 3)
    Millard2012EquilibriumMuscle perbrev_l: max_isometric_force=5058.27 optimal_fiber_length=0.04831965
        tendon_slack_length=0.1570149 pennation_angle_at_optimal=0.2052361
      PathPoint P1: tibia_l (-0.02618753 -0.2728676 -0.02704967)
      PathPoint P2: tibia_l (-0.03653322 -0.4195393 -0.02683414)
      PathPoint P3: tibia_l (-0.03071377 -0.4315015 -0.02748074)
      PathPoint P4: calcn_l (0.0475649 0.0272665 -0.02352998)
      PathPoint P5: calcn_l (0.06836823 0.02211616 -0.03463856)
    Millard2012EquilibriumMuscle perlong_l: max_isometric_force=10824.7 optimal_fiber_length=0.0536972
        tendon_slack_length=0.3511678 pennation_angle_at_optimal=0.2479525
      PathPoint P1: tibia_l (-0.02155352 -0.1479649 -0.03039047)
      PathPoint P2: tibia_l (-0.03416234 -0.4202937 -0.02554093)
      PathPoint P3: tibia_l (-0.02931279 -0.4325792 -0.02586423)
      PathPoint P4: calcn_l (0.04423233 0.02322702 -0.02231814)
      PathPoint P5: calcn_l (0.06877218 0.01070463 -0.02868032)
      PathPoint P6: calcn_l (0.08604096 0.006968106 -0.01191647)
      PathPoint P7: calcn_l (0.1214874 0.008583899 0.01858162)
    Millard2012EquilibriumMuscle piri_l: max_isometric_force=9994.098 optimal_fiber_length=0.02394498
        tendon_slack_length=0.1058241 pennation_angle_at_optimal=0.1745329
      PathPoint P1: pelvis (-0.0937998 -0.006016233 -0.01244706)
      PathPoint P2: pelvis (-0.09399328 -0.02824773 -0.05612694)
      PathPoint P3: femur_l (-0.01360888 -0.003310268 -0.04018297)
    Millard2012EquilibriumMuscle psoas_l: max_isometric_force=13847.02 optimal_fiber_length=0.1076522
        tendon_slack_length=0.09166846 pennation_angle_at_optimal=0.2155251 ignore_tendon_compliance=true
      PathPoint P1: pelvis (-0.05583212 0.05712197 -0.03593156)
      PathPoint P2: pelvis (-0.0188871 -0.06025446 -0.06043873)
      PathPoint P3: femur_l (-0.01213765 -0.04294153 -0.004229787)
      PathPoint P4: femur_l (-0.02160869 -0.04818279 -0.008091765)
      PathWrap: wrap_object=PS_at_brim_l method=hybrid range=(2 3)
    Millard2012EquilibriumMuscle recfem_l: max_isometric_force=21270.88 optimal_fiber_length=0.07101887
        tendon_slack_length=0.4214348 pennation_angle_at_optimal=0.2170149
      PathPoint P1: pelvis (-0.02211173 -0.0357473 -0.08595935)
      PathPoint P2: patella_l (0.009195188 0.04505642 -0.0006436632)
      PathPoint P3: patella_l (0.01112618 0.04018297 0.0009195188)
      PathPoint P4: patella_l (0.004597594 0.002271211 -2.758556e-5)
      PathPoint P5: tibia_l (0.03513224 -0.06802292 0.0005065078)
      PathWrap: wrap_object=KnExt_at_fem_l method=hybrid
      PathWrap pathwrap_0: wrap_object=Flex_at_femhead_l method=hybrid
    Millard2012EquilibriumMuscle sart_l: max_isometric_force=2420.558 optimal_fiber_length=0.3821631
        tendon_slack_length=0.1175885 pennation_angle_at_optimal=0.02613542 ignore_tendon_compliance=true
      PathPoint P1: pelvis (-0.01796578 -0.01437262 -0.09729161)
      PathPoint P2: femur_l (-0.002758556 -0.3280843 0.03871174)
      PathPoint P3: tibia_l (-0.02704967 -0.04321482 0.03933518)
      PathPoint P4: tibia_l (-0.01713505 -0.0645528 0.02845065)
      PathPoint P5: tibia_l (0.0146564 -0.08729177 0.002801958)
      PathWrap: wrap_object=Flex_at_femhead_l method=hybrid
    Millard2012EquilibriumMuscle semimem_l: max_isometric_force=21360.61 optimal_fiber_length=0.08033021
        tendon_slack_length=0.3129142 pennation_angle_at_optimal=0.2545615
      PathPoint P1: pelvis (-0.09093449 -0.1050307 -0.05656917)
      PathPoint P2: tibia_l (-0.02909726 -0.04418472 0.02112245)
      PathWrap: wrap_object=SM_at_condyles_l method=hybrid
      PathWrap pathwrap_0: wrap_object=Post_at_pelvis_l method=hybrid
    Millard2012EquilibriumMuscle semiten_l: max_isometric_force=5738.528 optimal_fiber_length=0.1836068
        tendon_slack_length=0.2351679 pennation_angle_at_optimal=0.241295
      PathPoint P1: pelvis (-0.09563323 -0.1154417 -0.04744809)
      PathPoint P2: tibia_l (-0.0336235 -0.05474595 0.02467878)
      PathPoint P3: tibia_l (0.002047585 -0.08330437 0.01260881)
      PathWrap: wrap_object=ST_at_condyles_l method=hybrid
      PathWrap pathwrap_0: wrap_object=Post_at_pelvis_l method=hybrid
    Millard2012EquilibriumMuscle soleus_l: max_isometric_force=60121.05 optimal_fiber_length=0.04726041
        tendon_slack_length=0.3021981 pennation_angle_at_optimal=0.3814289
      PathPoint P1: tibia_l (-0.008190339 -0.09871514 -0.01056123)
      PathPoint P2: calcn_l (0.00444343 0.03130598 0.005352313)
    Millard2012EquilibriumMuscle tfl_l: max_isometric_force=3990.766 optimal_fiber_length=0.08856142
        tendon_slack_length=0.4190326 pennation_angle_at_optimal=0.05235988
      PathPoint P1: pelvis (-0.02865312 0.01971629 -0.1143361)
      PathPoint P2: femur_l (0.02703385 -0.09149212 -0.05489527)
      PathPoint P3: femur_l (0.009838851 -0.3724051 -0.02979241)
      PathPoint P4: tibia_l (0.0116389 -0.04418472 -0.0372876)
    Millard2012EquilibriumMuscle tibant_l: max_isometric_force=11912.45 optimal_fiber_length=0.07274526
        tendon_slack_length=0.2561113 pennation_angle_at_optimal=0.1951828
      PathPoint P1: tibia_l (0.01659621 -0.1413911 -0.01745835)
      PathPoint P2: tibia_l (0.02704967 -0.2054051 -0.01379426)
      PathPoint P3: tibia_l (0.02510986 -0.3943217 0.01422533)
      PathPoint P4: calcn_l (0.1177509 0.01797569 0.03080105)
    Millard2012EquilibriumMuscle tibpost_l: max_isometric_force=16791.17 optimal_fiber_length=0.04034018
        tendon_slack_length=0.2996481 pennation_angle_at_optimal=0.2264891
      PathPoint P1: tibia_l (-0.004418472 -0.140529 -0.01110006)
      PathPoint P2: tibia_l (-0.01767389 -0.3938907 0.01885933)
      PathPoint P3: calcn_l (0.0421116 0.03372967 0.02888229)
      PathPoint P4: calcn_l (0.077962 0.01605694 0.02837736)
    Millard2012EquilibriumMuscle vasint_l: max_isometric_force=16472.91 optimal_fiber_length=0.1109925
        tendon_slack_length=0.194474 pennation_angle_at_optimal=0.06309973
      PathPoint P1: femur_l (0.02666605 -0.1769154 -0.02850508)
      PathPoint P2: femur_l (0.03080388 -0.1916277 -0.02620629)
      PathPoint P3: patella_l (0.005333209 0.0441369 0.0005517113)
      PathPoint P4: patella_l (0.004597594 0.002271211 0.0003586123)
      PathPoint P5: tibia_l (0.03509991 -0.06810914 -0.0004634008)
      PathWrap: wrap_object=KnExt_at_fem_l method=hybrid
    Millard2012EquilibriumMuscle vaslat_l: max_isometric_force=49968.87 optimal_fiber_length=0.1108315
        tendon_slack_length=0.2093484 pennation_angle_at_optimal=0.2528673
      PathPoint P1: femur_l (0.00441369 -0.1704788 -0.03209121)
      PathPoint P2: femur_l (0.02473506 -0.2382473 -0.03760832)
      PathPoint P3: patella_l (0.009471044 0.03889565 -0.01296522)
      PathPoint P4: patella_l (0.004597594 0.002271211 -0.006740073)
      PathPoint P5: tibia_l (0.03506758 -0.06830312 -0.005506925)
      PathWrap: wrap_object=KnExtVL_at_fem_l method=hybrid
    Millard2012EquilibriumMuscle vasmed_l: max_isometric_force=26667.67 optimal_fiber_length=0.1044813
        tendon_slack_length=0.1975647 pennation_angle_at_optimal=0.4222225
      PathPoint P1: femur_l (0.01287326 -0.193007 -0.01728695)
      PathPoint P2: femur_l (0.03273487 -0.2546148 -0.0008275669)
      PathPoint P3: patella_l (0.005792968 0.04091859 0.01563182)
      PathPoint P4: patella_l (0.004597594 0.002271211 0.00781591)
      PathPoint P5: tibia_l (0.03437787 -0.06850788 0.007306645)
      PathWrap: wrap_object=KnExt_at_fem_l method=hybrid
    ObjectGroup Pectoralis
    ObjectGroup Rectus_Abdominus
    ObjectGroup Serratus_Anterior
    ObjectGroup Latissimus_Dorsi
    ObjectGroup Trapezius
    ObjectGroup External_Oblique
    ObjectGroup Internal_Oblique
    ObjectGroup SacroSpinalis
    ObjectGroup TransversoSpinalis
    ObjectGroup Psoas_Major
    ObjectGroup Quadratus_Laborum
    ObjectGroup Neck
    ObjectGroup Shoulder
    ObjectGroup Transversus_Abdominus
    ObjectGroup Ext_IS1_R
    ObjectGroup Ext_IS1_L
    ObjectGroup Ext_IS2_R
    ObjectGroup Ext_IS2_L
    ObjectGroup Ext_IS3_R
    ObjectGroup Ext_IS3_L
    ObjectGroup Ext_IS4_R
    ObjectGroup Ext_IS4_L
    ObjectGroup Ext_IS5_R
    ObjectGroup Ext_IS5_L
    ObjectGroup Ext_IS6_R
    ObjectGroup Ext_IS6_L
    ObjectGroup Ext_IS7_R
    ObjectGroup Ext_IS7_L
    ObjectGroup Ext_IS8_R
    ObjectGroup Ext_IS8_L
    ObjectGroup Ext_IS9_R
    ObjectGroup Ext_IS9_L
    ObjectGroup Ext_IS10_R
    ObjectGroup Ext_IS10_L
    ObjectGroup Ext_IS11_R
    ObjectGroup Ext_IS11_L
    ObjectGroup Int_IS1_R
    ObjectGroup Int_IS1_L
    ObjectGroup Int_IS2_R
    ObjectGroup Int_IS2_L
    ObjectGroup Int_IS3_R
    ObjectGroup Int_IS3_L
    ObjectGroup Int_IS4_R
    ObjectGroup Int_IS4_L
    ObjectGroup Int_IS5_R
    ObjectGroup Int_IS5_L
    ObjectGroup Int_IS6_R
    ObjectGroup Int_IS6_L
    ObjectGroup Int_IS7_R
    ObjectGroup Int_IS7_L
    ObjectGroup Int_IS8_R
    ObjectGroup Int_IS8_L
    ObjectGroup Int_IS9_R
    ObjectGroup Int_IS9_L
    ObjectGroup Int_IS10_R
    ObjectGroup Int_IS10_L
    ObjectGroup Int_IS11_R
    ObjectGroup Int_IS11_L
  MarkerSet:
    Marker RASI: pelvis (0.01164437 -0.005729851 0.118864)
    Marker RPSI: pelvis (-0.173869 0.0245474 0.0387958)
    Marker LPSI: pelvis (-0.173869 0.0245474 -0.0387958)
    Marker LASI: pelvis (0.02 0.003186321 -0.129965)
    Marker PE01: pelvis (-0.16275 0.0572935 0)
    Marker PE02: pelvis (-0.183354 0.00350782 0.0272992)
    Marker PE03: pelvis (-0.183354 0.00350782 -0.0272992)
    Marker RTH1: femur_r (0.023547 -0.203959 0.0710276)
    Marker RTH2: femur_r (0.0242325 -0.2840295 0.06325364)
    Marker RTH3: femur_r (0.05670276 -0.2427291 0.05634169)
    Marker RGT: femur_r (-0.01983611 -0.017736 0.08877003)
    Marker RKNE: femur_r (0 -0.404 0.05)
    Marker RMKNE: femur_r (0 -0.404 -0.05)
    Marker LTH1: femur_l (0.02742242 -0.2086436 -0.05363229)
    Marker LTH2: femur_l (0.01433705 -0.2907648 -0.05203325)
    Marker LTH3: femur_l (0.05953252 -0.2505215 -0.03339388)
    Marker LGT: femur_l (-0.0198361 -0.017736 -0.08877)
    Marker LKNE: femur_l (0 -0.404 -0.05)
    Marker LMKNE: femur_l (0 -0.404 0.05)
    Marker RTB1: tibia_r (-0.003329419 -0.1375237 0.06100144)
    Marker RTB2: tibia_r (-0.03543787 -0.1817539 0.05901862)
    Marker RTB3: tibia_r (0.009878009 -0.2311734 0.06141852)
    Marker RANK: tibia_r (-0.005 -0.3787921 0.053)
    Marker RMMA: tibia_r (0.006 -0.3762217 -0.038)
    Marker LTB1: tibia_l (-0.01272817 -0.132447 -0.07126059)
    Marker LTB2: tibia_l (0.02852891 -0.1784399 -0.06783055)
    Marker LTB3: tibia_l (-0.00891332 -0.236946 -0.06818173)
    Marker LANK: tibia_l (-0.005 -0.3821967 -0.053)
    Marker LMMA: tibia_l (0.006 -0.379687 0.038)
    Marker RHEE: calcn_r (-0.02 0.02 0)
    Marker RD5M: calcn_r (0.1414051 0.005871773 0.05741422)
    Marker RTOE: calcn_r (0.1831622 0.01409862 -0.0004964931)
    Marker LHEE: calcn_l (-0.02 0.02 0)
    Marker LD5M: calcn_l (0.1400001 0.002781573 -0.05921282)
    Marker LTOE: calcn_l (0.1905133 0.01259481 -0.0003006475)
    Marker ASIS_r: pelvis (0.0005878896 -0.003873502 0.1262213)
    Marker ASIS_l: pelvis (0.00058789 -0.003874 -0.126221)
    Marker PSIS_r: pelvis (-0.13795 0.017538 0.0398034)
    Marker PSIS_l: pelvis (-0.13795 0.017538 -0.0398034)
    Marker knee_r_med: femur_r (-5e-7 -0.404425 -0.03726)
    Marker knee_l_med: femur_l (-5e-7 -0.404425 0.03726)
    Marker knee_r_lat: femur_r (-5e-7 -0.404425 0.03774)
    Marker knee_l_lat: femur_l (-5e-7 -0.404425 -0.03774)
    Marker tibia_l_med: tibia_l (-0.00293574 -0.0350848 0.03149474)
    Marker tibia_r_med: tibia_r (-0.00293574 -0.0350848 -0.03149474)
    Marker tibia_l_lat: tibia_l (-0.00293574 -0.0330848 -0.03867426)
    Marker tibia_r_lat: tibia_r (-0.00293574 -0.0330848 0.03867426)
    Marker ankle_l_med: tibia_l (0.001076122 -0.3799941 0.03013977)
    Marker ankle_r_med: tibia_r (0.00107616 -0.3799941 -0.03013974)
    Marker ankle_l_lat: tibia_l (-0.01539344 -0.3841191 -0.03867426)
    Marker ankle_r_lat: tibia_r (-0.01539344 -0.3841191 0.03867426)
    Marker femur_l_center_in_pelvis: pelvis (-0.056276 -0.07849 -0.07726) fixed=true
    Marker femur_l_center: femur_l (0 0 0) fixed=true
    Marker femur_r_center_in_pelvis: pelvis (-0.056276 -0.07849 0.07726) fixed=true
    Marker femur_r_center: femur_r (0 0 0) fixed=true
    Marker patella_l_in_femur_l: femur_l (0.04431 -0.41876 0)
    Marker patella_l: patella_l (0 0 0)
    Marker patella_r_in_femur_r: femur_r (0.04431 -0.41876 0)
    Marker patella_r: patella_r (0 0 0)
    Marker knee_l_center_in_femur_l: femur_l (-4.6e-7 -0.4044252 0.00126526)
    Marker knee_l_center: tibia_l (0 0 0)
    Marker knee_r_center_in_femur_r: femur_r (-5e-7 -0.404425 -0.0012653)
    Marker knee_r_center: tibia_r (0 0 0)
    Marker tibia_l_center: tibia_l (-0.00293574 -0.0340848 -0.00358976)
    Marker tibia_r_center: tibia_r (-0.00293574 -0.0340848 0.00358976)
    Marker pelvis_origin_in_ground: ground (0.00058789 0.926126 0)
    Marker ilium_r: pelvis (-0.06868106 0.0801894 0.09312606)
    Marker ilium_l: pelvis (-0.0686811 0.08018135 -0.0931261)
    Marker isch_spine_r: pelvis (-0.1091938 -0.06979188 0.05020122)
    Marker isch_spine_l: pelvis (-0.109194 -0.069792 -0.0502012)
    Marker isch_tuber_r: pelvis (-0.115 -0.104 0.046)
    Marker isch_tuber_l: pelvis (-0.115 -0.104 -0.046)
    Marker isch_infer_r: pelvis (-0.074 -0.133 0.035)
    Marker isch_infer_l: pelvis (-0.074 -0.133 -0.035)
    Marker pub_infer_c: pelvis (-0.02531049 -0.1046535 0)
    Marker gr_troch_as_r: femur_r (-0.000646221 -0.0134011 0.0491692)
    Marker gr_troch_as_l: femur_l (-0.0006462206 -0.0134011 -0.04916924)
    Marker gr_troch_lat_r: femur_r (-0.022 -0.025 0.06)
    Marker gr_troch_lat_l: femur_l (-0.022 -0.025 -0.06)
    Marker femur_r_midshaft_anter: femur_r (0.028 -0.2 0.03)
    Marker femur_r_midshaft_poster: femur_r (0.007203118 -0.2 0.03)
    Marker femur_l_midshaft_anter: femur_l (0.028 -0.2 -0.03) fixed=true
    Marker femur_l_midshaft_poster: femur_l (0.006 -0.2 -0.03) fixed=true
    Marker patella_sup_r: patella_r (0.001278442 0.05216223 0.001440599)
    Marker patella_sup_l: patella_l (0.001278456 0.0521627 -0.001440638)
    Marker patella_lat_r: patella_r (0.004 0.036 0.027)
    Marker patella_med_r: patella_r (0.0004 0.036 -0.027)
    Marker patella_lat_l: patella_l (0.004 0.036 -0.027) fixed=true
    Marker patella_med_l: patella_l (0.0004 0.036 0.027)
    Marker patella_r_anter: patella_r (0.01518533 0.03567004 -0.0008965813)
    Marker patella_l_anter: patella_l (0.0151853 0.0356764 0.0008966)
    Marker ankle_r_center: tibia_r (-0.00715862 -0.3820565 0.0042673) fixed=true
    Marker ankle_l_center: tibia_l (-0.00715864 -0.3820565 -0.00426725)
    Marker talus_r_center_in_tibia: tibia_r (-0.01 -0.4 4.163336e-17) fixed=true
    Marker talus_l_center_in_tibia: tibia_l (-0.01 -0.4 6.140921e-18) fixed=true
    Marker tibia_r_midshaft_anter: tibia_r (0.0225119 -0.2 0.0114803)
    Marker tibia_r_midshaft_poster: tibia_r (-0.0031791 -0.2 0.000541631)
    Marker fibula_r_midshaft_anter: tibia_r (-0.014 -0.2 0.0262986)
    Marker tibia_l_midshaft_anter: tibia_l (0.0225119 -0.2 -0.0114803)
    Marker tibia_l_midshaft_poster: tibia_l (-0.00285164 -0.2 -0.000645222)
    Marker fibula_l_midshaft_anter: tibia_l (-0.014 -0.2 -0.0275513)
    Marker fibula_r_as: tibia_r (-0.00541119 -0.06335043 0.01889838)
    Marker fibula_l_as: tibia_l (-0.005585158 -0.06258272 -0.01974757)
    Marker tibia_r_epiph_yellow_posteriormost: tibia_r (-0.02755654 -0.0360848 0.00358976)
    Marker tibia_r_epiph_yellow_anterior_plate: tibia_r (0.01655949 -0.02629172 0.00358976)
    Marker tibia_r_epiph_yellow_patel_tend_point: tibia_r (0.026 -0.063 0)
    Marker tibia_r_epiph_green_medial_lower_epiph: tibia_r (-0.00293574 -0.0590848 -0.01599474)
    Marker tibia_l_epiph_yellow_posteriormost: tibia_l (-0.02755654 -0.0360848 -0.00358976)
    Marker tibia_l_epiph_yellow_anterior_plate: tibia_l (0.01655946 -0.0262918 -0.00358976)
    Marker tibia_l_epiph_yellow_patel_tend_point: tibia_l (0.026 -0.063 0)
    Marker tibia_l_epiph_green_medial_lower_epiph: tibia_l (-0.00293574 -0.0590848 0.01599474)
    Marker tibia_r_ankle_yellow_anter: tibia_r (0.01259685 -0.37 0.001267338)
    Marker tibia_l_ankle_yellow_anter: tibia_l (0.0125968 -0.37 0.00126734)
    Marker torso_origin_in_pelvis: pelvis (-0.1007 0.0815 0)
    Marker fibula_r_lat_malleol_tip: tibia_r (-0.0194649 -0.406086 0.0220061)
    Marker fibula_l_lat_malleol_tip: tibia_l (-0.01946486 -0.4060858 -0.02200606)
    Marker tibia_r_med_malleol_tip: tibia_r (0.002836346 -0.3939046 -0.01872064)
    Marker tibia_l_med_malleol_tip: tibia_l (0.00283635 -0.393905 0.0187206)
    Marker pub_super_c: pelvis (0 -0.0804468 0)
    Marker ls_troch_r: femur_r (-0.027039 -0.0553422 0.00945148)
    Marker ls_troch_l: femur_l (-0.02703904 -0.05534216 -0.009451484)
    Marker femur_r_poster_diaph_25: femur_r (-0.016 -0.1 0.042) fixed=true
    Marker femur_l_poster_diaph_25: femur_l (-0.016 -0.1 -0.042)
    Marker femur_r_poster_diaph_75: femur_r (0.01 -0.3 0.015)
    Marker femur_l_poster_diaph_75: femur_l (0.01 -0.3 -0.015)
    Marker tibia_r_anter_diaph_25: tibia_r (0.0244496 -0.1 0.010448)
    Marker tibia_l_anter_diaph_25: tibia_l (0.0244496 -0.1 -0.0104481)
    Marker tibia_r_anter_diaph_75: tibia_r (0.0173321 -0.3 0.00752694)
    Marker tibia_l_anter_diaph_75: tibia_l (0.0173321 -0.3 -0.00752696)
    Marker fibula_r_anter_diaph_75: tibia_r (-0.0113925 -0.3 0.0226023)
    Marker fibula_l_anter_diaph_75: tibia_l (-0.009805397 -0.3 -0.0226023)
    Marker femur_r_anter_diaph_25: femur_r (0.01178759 -0.100861 0.0360354)
    Marker femur_l_anter_diaph_25: femur_l (0.0117876 -0.100861 -0.04095034)
    Marker gr_troch_ps_r: femur_r (-0.032864 -0.0005749 0.035505) fixed=true
    Marker gr_troch_ps_l: femur_l (-0.032864 -0.0005749 -0.035505)
    Marker sacroiliac_r: pelvis (-0.1205529 0.009244229 0.03666609)
    Marker sacroiliac_l: pelvis (-0.120553 0.00924423 -0.0366661)
    Marker 5th_sacr_v: pelvis (-0.1309516 -0.06174588 0) fixed=true
    Marker femur_r_anter_diaph_75: femur_r (0.0335734 -0.3 0.015)
    Marker femur_l_anter_diaph_75: femur_l (0.0335734 -0.3 -0.015)
    Marker AIIS_r: pelvis (-0.024 -0.039 0.093) fixed=true
    Marker AIIS_l: pelvis (-0.024 -0.039 -0.093)
    Marker femur_neck_center_r: femur_r (-0.0058027 -0.015853 0.022129) fixed=true
    Marker femur_neck_center_l: femur_l (-0.005802656 -0.01585274 -0.022129)
    Marker femur_shaft_center_r: femur_r (-0.01415189 -0.05445285 0.03752273)
    Marker femur_shaft_center_l: femur_l (-0.0141519 -0.0544529 -0.0375227)
