# OpenSim document version 40500
MarkerSet:
  Marker C7: torso (-0.08095856 0.4277276 0.0013237)
  Marker RBAK: torso (-0.08032022 0.3615247 0.1011298)
  Marker CLAV: torso (0.03680405 0.3850151 0.003243129)
  Marker STRN: torso (0.1060991 0.2285942 -0.002660153)
  Marker T10: torso (-0.09188331 0.2045816 0.002340962)
  Marker RASI: pelvis (0.01164437 -0.005729851 0.118864)
  Marker RPSI: pelvis (-0.1635557 0.05622893 0.04611898)
  Marker LPSI: pelvis (-0.163934 0.0635104 -0.04157903)
  Marker LASI: pelvis (0.02 0.003186321 -0.129965)
  Marker PE01: pelvis (-0.1501698 0.1031958 0.004370384)
  Marker PE02: pelvis (-0.169545 0.03890012 0.02729919)
  Marker PE03: pelvis (-0.1710815 0.04224583 -0.02737824)
  Marker RTH1: femur_r (0.023547 -0.203959 0.0710276)
  Marker RTH2: femur_r (0.0242325 -0.2840295 0.06325364)
  Marker RTH3: femur_r (0.05670276 -0.2427291 0.05634169)
  Marker RGT: femur_r (-0.01983611 -0.017736 0.08877003)
  Marker RKNE: femur_r (0 -0.404 0.05)
  Marker RMKNE: femur_r (0 -0.404 -0.05)
  Marker LTH1: femur_l (0.02742242 -0.2086436 -0.05363229)
  Marker LTH2: femur_l (0.01433705 -0.2907648 -0.05203325)
  Marker LTH3: femur_l (0.05953252 -0.2505215 -0.03339388)
  Marker LGT: femur_l (-0.0198361 -0.017736 -0.08877)
  Marker LKNE: femur_l (0 -0.404 -0.05)
  Marker LMKNE: femur_l (0 -0.404 0.05)
  Marker RTB1: tibia_r (-0.003329419 -0.1375237 0.06100144)
  Marker RTB2: tibia_r (-0.03543787 -0.1817539 0.05901862)
  Marker RTB3: tibia_r (0.009878009 -0.2311734 0.06141852)
  Marker RANK: tibia_r (-0.005 -0.3787921 0.053)
  Marker RMMA: tibia_r (0.006 -0.3762217 -0.038)
  Marker LTB1: tibia_l (-0.01272817 -0.132447 -0.07126059)
  Marker LTB2: tibia_l (0.02852891 -0.1784399 -0.06783055)
  Marker LTB3: tibia_l (-0.00891332 -0.236946 -0.06818173)
  Marker LANK: tibia_l (-0.005 -0.3821967 -0.053)
  Marker LMMA: tibia_l (0.006 -0.379687 0.038)
  Marker RHEE: calcn_r (-0.02 0.02 0)
  Marker RD5M: calcn_r (0.1414051 0.005871773 0.05741422)
  Marker RTOE: calcn_r (0.1831622 0.01409862 -0.0004964931)
  Marker LHEE: calcn_l (-0.02 0.02 0)
  Marker LD5M: calcn_l (0.1400001 0.002781573 -0.05921282)
  Marker LTOE: calcn_l (0.1905133 0.01259481 -0.0003006475)
