# OpenSim document version 40000
ScaleTool Rajagopal-generic-scaled:
  ModelScaler:
    apply: false
    scaling_order: measurements
    preserve_mass_distribution: true
  MarkerPlacer:
    apply: true
    marker_file: ../Session2/Static03/task.trc
    time_range: 0 3.295
    max_marker_movement: -1
    IKTaskSet:
      IKMarkerTask C7: apply=true weight=1
      IKMarkerTask RBAK: apply=true weight=1
      IKMarkerTask CLAV: apply=true weight=1
      IKMarkerTask STRN: apply=true weight=1
      IKMarkerTask T10: apply=true weight=1
      IKMarkerTask RASI: apply=true weight=1
      IKMarkerTask RPSI: apply=true weight=1
      IKMarkerTask LPSI: apply=true weight=1
      IKMarkerTask LASI: apply=true weight=1
      IKMarkerTask PE01: apply=true weight=1
      IKMarkerTask PE02: apply=true weight=1
      IKMarkerTask PE03: apply=true weight=1
      IKMarkerTask RTH1: apply=false weight=1
      IKMarkerTask RTH2: apply=false weight=1
      IKMarkerTask RTH3: apply=false weight=1
      IKMarkerTask RGT: apply=true weight=1
      IKMarkerTask RKNE: apply=true weight=1
      IKMarkerTask RMKNE: apply=true weight=1
      IKMarkerTask LTH1: apply=false weight=1
      IKMarkerTask LTH2: apply=false weight=1
      IKMarkerTask LTH3: apply=false weight=1
      IKMarkerTask LGT: apply=true weight=1
      IKMarkerTask LKNE: apply=true weight=1
      IKMarkerTask LMKNE: apply=true weight=1
      IKMarkerTask RTB1: apply=false weight=1
      IKMarkerTask RTB2: apply=false weight=1
      IKMarkerTask RTB3: apply=false weight=1
      IKMarkerTask RANK: apply=true weight=1
      IKMarkerTask RMMA: apply=true weight=1
      IKMarkerTask LTB1: apply=false weight=1
      IKMarkerTask LTB2: apply=false weight=1
      IKMarkerTask LTB3: apply=false weight=1
      IKMarkerTask LANK: apply=true weight=1
      IKMarkerTask LMMA: apply=true weight=1
      IKMarkerTask RHEE: apply=true weight=1
      IKMarkerTask RD5M: apply=true weight=1
      IKMarkerTask RTOE: apply=true weight=1
      IKMarkerTask LHEE: apply=true weight=1
      IKMarkerTask LD5M: apply=true weight=1
      IKMarkerTask LTOE: apply=true weight=1
