# OpenSim document version 40000
MarkerSet:
  Marker torso_origin_in_pelvis: torso (0 0 0) fixed=true
  Marker femur_l_center_in_pelvis: femur_l (0 0 0) fixed=true
  Marker femur_r_center_in_pelvis: femur_r (0 0 0) fixed=true
  Marker patella_l_in_femur_l: patella_l (0 0 0)
  Marker patella_r_in_femur_r: patella_r (0 0 0)
  Marker knee_l_center_in_femur_l: tibia_l (0 0 0)
  Marker knee_r_center_in_femur_r: tibia_r (0 0 0)
  Marker talus_r_center_in_tibia: talus_r (0 0 0) fixed=true
  Marker talus_l_center_in_tibia: talus_l (0 0 0) fixed=true
