# OpenSim document version 40000
ForceSet LowerBody_RRA:
  PointActuator FX: body=pelvis point=(-0.08006436 0 0) direction=(1 0 0) optimal_force=1
  PointActuator FY: body=pelvis point=(-0.08006436 0 0) direction=(0 1 0) optimal_force=1
  PointActuator FZ: body=pelvis point=(-0.08006436 0 0) direction=(0 0 1) optimal_force=1
  TorqueActuator MX: bodyA=pelvis bodyB=ground axis=(1 0 0) optimal_force=1
  TorqueActuator MY: bodyA=pelvis bodyB=ground axis=(0 1 0) optimal_force=1
  TorqueActuator MZ: bodyA=pelvis bodyB=ground axis=(0 0 1) optimal_force=1
  CoordinateActuator hip_flexion_r_reserve: min_control=-1 max_control=1 coordinate=hip_flexion_r
      optimal_force=4.645245
  CoordinateActuator hip_adduction_r_reserve: min_control=-1 max_control=1 coordinate=hip_adduction_r
      optimal_force=1.538313
  CoordinateActuator hip_rotation_r_reserve: min_control=-1 max_control=1 coordinate=hip_rotation_r
      optimal_force=5.17621
  CoordinateActuator knee_angle_r_reserve: min_control=-1 max_control=1 coordinate=knee_angle_r optimal_force=10.44587
  CoordinateActuator patella_r_constrained_knee_angle_reserve: min_control=-1 max_control=1
      coordinate=patella_r_constrained_knee_angle optimal_force=1
  CoordinateActuator ankle_angle_r_reserve: min_control=-1 max_control=1 coordinate=ankle_angle_r
      optimal_force=2.036412
  CoordinateActuator hip_flexion_l_reserve: min_control=-1 max_control=1 coordinate=hip_flexion_l
      optimal_force=4.892499
  CoordinateActuator hip_adduction_l_reserve: min_control=-1 max_control=1 coordinate=hip_adduction_l
      optimal_force=3.771526
  CoordinateActuator hip_rotation_l_reserve: min_control=-1 max_control=1 coordinate=hip_rotation_l
      optimal_force=5.877896
  CoordinateActuator knee_angle_l_reserve: min_control=-1 max_control=1 coordinate=knee_angle_l optimal_force=6.891114
  CoordinateActuator patella_l_constrained_knee_angle_reserve: min_control=-1 max_control=1
      coordinate=patella_l_constrained_knee_angle optimal_force=1
  CoordinateActuator ankle_angle_l_reserve: min_control=-1 max_control=1 coordinate=ankle_angle_l
      optimal_force=4.776806
  CoordinateActuator lumbar_extension_reserve: min_control=-1 max_control=1 coordinate=lumbar_extension
      optimal_force=21.19635
  CoordinateActuator lumbar_bending_reserve: min_control=-1 max_control=1 coordinate=lumbar_bending
      optimal_force=2.545262
  CoordinateActuator lumbar_rotation_reserve: min_control=-1 max_control=1 coordinate=lumbar_rotation optimal_force=1
