# OpenSim document version 40500
ScaleTool Rajagopal-generic-scaled-scaled:
  mass: 65 [kg]
  height: -1
  age: -1
  ModelScaler:
    apply: true
    time_range: -1 -1
    preserve_mass_distribution: false
  MarkerPlacer:
    apply: true
    marker_file: ../../Python/static/Static04/task.trc
    time_range: 0 2.26
    max_marker_movement: -1
    IKTaskSet:
      IKMarkerTask C7: apply=true weight=1
      IKMarkerTask RBAK: apply=true weight=1
      IKMarkerTask CLAV: apply=true weight=1
      IKMarkerTask STRN: apply=true weight=1
      IKMarkerTask T10: apply=true weight=1
      IKMarkerTask RASI: apply=true weight=1
      IKMarkerTask RPSI: apply=true weight=1
      IKMarkerTask LPSI: apply=true weight=1
      IKMarkerTask LASI: apply=true weight=1
      IKMarkerTask PE01: apply=true weight=1
      IKMarkerTask PE02: apply=true weight=1
      IKMarkerTask PE03: apply=true weight=1
      IKMarkerTask RTH1: apply=true weight=1
      IKMarkerTask RTH2: apply=true weight=1
      IKMarkerTask RTH3: apply=true weight=1
      IKMarkerTask RGT: apply=true weight=1
      IKMarkerTask RKNE: apply=true weight=1
      IKMarkerTask RMKNE: apply=true weight=1
      IKMarkerTask LTH1: apply=true weight=1
      IKMarkerTask LTH2: apply=true weight=1
      IKMarkerTask LTH3: apply=true weight=1
      IKMarkerTask LGT: apply=true weight=1
      IKMarkerTask LKNE: apply=true weight=1
      IKMarkerTask LMKNE: apply=true weight=1
      IKMarkerTask RTB1: apply=true weight=1
      IKMarkerTask RTB2: apply=true weight=1
      IKMarkerTask RTB3: apply=true weight=1
      IKMarkerTask RANK: apply=true weight=1
      IKMarkerTask RMMA: apply=true weight=1
      IKMarkerTask LTB1: apply=true weight=1
      IKMarkerTask LTB2: apply=true weight=1
      IKMarkerTask LTB3: apply=true weight=1
      IKMarkerTask LANK: apply=true weight=1
      IKMarkerTask LMMA: apply=true weight=1
      IKMarkerTask RHEE: apply=true weight=1
      IKMarkerTask RD5M: apply=true weight=1
      IKMarkerTask RTOE: apply=true weight=1
      IKMarkerTask LHEE: apply=true weight=1
      IKMarkerTask LD5M: apply=true weight=1
      IKMarkerTask LTOE: apply=true weight=1
      IKMarkerTask torso_origin_in_pelvis: apply=false weight=1
      IKMarkerTask femur_l_center_in_pelvis: apply=false weight=1
      IKMarkerTask femur_r_center_in_pelvis: apply=false weight=1
      IKMarkerTask patella_l_in_femur_l: apply=false weight=1
      IKMarkerTask patella_r_in_femur_r: apply=false weight=1
      IKMarkerTask knee_l_center_in_femur_l: apply=false weight=1
      IKMarkerTask knee_r_center_in_femur_r: apply=false weight=1
      IKMarkerTask talus_r_center_in_tibia: apply=false weight=1
      IKMarkerTask talus_l_center_in_tibia: apply=false weight=1
