# OpenSim document version 40000
MarkerSet:
  Marker C7: torso (-0.09358611 0.3957897 0.008248079)
  Marker RBAK: torso (-0.1143016 0.2921329 0.09129047)
  Marker CLAV: torso (0.04925415 0.3468967 -0.009504952)
  Marker STRN: torso (0.1557388 0.1773966 -0.0244817)
  Marker T10: torso (-0.04968319 0.09929235 0.006649346)
  Marker RASI: pelvis (0.03680308 -0.007349793 0.1074744)
  Marker RPSI: pelvis (-0.1602708 0.03206032 0.04802157)
  Marker LPSI: pelvis (-0.1586023 0.02891838 -0.03732938)
  Marker LASI: pelvis (0.0430756 -0.007948472 -0.1153467)
  Marker PE01: pelvis (-0.1472175 0.06480051 0.002630838)
  Marker PE02: pelvis (-0.1733267 0.009183393 0.02725557)
  Marker PE03: pelvis (-0.1704861 0.007673158 -0.02350174)
  Marker RTH1: femur_r (-0.02676855 -0.223214 0.06195122)
  Marker RTH2: femur_r (-0.01159283 -0.3014987 0.0567361)
  Marker RTH3: femur_r (0.01741499 -0.2473022 0.06020236)
  Marker RGT: femur_r (-0.0186947 -0.02178853 0.08789614)
  Marker RKNE: femur_r (-0.01034793 -0.3688883 0.05076987)
  Marker RMKNE: femur_r (0.01349313 -0.3804167 -0.05879468)
  Marker LTH1: femur_l (-0.01845051 -0.1948858 -0.06481266)
  Marker LTH2: femur_l (-0.04425711 -0.2488899 -0.05413535)
  Marker LTH3: femur_l (0.02697138 -0.2166528 -0.06502634)
  Marker LGT: femur_l (-0.02260817 -0.02822194 -0.09002871)
  Marker LKNE: femur_l (-0.007647874 -0.37224 -0.04701459)
  Marker LMKNE: femur_l (0.0118703 -0.3792971 0.05395735)
  Marker RTB1: tibia_r (0.01026052 -0.1518104 0.0610344)
  Marker RTB2: tibia_r (-0.03070258 -0.1975151 0.06618674)
  Marker RTB3: tibia_r (0.006488333 -0.2306313 0.05735396)
  Marker RANK: tibia_r (-0.01428341 -0.400203 0.03607394)
  Marker RMMA: tibia_r (0.009595781 -0.37108 -0.03738399)
  Marker LTB1: tibia_l (-0.05725715 -0.1620798 -0.06656998)
  Marker LTB2: tibia_l (-0.05165425 -0.2410449 -0.05673591)
  Marker LTB3: tibia_l (-0.01508465 -0.2080495 -0.05971127)
  Marker LANK: tibia_l (-0.005185859 -0.3840046 -0.03950869)
  Marker LMMA: tibia_l (0.006188283 -0.3673532 0.03900756)
  Marker RHEE: calcn_r (-0.001114356 0.032226 -8.457255e-5)
  Marker RD5M: calcn_r (0.1559965 -0.000325205 0.04316179)
  Marker RTOE: calcn_r (0.1882398 0.02744342 -0.009914271)
  Marker LHEE: calcn_l (-0.002168921 0.04772796 -0.006524389)
  Marker LD5M: calcn_l (0.1498071 0.005121732 -0.03959795)
  Marker LTOE: calcn_l (0.1905823 0.02796036 0.01255326)
  Marker torso_origin_in_pelvis: pelvis (-0.07455525 0.05467599 0.00537912) fixed=true
  Marker femur_l_center_in_pelvis: pelvis (-0.0445027 -0.07702909 -0.07830903) fixed=true
  Marker femur_r_center_in_pelvis: pelvis (-0.05026991 -0.07639125 0.08498899) fixed=true
  Marker patella_l_in_femur_l: femur_l (0.04631609 -0.3968535 0.00204467)
  Marker patella_r_in_femur_r: femur_r (0.04494064 -0.39362 0.00491096)
  Marker knee_l_center_in_femur_l: femur_l (7.466849e-10 -0.3796717 -2.488953e-10)
  Marker knee_r_center_in_femur_r: femur_r (3.356809e-10 -0.375686 -1.118936e-10)
  Marker talus_r_center_in_tibia: tibia_r (-0.01 -0.4 -6.140921e-18) fixed=true
  Marker talus_l_center_in_tibia: tibia_l (-0.01 -0.4 6.140921e-18) fixed=true
