# OpenSim document version 40000
ScaleTool Rajagopal-generic-scaled:
  mass: 55
  height: 1.6
  age: 50
  GenericModelMaker:
    model_file: RajagopalModified_generic_copy.osim
    marker_set_file: scaling_EXP_Markers_to_Scale_final_3.xml
  ModelScaler:
    apply: true
    scaling_order: measurements
    marker_file: D:\Docs_ASUS\WORK\hip\MotionStudy\MotionData\003\P03\Python\static\Static03\task.trc
    time_range: 0 3.295
    preserve_mass_distribution: true
    output_model_file: scaled_model_P03.osim
    output_scale_file: output_scale_file_P03.txt
    MeasurementSet:
      Measurement pelvis width: apply=true
        MarkerPair: markers=(LASI RASI)
        MarkerPair: markers=(LPSI RPSI)
        BodyScale pelvis: axes=(X Z)
      Measurement pelvis height: apply=true
        MarkerPair: markers=(LASI LMKNE)
        MarkerPair: markers=(RASI RMKNE)
        BodyScale pelvis: axes=Y
      Measurement torso height: apply=true
        MarkerPair: markers=(PE01 C7)
        BodyScale torso: axes=(Y Z)
      Measurement torso depth: apply=true
        MarkerPair: markers=(T10 STRN)
        BodyScale torso: axes=X
      Measurement femur_r_length: apply=true
        MarkerPair: markers=(RASI RKNE)
        MarkerPair: markers=(RASI RMKNE)
        BodyScale femur_r: axes=(X Y Z)
        BodyScale patella_r: axes=(X Y Z)
      Measurement femur_l_length: apply=true
        MarkerPair: markers=(LASI LKNE)
        MarkerPair: markers=(LASI LMKNE)
        BodyScale femur_l: axes=(X Y Z)
        BodyScale patella_l: axes=(X Y Z)
      Measurement tibia_r_length: apply=true
        MarkerPair: markers=(RKNE RANK)
        MarkerPair: markers=(RMKNE RMMA)
        BodyScale tibia_r: axes=(X Y Z)
      Measurement tibia_l_length: apply=true
        MarkerPair: markers=(LKNE LANK)
        MarkerPair: markers=(LMKNE LMMA)
        BodyScale tibia_l: axes=(X Y Z)
      Measurement foot_horiz_l: apply=true
        MarkerPair: markers=(LHEE LTOE)
        BodyScale talus_l: axes=(X Z)
        BodyScale calcn_l: axes=(X Z)
        BodyScale toes_l: axes=(X Z)
      Measurement foot_horiz_r: apply=true
        MarkerPair: markers=(RHEE RTOE)
        BodyScale talus_r: axes=(X Z)
        BodyScale calcn_r: axes=(X Z)
        BodyScale toes_r: axes=(X Z)
      Measurement foot_vertic_l: apply=true
        MarkerPair: markers=(LHEE LANK)
        MarkerPair: markers=(LHEE LMMA)
        BodyScale talus_l: axes=Y
        BodyScale calcn_l: axes=Y
        BodyScale toes_l: axes=Y
      Measurement foot_vertic_r: apply=true
        MarkerPair: markers=(RHEE RANK)
        MarkerPair: markers=(RHEE RMMA)
        BodyScale talus_r: axes=Y
        BodyScale calcn_r: axes=Y
        BodyScale toes_r: axes=Y
  MarkerPlacer:
    apply: true
    marker_file: D:\Docs_ASUS\WORK\hip\MotionStudy\MotionData\003\P03\Python\static\Static03\task.trc
    time_range: 0 3.295
    output_model_file: scaled_model_P03.osim
    max_marker_movement: -1
    IKTaskSet:
      IKMarkerTask C7: apply=true weight=1
      IKMarkerTask RBAK: apply=true weight=1
      IKMarkerTask CLAV: apply=true weight=1
      IKMarkerTask STRN: apply=true weight=1
      IKMarkerTask T10: apply=true weight=1
      IKMarkerTask RASI: apply=true weight=1
      IKMarkerTask RPSI: apply=true weight=1
      IKMarkerTask LPSI: apply=true weight=1
      IKMarkerTask LASI: apply=true weight=1
      IKMarkerTask PE01: apply=true weight=1
      IKMarkerTask PE02: apply=true weight=1
      IKMarkerTask PE03: apply=true weight=1
      IKMarkerTask RTH1: apply=false weight=1
      IKMarkerTask RTH2: apply=false weight=1
      IKMarkerTask RTH3: apply=false weight=1
      IKMarkerTask RGT: apply=true weight=1
      IKMarkerTask RKNE: apply=true weight=1
      IKMarkerTask RMKNE: apply=true weight=1
      IKMarkerTask LTH1: apply=false weight=1
      IKMarkerTask LTH2: apply=false weight=1
      IKMarkerTask LTH3: apply=false weight=1
      IKMarkerTask LGT: apply=true weight=1
      IKMarkerTask LKNE: apply=true weight=1
      IKMarkerTask LMKNE: apply=true weight=1
      IKMarkerTask RTB1: apply=false weight=1
      IKMarkerTask RTB2: apply=false weight=1
      IKMarkerTask RTB3: apply=false weight=1
      IKMarkerTask RANK: apply=true weight=1
      IKMarkerTask RMMA: apply=true weight=1
      IKMarkerTask LTB1: apply=false weight=1
      IKMarkerTask LTB2: apply=false weight=1
      IKMarkerTask LTB3: apply=false weight=1
      IKMarkerTask LANK: apply=true weight=1
      IKMarkerTask LMMA: apply=true weight=1
      IKMarkerTask RHEE: apply=true weight=1
      IKMarkerTask RD5M: apply=true weight=1
      IKMarkerTask RTOE: apply=true weight=1
      IKMarkerTask LHEE: apply=true weight=1
      IKMarkerTask LD5M: apply=true weight=1
      IKMarkerTask LTOE: apply=true weight=1
