# OpenSim document version 40500
MarkerSet:
  Marker RASI: pelvis (0.04927749 0.0009472375 0.1125821)
  Marker SACROL: sacrum (-0.1717764 0.04892741 -0.02895607)
  Marker RTHOL: femur_r (0.04139904 -0.1980385 0.1000632)
  Marker RTH2: femur_r (0.07054619 -0.2713821 0.08740897)
  Marker RTH3: femur_r (0.02281263 -0.2572462 0.09350848)
  Marker RKNEL: femur_r (0.01057138 -0.4048925 0.06535597)
  Marker RKNEM: femur_r (-0.005460074 -0.4152399 -0.08367368)
  Marker RSHAOL: tibia_r (-0.02417576 -0.1991606 0.093722)
  Marker RSHA2: tibia_r (0.0232896 -0.2614786 0.0801269)
  Marker RSHA3: tibia_r (-0.02650058 -0.2603025 0.08687096)
  Marker RMALL: tibia_r (-0.01445593 -0.4326574 0.0529214)
  Marker RMALM: tibia_r (0.005153316 -0.4109743 -0.03524274)
  Marker RHEE: calcn_r (-0.01231716 -0.005600977 0.002633087)
  Marker RM5: calcn_r (0.1760916 0.007363102 0.07259058)
  Marker RTOE: calcn_r (0.1959259 0.006454132 -0.02917132)
  Marker LTHOL: femur_l (0.0474969 -0.1690542 -0.1187465)
  Marker LTH2: femur_l (-0.009651213 -0.2233824 -0.106005)
  Marker LTH3: femur_l (0.04032741 -0.2295102 -0.1067755)
  Marker LKNEL: femur_l (0.01246956 -0.4016266 -0.06865877)
  Marker LKNEM: femur_l (-0.003109921 -0.4094306 0.07957373)
  Marker LSHAOL: tibia_l (-0.008193145 -0.1988414 -0.08791083)
  Marker LSHA2: tibia_l (-0.04493492 -0.2688297 -0.08970656)
  Marker LSHA3: tibia_l (0.003056052 -0.2594761 -0.08009176)
  Marker LMALL: tibia_l (-0.01007493 -0.4387431 -0.05488462)
  Marker LMALM: tibia_l (0.003077351 -0.4173244 0.03651694)
  Marker LHEE: calcn_l (-0.01403538 -0.008079666 -0.001014345)
  Marker LM5: calcn_l (0.1678731 -0.005721015 -0.0807601)
  Marker LTOE: calcn_l (0.1953273 0.00585639 0.02941131)
  Marker LASI: pelvis (0.04779942 0.005517918 -0.115022)
  Marker LACR: scapula_L (-0.03635424 0.02084441 0.004015949)
  Marker RACR: scapula_R (-0.03033542 0.02416636 -0.01218802)
  Marker GLAB: head_neck (0.1460327 0.1870616 0.000384974)
  Marker RFHD: head_neck (0.08433956 0.2012534 0.07471774)
  Marker LFHD: head_neck (0.07980871 0.1847528 -0.07610186) fixed=true
  Marker C7: head_neck (-0.07176624 0.05154685 0.001426212)
  Marker T6: thoracic6 (-0.06744445 -0.05269837 -0.008384928)
  Marker T12: thoracic12 (-0.07700994 -0.006215662 -0.003714416)
  Marker SPINMOL: thoracic8 (-0.07490128 -0.02956877 -0.00873188)
  Marker SPINM2: thoracic8 (-0.07439007 -0.08989164 0.04403344)
  Marker SPINM3: thoracic8 (-0.06603896 -0.09085645 -0.005054488)
  Marker SACR2: sacrum (-0.166837 0.05837368 0.02110819)
  Marker SACR3: sacrum (-0.1881314 -0.003337749 0.008360466)
  Marker STRN: sternum (0.03721989 0.006943569 -0.03366735)
  Marker XIPH: sternum (0.07613188 -0.1503352 -0.02861403)
  Marker LUAOL: humerus_L (-0.03920962 -0.100266 -0.02291077)
  Marker LUA2: humerus_L (-0.04821482 -0.1580278 0.008931438)
  Marker LUA3: humerus_L (-0.01372148 -0.1609182 -0.02998495)
  Marker LLAOL: ulna_L (-0.01937167 -0.1068479 -0.04748745)
  Marker LLA2: ulna_L (-0.03776832 -0.1685425 -0.03395658)
  Marker LLA3: ulna_L (0.004520201 -0.1665123 -0.06094526)
  Marker RUAOL: humerus_R (-0.005547498 -0.1136925 0.03273256)
  Marker RUA2: humerus_R (0.0458606 -0.1559747 0.03117716)
  Marker RUA3: humerus_R (0.001292255 -0.1799343 0.03612673)
  Marker RLAOL: ulna_R (0.004890523 -0.1354733 0.06018455)
  Marker RLA2: ulna_R (0.03901262 -0.1912386 0.05602125)
  Marker RLA3: ulna_R (-0.01121823 -0.1984149 0.059089)
  Marker LPSI: pelvis (-0.1625909 0.02152596 -0.04024152)
  Marker RPSI: pelvis (-0.1627124 0.01845959 0.04888936)
  Marker RCUBM: humerus_R (0.03244494 -0.2570424 -0.06976731)
  Marker RCUBL: humerus_R (-0.006296907 -0.236758 0.03094401)
  Marker LCUBM: humerus_L (0.02047311 -0.2592052 0.06477836)
  Marker LCUBL: humerus_L (-0.002434519 -0.2613302 -0.02522669) fixed=true
  Marker RWRU: ulna_R (-0.02273267 -0.2762901 0.04983736)
  Marker RWRR: radius_R (0.03892991 -0.2635686 -0.02412455)
  Marker LWRU: ulna_L (-0.02129846 -0.2638763 -0.04791874)
  Marker LWRR: radius_L (0.0433098 -0.2440473 0.00918708)
  Marker RFIB: tibia_r (-0.02101078 -0.07696551 0.07951642)
  Marker LFIB: tibia_l (-0.01803623 -0.08151657 -0.07677318)
