# OpenSim document version 40500
MarkerSet:
  Marker RASI: pelvis (0.04927749 0.0009472375 0.1125821)
  Marker LASI: pelvis (0.04779942 0.005517918 -0.115022)
  Marker RPSI: pelvis (-0.173869 0.0245474 0.0387958)
  Marker LPSI: pelvis (-0.173869 0.0245474 -0.0387958)
  Marker SACROL: sacrum (-0.1717764 0.04892741 -0.02895607)
  Marker SACR2: sacrum (-0.166837 0.05837368 0.02110819)
  Marker SACR3: sacrum (-0.1881314 -0.003337749 0.008360466)
  Marker RTHOL: femur_r (0.04139904 -0.1980385 0.1000632)
  Marker RTH2: femur_r (0.07054619 -0.2713821 0.08740897)
  Marker RTH3: femur_r (0.02281263 -0.2572462 0.09350848)
  Marker RKNEL: femur_r (0.01057138 -0.4048925 0.06535597)
  Marker RKNEM: femur_r (-0.005460074 -0.4152399 -0.08367368)
  Marker RSHAOL: tibia_r (-0.02417576 -0.1991606 0.093722)
  Marker RSHA2: tibia_r (0.0232896 -0.2614786 0.0801269)
  Marker RSHA3: tibia_r (-0.02650058 -0.2603025 0.08687096)
  Marker RMALL: tibia_r (-0.01445593 -0.4326574 0.0529214)
  Marker RMALM: tibia_r (0.005153316 -0.4109743 -0.03524274)
  Marker RHEE: calcn_r (-0.01231716 -0.005600977 0.002633087)
  Marker RM5: calcn_r (0.1760916 0.007363102 0.07259058)
  Marker RTOE: calcn_r (0.1959259 0.006454132 -0.02917132)
  Marker LTHOL: femur_l (0.0474969 -0.1690542 -0.1187465)
  Marker LTH2: femur_l (-0.009651213 -0.2233824 -0.106005)
  Marker LTH3: femur_l (0.04032741 -0.2295102 -0.1067755)
  Marker LKNEL: femur_l (0.01246956 -0.4016266 -0.06865877)
  Marker LKNEM: femur_l (-0.003109921 -0.4094306 0.07957373)
  Marker LSHAOL: tibia_l (-0.008193145 -0.1988414 -0.08791083)
  Marker LSHA2: tibia_l (-0.04493492 -0.2688297 -0.08970656)
  Marker LSHA3: tibia_l (0.003056052 -0.2594761 -0.08009176)
  Marker LMALL: tibia_l (-0.01007493 -0.4387431 -0.05488462)
  Marker LMALM: tibia_l (0.003077351 -0.4173244 0.03651694)
  Marker LHEE: calcn_l (-0.01403538 -0.008079666 -0.001014345)
  Marker LM5: calcn_l (0.1678731 -0.005721015 -0.0807601)
  Marker LTOE: calcn_l (0.1953273 0.00585639 0.02941131)
