# OpenSim document version 40500
MarkerSet:
  Marker RASI: pelvis (0.04927749 0.0009472375 0.1125821)
  Marker LASI: pelvis (0.04779942 0.005517918 -0.115022)
  Marker RPSI: pelvis (-0.173869 0.0245474 0.0387958)
  Marker LPSI: pelvis (-0.173869 0.0245474 -0.0387958)
  Marker SACROL: sacrum (-0.1717764 0.04892741 -0.02895607)
  Marker SACR2: sacrum (-0.166837 0.05837368 0.02110819)
  Marker SACR3: sacrum (-0.1881314 -0.003337749 0.008360466)
  Marker RTHOL: femur_r (0.04139904 -0.1980385 0.1000632)
  Marker RTH2: femur_r (0.07054619 -0.2713821 0.08740897)
  Marker RTH3: femur_r (0.02281263 -0.2572462 0.09350848)
  Marker RKNEL: femur_r (0.01057138 -0.4048925 0.06535597)
  Marker RKNEM: femur_r (-0.005460074 -0.4152399 -0.08367368)
  Marker RSHAOL: tibia_r (-0.02417576 -0.1991606 0.093722)
  Marker RSHA2: tibia_r (0.0232896 -0.2614786 0.0801269)
  Marker RSHA3: tibia_r (-0.02650058 -0.2603025 0.08687096)
  Marker RMALL: tibia_r (-0.01445593 -0.4326574 0.0529214)
  Marker RMALM: tibia_r (0.005153316 -0.4109743 -0.03524274)
  Marker RHEE: calcn_r (-0.01231716 -0.005600977 0.002633087)
  Marker RM5: calcn_r (0.1760916 0.007363102 0.07259058)
  Marker RTOE: calcn_r (0.1959259 0.006454132 -0.02917132)
  Marker LTHOL: femur_l (0.0474969 -0.1690542 -0.1187465)
  Marker LTH2: femur_l (-0.009651213 -0.2233824 -0.106005)
  Marker LTH3: femur_l (0.04032741 -0.2295102 -0.1067755)
  Marker LKNEL: femur_l (0.01246956 -0.4016266 -0.06865877)
  Marker LKNEM: femur_l (-0.003109921 -0.4094306 0.07957373)
  Marker LSHAOL: tibia_l (-0.008193145 -0.1988414 -0.08791083)
  Marker LSHA2: tibia_l (-0.04493492 -0.2688297 -0.08970656)
  Marker LSHA3: tibia_l (0.003056052 -0.2594761 -0.08009176)
  Marker LMALL: tibia_l (-0.01007493 -0.4387431 -0.05488462)
  Marker LMALM: tibia_l (0.003077351 -0.4173244 0.03651694)
  Marker LHEE: calcn_l (-0.01403538 -0.008079666 -0.001014345)
  Marker LM5: calcn_l (0.1678731 -0.005721015 -0.0807601)
  Marker LTOE: calcn_l (0.1953273 0.00585639 0.02941131)
  Marker PE02: pelvis (-0.183354 0.00350782 0.0272992)
  Marker PE03: pelvis (-0.183354 0.00350782 -0.0272992)
  Marker RGT: femur_r (-0.01983611 -0.017736 0.08877003)
  Marker ASIS_r: pelvis (0.0005878896 -0.003873502 0.1262213)
  Marker ASIS_l: pelvis (0.00058789 -0.003874 -0.126221)
  Marker PSIS_r: pelvis (-0.13795 0.017538 0.0398034)
  Marker PSIS_l: pelvis (-0.13795 0.017538 -0.0398034)
  Marker knee_r_med: femur_r (-5e-7 -0.404425 -0.03726)
  Marker knee_l_med: femur_l (-5e-7 -0.404425 0.03726)
  Marker knee_r_lat: femur_r (-5e-7 -0.404425 0.03774)
  Marker knee_l_lat: femur_l (-5e-7 -0.404425 -0.03774)
  Marker tibia_l_med: tibia_l (-0.00293574 -0.0350848 0.03149474)
  Marker tibia_r_med: tibia_r (-0.00293574 -0.0350848 -0.03149474)
  Marker tibia_l_lat: tibia_l (-0.00293574 -0.0330848 -0.03867426)
  Marker tibia_r_lat: tibia_r (-0.00293574 -0.0330848 0.03867426)
  Marker ankle_l_med: tibia_l (0.001076122 -0.3799941 0.03013977)
  Marker ankle_r_med: tibia_r (0.00107616 -0.3799941 -0.03013974)
  Marker ankle_l_lat: tibia_l (-0.01539344 -0.3841191 -0.03867426)
  Marker ankle_r_lat: tibia_r (-0.01539344 -0.3841191 0.03867426)
  Marker femur_l_center_in_pelvis: pelvis (-0.056276 -0.07849 -0.07726) fixed=true
  Marker femur_l_center: femur_l (0 0 0) fixed=true
  Marker femur_r_center_in_pelvis: pelvis (-0.056276 -0.07849 0.07726) fixed=true
  Marker femur_r_center: femur_r (0 0 0) fixed=true
  Marker patella_l_in_femur_l: femur_l (0.04431 -0.41876 0)
  Marker patella_l: patella_l (0 0 0)
  Marker patella_r_in_femur_r: femur_r (0.04431 -0.41876 0)
  Marker patella_r: patella_r (0 0 0)
  Marker knee_l_center_in_femur_l: femur_l (-4.6e-7 -0.4044252 0.00126526)
  Marker knee_l_center: tibia_l (0 0 0)
  Marker knee_r_center_in_femur_r: femur_r (-5e-7 -0.404425 -0.0012653)
  Marker knee_r_center: tibia_r (0 0 0)
  Marker tibia_l_center: tibia_l (-0.00293574 -0.0340848 -0.00358976)
  Marker tibia_r_center: tibia_r (-0.00293574 -0.0340848 0.00358976)
  Marker pelvis_origin_in_ground: ground (0.00058789 0.926126 0)
  Marker ilium_r: pelvis (-0.06868106 0.0801894 0.09312606)
  Marker ilium_l: pelvis (-0.0686811 0.08018135 -0.0931261)
  Marker isch_spine_r: pelvis (-0.1091938 -0.06979188 0.05020122)
  Marker isch_spine_l: pelvis (-0.109194 -0.069792 -0.0502012)
  Marker isch_tuber_r: pelvis (-0.115 -0.104 0.046)
  Marker isch_tuber_l: pelvis (-0.115 -0.104 -0.046)
  Marker isch_infer_r: pelvis (-0.074 -0.133 0.035)
  Marker isch_infer_l: pelvis (-0.074 -0.133 -0.035)
  Marker pub_infer_c: pelvis (-0.02531049 -0.1046535 0)
  Marker gr_troch_as_r: femur_r (-0.000646221 -0.0134011 0.0491692)
  Marker gr_troch_as_l: femur_l (-0.0006462206 -0.0134011 -0.04916924)
  Marker gr_troch_lat_r: femur_r (-0.022 -0.025 0.06)
  Marker gr_troch_lat_l: femur_l (-0.022 -0.025 -0.06)
  Marker femur_r_midshaft_anter: femur_r (0.028 -0.2 0.03)
  Marker femur_r_midshaft_poster: femur_r (0.007203118 -0.2 0.03)
  Marker femur_l_midshaft_anter: femur_l (0.028 -0.2 -0.03) fixed=true
  Marker femur_l_midshaft_poster: femur_l (0.006 -0.2 -0.03) fixed=true
  Marker patella_sup_r: patella_r (0.001278442 0.05216223 0.001440599)
  Marker patella_sup_l: patella_l (0.001278456 0.0521627 -0.001440638)
  Marker patella_lat_r: patella_r (0.004 0.036 0.027)
  Marker patella_med_r: patella_r (0.0004 0.036 -0.027)
  Marker patella_lat_l: patella_l (0.004 0.036 -0.027) fixed=true
  Marker patella_med_l: patella_l (0.0004 0.036 0.027)
  Marker patella_r_anter: patella_r (0.01518533 0.03567004 -0.0008965813)
  Marker patella_l_anter: patella_l (0.0151853 0.0356764 0.0008966)
  Marker ankle_r_center: tibia_r (-0.00715862 -0.3820565 0.0042673) fixed=true
  Marker ankle_l_center: tibia_l (-0.00715864 -0.3820565 -0.00426725)
  Marker talus_r_center_in_tibia: tibia_r (-0.01 -0.4 4.163336e-17) fixed=true
  Marker talus_l_center_in_tibia: tibia_l (-0.01 -0.4 6.140921e-18) fixed=true
  Marker tibia_r_midshaft_anter: tibia_r (0.0225119 -0.2 0.0114803)
  Marker tibia_r_midshaft_poster: tibia_r (-0.0031791 -0.2 0.000541631)
  Marker fibula_r_midshaft_anter: tibia_r (-0.014 -0.2 0.0262986)
  Marker tibia_l_midshaft_anter: tibia_l (0.0225119 -0.2 -0.0114803)
  Marker tibia_l_midshaft_poster: tibia_l (-0.00285164 -0.2 -0.000645222)
  Marker fibula_l_midshaft_anter: tibia_l (-0.014 -0.2 -0.0275513)
  Marker fibula_r_as: tibia_r (-0.00541119 -0.06335043 0.01889838)
  Marker fibula_l_as: tibia_l (-0.005585158 -0.06258272 -0.01974757)
  Marker tibia_r_epiph_yellow_posteriormost: tibia_r (-0.02755654 -0.0360848 0.00358976)
  Marker tibia_r_epiph_yellow_anterior_plate: tibia_r (0.01655949 -0.02629172 0.00358976)
  Marker tibia_r_epiph_yellow_patel_tend_point: tibia_r (0.026 -0.063 0)
  Marker tibia_r_epiph_green_medial_lower_epiph: tibia_r (-0.00293574 -0.0590848 -0.01599474)
  Marker tibia_l_epiph_yellow_posteriormost: tibia_l (-0.02755654 -0.0360848 -0.00358976)
  Marker tibia_l_epiph_yellow_anterior_plate: tibia_l (0.01655946 -0.0262918 -0.00358976)
  Marker tibia_l_epiph_yellow_patel_tend_point: tibia_l (0.026 -0.063 0)
  Marker tibia_l_epiph_green_medial_lower_epiph: tibia_l (-0.00293574 -0.0590848 0.01599474)
  Marker tibia_r_ankle_yellow_anter: tibia_r (0.01259685 -0.37 0.001267338)
  Marker tibia_l_ankle_yellow_anter: tibia_l (0.0125968 -0.37 0.00126734)
  Marker torso_origin_in_pelvis: pelvis (-0.1007 0.0815 0)
  Marker fibula_r_lat_malleol_tip: tibia_r (-0.0194649 -0.406086 0.0220061)
  Marker fibula_l_lat_malleol_tip: tibia_l (-0.01946486 -0.4060858 -0.02200606)
  Marker tibia_r_med_malleol_tip: tibia_r (0.002836346 -0.3939046 -0.01872064)
  Marker tibia_l_med_malleol_tip: tibia_l (0.00283635 -0.393905 0.0187206)
  Marker pub_super_c: pelvis (0 -0.0804468 0)
  Marker ls_troch_r: femur_r (-0.027039 -0.0553422 0.00945148)
  Marker ls_troch_l: femur_l (-0.02703904 -0.05534216 -0.009451484)
  Marker femur_r_poster_diaph_25: femur_r (-0.016 -0.1 0.042) fixed=true
  Marker femur_l_poster_diaph_25: femur_l (-0.016 -0.1 -0.042)
  Marker femur_r_poster_diaph_75: femur_r (0.01 -0.3 0.015)
  Marker femur_l_poster_diaph_75: femur_l (0.01 -0.3 -0.015)
  Marker tibia_r_anter_diaph_25: tibia_r (0.0244496 -0.1 0.010448)
  Marker tibia_l_anter_diaph_25: tibia_l (0.0244496 -0.1 -0.0104481)
  Marker tibia_r_anter_diaph_75: tibia_r (0.0173321 -0.3 0.00752694)
  Marker tibia_l_anter_diaph_75: tibia_l (0.0173321 -0.3 -0.00752696)
  Marker fibula_r_anter_diaph_75: tibia_r (-0.0113925 -0.3 0.0226023)
  Marker fibula_l_anter_diaph_75: tibia_l (-0.009805397 -0.3 -0.0226023)
  Marker femur_r_anter_diaph_25: femur_r (0.01178759 -0.100861 0.0360354)
  Marker femur_l_anter_diaph_25: femur_l (0.0117876 -0.100861 -0.04095034)
  Marker gr_troch_ps_r: femur_r (-0.032864 -0.0005749 0.035505) fixed=true
  Marker gr_troch_ps_l: femur_l (-0.032864 -0.0005749 -0.035505)
  Marker sacroiliac_r: pelvis (-0.1205529 0.009244229 0.03666609)
  Marker sacroiliac_l: pelvis (-0.120553 0.00924423 -0.0366661)
  Marker 5th_sacr_v: pelvis (-0.1309516 -0.06174588 0) fixed=true
  Marker femur_r_anter_diaph_75: femur_r (0.0335734 -0.3 0.015)
  Marker femur_l_anter_diaph_75: femur_l (0.0335734 -0.3 -0.015)
  Marker AIIS_r: pelvis (-0.024 -0.039 0.093) fixed=true
  Marker AIIS_l: pelvis (-0.024 -0.039 -0.093)
  Marker femur_neck_center_r: femur_r (-0.0058027 -0.015853 0.022129) fixed=true
  Marker femur_neck_center_l: femur_l (-0.005802656 -0.01585274 -0.022129)
  Marker femur_shaft_center_r: femur_r (-0.01415189 -0.05445285 0.03752273)
  Marker femur_shaft_center_l: femur_l (-0.0141519 -0.0544529 -0.0375227)
