# OpenSim document version 40500
MarkerSet:
  Marker RASI: pelvis (0.006437494 0.00524467 0.128)
  Marker SACROL: pelvis (-0.176009 0.0646429 0)
  Marker RTHOL: femur_r (0.018 -0.2 0.064)
  Marker RTH2: femur_r (0.021084 -0.242485 0.06)
  Marker RTH3: femur_r (-0.0116293 -0.243342 0.0625124)
  Marker RKNEL: femur_r (1.921503e-11 -0.3957605 0.05)
  Marker RKNEM: femur_r (1.417681e-11 -0.3979209 -0.05)
  Marker RSHAOL: tibia_r (0.00500574 -0.180004 0.0500002)
  Marker RSHA2: tibia_r (0.00443791 -0.232138 0.0500005)
  Marker RSHA3: tibia_r (-0.0296339 -0.232529 0.0565549)
  Marker RMALL: tibia_r (-0.005 -0.41 0.053)
  Marker RMALM: tibia_r (0.006 -0.3888 -0.038)
  Marker RHEE: calcn_r (-0.02 0.02 0)
  Marker RM5: calcn_r (0.16 0.015 0.046)
  Marker RTOE: calcn_r (0.1882791 0.02000011 -0.02639787)
  Marker LTHOL: femur_l (0.018 -0.2 -0.064)
  Marker LTH2: femur_l (-0.01162931 -0.243342 -0.06251242)
  Marker LTH3: femur_l (0.02108399 -0.2424848 -0.06)
  Marker LHJCWK: femur_l (0 0 0) fixed=true
  Marker LKNEL: femur_l (1.9215e-11 -0.39576 -0.05)
  Marker LKNEM: femur_l (1.41768e-11 -0.397921 0.05)
  Marker LSHAOL: tibia_l (0.005005745 -0.1800041 -0.05000018)
  Marker LSHA2: tibia_l (-0.02963388 -0.2325293 -0.05655489)
  Marker LSHA3: tibia_l (0.004437908 -0.2321383 -0.05000053)
  Marker LMALL: tibia_l (-0.005 -0.41 -0.053)
  Marker LMALM: tibia_l (0.006 -0.3888 0.038)
  Marker LHEE: calcn_l (-0.02 0.02 0)
  Marker LM5: calcn_l (0.16 0.015 -0.046)
  Marker LTOE: calcn_l (0.188279 0.0200001 0.0263979)
  Marker RHJCWK: femur_r (0 0 0) fixed=true
  Marker LAJCWK: talus_l (0 0 0) fixed=true
  Marker RAJCWK: talus_r (0 0 0) fixed=true
  Marker LASI: pelvis (0.00643749 0.00524467 -0.128)
  Marker SACR2: pelvis (-0.1992715 0.01536895 0.03467559)
  Marker SACR3: pelvis (-0.2046079 0.0157629 0)
  Marker STRN: torso (0.08055624 0.33924 0)
  Marker XIPH: torso (0.1055154 0.2418046 0)
  Marker LPSI: pelvis (-0.1514852 0.01617428 -0.03799507)
  Marker RPSI: pelvis (-0.151485 0.0161743 0.0379951)
  Marker RFIB: tibia_r (-0.006806388 -0.07935324 0.06378708)
  Marker LFIB: tibia_l (-0.00680639 -0.0793532 -0.0637871)
  Marker BL: ground (0.11 -0.7437867 -0.9648039)
  Marker BR: ground (0.11 -0.743787 0.964804)
  Marker RKJCWK: tibia_r (-3.698603e-7 0.007404499 -1.186885e-8)
  Marker LKJCWK: tibia_l (-3.6986e-7 0.0074045 1.18689e-8)
