# OpenSim document version 40600
InverseKinematicsTool:
  results_directory: .
  model_file: data\models\015_Rajagopal2015_FAI.osim
  constraint_weight: Inf
  accuracy: 1e-6
  time_range: 1.275 1.89
  output_motion_file: ik.mot
  report_errors: true
  marker_file: markers.trc
  report_marker_locations: true
  IKTaskSet:
    IKMarkerTask FHD: apply=true weight=1
    IKMarkerTask LBHD: apply=true weight=1
    IKMarkerTask RBHD: apply=true weight=1
    IKMarkerTask C7: apply=true weight=1
    IKMarkerTask T10: apply=false weight=1
    IKMarkerTask CLAV: apply=true weight=1
    IKMarkerTask LSHO: apply=true weight=1
    IKMarkerTask LUUPA: apply=true weight=1
    IKMarkerTask LMUPA: apply=true weight=1
    IKMarkerTask LDUPA: apply=true weight=1
    IKMarkerTask LLEP: apply=true weight=1
    IKMarkerTask LMEP: apply=true weight=1
    IKMarkerTask LRAD: apply=true weight=1
    IKMarkerTask LUL: apply=true weight=1
    IKMarkerTask LRFIN: apply=true weight=1
    IKMarkerTask RSHO: apply=true weight=1
    IKMarkerTask RUPA1: apply=true weight=1
    IKMarkerTask RMUPA: apply=true weight=1
    IKMarkerTask RDUPA: apply=true weight=1
    IKMarkerTask RLEP: apply=true weight=1
    IKMarkerTask RMEP: apply=true weight=1
    IKMarkerTask RRAD: apply=true weight=1
    IKMarkerTask RUL: apply=true weight=1
    IKMarkerTask RUFIN: apply=true weight=1
    IKMarkerTask LASI: apply=true weight=30
    IKMarkerTask RASI: apply=true weight=30
    IKMarkerTask USACR: apply=true weight=15
    IKMarkerTask LSACR: apply=true weight=10
    IKMarkerTask RSACR: apply=true weight=10
    IKMarkerTask LHJC: apply=false weight=1
    IKMarkerTask LTHI1: apply=true weight=20
    IKMarkerTask LTHI2: apply=true weight=20
    IKMarkerTask LTHI3: apply=true weight=20
    IKMarkerTask LTHI4: apply=true weight=20
    IKMarkerTask LLFC: apply=false weight=50
    IKMarkerTask LMFC: apply=false weight=1
    IKMarkerTask LKJC: apply=false weight=1
    IKMarkerTask LTIB1: apply=true weight=20
    IKMarkerTask LTIB2: apply=true weight=20
    IKMarkerTask LTIB3: apply=true weight=20
    IKMarkerTask LTIB4: apply=true weight=20
    IKMarkerTask LLMAL: apply=false weight=80
    IKMarkerTask LMMAL: apply=false weight=80
    IKMarkerTask LAJC: apply=false weight=1
    IKMarkerTask LHEE: apply=true weight=40
    IKMarkerTask LMT1: apply=true weight=10
    IKMarkerTask LMT2: apply=true weight=10
    IKMarkerTask LMT5: apply=true weight=10
    IKMarkerTask RHJC: apply=false weight=5
    IKMarkerTask RTHI: apply=true weight=20
    IKMarkerTask RTHI2: apply=true weight=20
    IKMarkerTask RTHI3: apply=true weight=20
    IKMarkerTask RTHI4: apply=true weight=20
    IKMarkerTask RLFC: apply=false weight=1
    IKMarkerTask RMFC: apply=false weight=1
    IKMarkerTask RKJC: apply=false weight=1
    IKMarkerTask RTIB1: apply=true weight=20
    IKMarkerTask RTIB2: apply=true weight=20
    IKMarkerTask RTIB3: apply=true weight=20
    IKMarkerTask RTIB4: apply=true weight=20
    IKMarkerTask RLMAL: apply=false weight=1
    IKMarkerTask RMMAL: apply=false weight=1
    IKMarkerTask RAJC: apply=false weight=5
    IKMarkerTask RHEE: apply=true weight=40
    IKMarkerTask RMT1: apply=true weight=10
    IKMarkerTask RMT2: apply=true weight=10
    IKMarkerTask RMT5: apply=true weight=10
