# OpenSim document version 40600
AnalyzeTool:
  model_file: ..\..\..\..\models\015_Rajagopal2015_FAI.osim
  replace_force_set: false
  results_directory: ma
  output_precision: 6
  initial_time: 1.275
  final_time: 1.89
  solve_for_equilibrium_for_auxiliary_states: false
  maximum_number_of_integrator_steps: 20000
  maximum_integrator_step_size: 1
  minimum_integrator_step_size: 1e-8
  integrator_error_tolerance: 1e-5
  external_loads_file: externalloads.xml
  coordinates_file: ik.mot
  lowpass_cutoff_frequency_for_coordinates: 6
  AnalysisSet Analyses:
    MuscleAnalysis: start_time=1.275 end_time=1.89 step_interval=1 in_degrees=true muscle_list=all
        moment_arm_coordinate_list=all compute_moments=true
