# OpenSim document version 40000
AnalyzeTool:
  model_file: ..\..\..\..\models\Athlete_03_linearly_scaled_scaledMasses_increased_10.00.osim
  replace_force_set: false
  results_directory: muscleAnalysis
  output_precision: 8
  initial_time: 10.425
  final_time: 11.87
  solve_for_equilibrium_for_auxiliary_states: false
  maximum_number_of_integrator_steps: 20000
  maximum_integrator_step_size: 1
  minimum_integrator_step_size: 1e-8
  integrator_error_tolerance: 1e-5
  external_loads_file: externalloads.xml
  coordinates_file: joint_angles.mot
  lowpass_cutoff_frequency_for_coordinates: 6
  AnalysisSet Analyses:
    MuscleAnalysis: start_time=10.425 end_time=11.87 step_interval=1 in_degrees=true muscle_list=all
        moment_arm_coordinate_list=all compute_moments=true
