# OpenSim document version 40500
AnalyzeTool SO:
  model_file: ..\..\..\models\Athlete_03_lowerBody_final.osim
  replace_force_set: false
  force_set_files: ..\..\..\models\Athlete_03_lowerBody_final_actuators.xml
  results_directory: c:\Git\1_current_projects\AlexP\simulations\22_07_06\sq_70_EMG
  output_precision: 8
  initial_time: 3.6
  final_time: 5.97
  solve_for_equilibrium_for_auxiliary_states: false
  maximum_number_of_integrator_steps: 20000
  maximum_integrator_step_size: 1
  minimum_integrator_step_size: 1e-8
  integrator_error_tolerance: 1e-5
  external_loads_file: externalloads.xml
  coordinates_file: joint_angles.mot
  lowpass_cutoff_frequency_for_coordinates: -1
  AnalysisSet Analyses:
    StaticOptimization: start_time=3.6 end_time=5.97 step_interval=1 in_degrees=true use_model_force_set=true
        activation_exponent=2 use_muscle_physiology=true optimizer_convergence_criterion=0.0001
        optimizer_max_iterations=100
