# OpenSim document version 40500
InverseKinematicsTool:
  results_directory: c:\Git\1_current_projects\powerlifing_model\simulations\Athlete_03\22_07_06\sq_70_MRI
  time_range: 3.6 5.97
  output_motion_file: c:\Git\1_current_projects\powerlifing_model\simulations\Athlete_03\22_07_06\sq_70_MRI\joint_angles.mot
  marker_file: c:\Git\1_current_projects\powerlifing_model\simulations\Athlete_03\22_07_06\sq_70_MRI\marker_experimental.trc
  IKTaskSet:
    IKMarkerTask RASI: apply=false weight=1
    IKMarkerTask SACROL: apply=true weight=1
    IKMarkerTask RTHOL: apply=true weight=1
    IKMarkerTask RTH2: apply=true weight=1
    IKMarkerTask RTH3: apply=true weight=1
    IKMarkerTask RKNEL: apply=false weight=1
    IKMarkerTask RKNEM: apply=false weight=1
    IKMarkerTask RSHAOL: apply=true weight=1
    IKMarkerTask RSHA2: apply=true weight=1
    IKMarkerTask RSHA3: apply=true weight=1
    IKMarkerTask RMALL: apply=false weight=1
    IKMarkerTask RMALM: apply=false weight=1
    IKMarkerTask RHEE: apply=true weight=1
    IKMarkerTask RM5: apply=true weight=1
    IKMarkerTask RTOE: apply=true weight=1
    IKMarkerTask LTHOL: apply=true weight=1
    IKMarkerTask LTH2: apply=true weight=1
    IKMarkerTask LTH3: apply=true weight=1
    IKMarkerTask LKNEL: apply=false weight=1
    IKMarkerTask LKNEM: apply=false weight=1
    IKMarkerTask LSHAOL: apply=true weight=1
    IKMarkerTask LSHA2: apply=true weight=1
    IKMarkerTask LSHA3: apply=true weight=1
    IKMarkerTask LMALL: apply=false weight=1
    IKMarkerTask LMALM: apply=false weight=1
    IKMarkerTask LHEE: apply=true weight=1
    IKMarkerTask LM5: apply=true weight=1
    IKMarkerTask LTOE: apply=true weight=1
    IKMarkerTask LASI: apply=false weight=1
    IKMarkerTask RFIB: apply=false weight=1
    IKMarkerTask LFIB: apply=false weight=1
