# OpenSim document version 40500
InverseKinematicsTool:
  results_directory: ..
  time_range: NaN NaN
  output_motion_file: c:\Git\1_current_projects\powerlifing_model\simulations\Athlete_03\22_07_06\sq_80_EMG\joint_angles.mot
  marker_file: c:\Git\1_current_projects\powerlifing_model\simulations\Athlete_03\22_07_06\sq_80_EMG\marker_experimental.trc
  IKTaskSet:
    IKMarkerTask RASI: apply=false weight=1
    IKMarkerTask SACROL: apply=false weight=1
    IKMarkerTask RTHOL: apply=false weight=1
    IKMarkerTask RTH2: apply=false weight=1
    IKMarkerTask RTH3: apply=false weight=1
    IKMarkerTask RKNEL: apply=false weight=1
    IKMarkerTask RKNEM: apply=false weight=1
    IKMarkerTask RSHAOL: apply=false weight=1
    IKMarkerTask RSHA2: apply=false weight=1
    IKMarkerTask RSHA3: apply=false weight=1
    IKMarkerTask RMALL: apply=false weight=1
    IKMarkerTask RMALM: apply=false weight=1
    IKMarkerTask RHEE: apply=false weight=1
    IKMarkerTask RM5: apply=false weight=1
    IKMarkerTask RTOE: apply=false weight=1
    IKMarkerTask LTHOL: apply=false weight=1
    IKMarkerTask LTH2: apply=false weight=1
    IKMarkerTask LTH3: apply=false weight=1
    IKMarkerTask LKNEL: apply=false weight=1
    IKMarkerTask LKNEM: apply=false weight=1
    IKMarkerTask LSHAOL: apply=false weight=1
    IKMarkerTask LSHA2: apply=false weight=1
    IKMarkerTask LSHA3: apply=false weight=1
    IKMarkerTask LMALL: apply=false weight=1
    IKMarkerTask LMALM: apply=false weight=1
    IKMarkerTask LHEE: apply=false weight=1
    IKMarkerTask LM5: apply=false weight=1
    IKMarkerTask LTOE: apply=false weight=1
    IKMarkerTask LASI: apply=false weight=1
    IKMarkerTask RFIB: apply=false weight=1
    IKMarkerTask LFIB: apply=false weight=1
