# OpenSim document version 40500
AnalyzeTool:
  model_file: c:\Git\1_current_projects\powerlifing_model\models\Athlete_03_linearly_scaled.osim
  replace_force_set: false
  results_directory: c:\Git\1_current_projects\powerlifing_model\simulations\Athlete_03\22_07_06\sq_90_EMG\muscleAnalysis
  output_precision: 8
  initial_time: 2.295
  final_time: 6.225
  solve_for_equilibrium_for_auxiliary_states: false
  maximum_number_of_integrator_steps: 20000
  maximum_integrator_step_size: 1
  minimum_integrator_step_size: 1e-8
  integrator_error_tolerance: 1e-5
  external_loads_file: c:\Git\1_current_projects\powerlifing_model\simulations\Athlete_03\22_07_06\sq_90_EMG\externalloads.xml
  coordinates_file: c:\Git\1_current_projects\powerlifing_model\simulations\Athlete_03\22_07_06\sq_90_EMG\joint_angles.mot
  lowpass_cutoff_frequency_for_coordinates: 6
  AnalysisSet Analyses:
    MuscleAnalysis: start_time=2.295 end_time=6.225 step_interval=1 in_degrees=true muscle_list=all
        moment_arm_coordinate_list=all compute_moments=true
