# OpenSim document version 40000
InverseKinematicsTool:
  results_directory: ./
  time_range: 0.005 2.405
  output_motion_file: joint_angles.mot
  report_errors: true
  marker_file: C:\Git\1_current_projects\powerlifing_model\simulations\Athlete_03\25_03_31\Squat_bar_01\marker_experimental.trc
  report_marker_locations: true
  IKTaskSet:
    IKMarkerTask RASI: apply=false weight=10
    IKMarkerTask LASI: apply=false weight=10
    IKMarkerTask SACROL: apply=true weight=10
    IKMarkerTask RTHOL: apply=true weight=1
    IKMarkerTask RTH2: apply=true weight=1
    IKMarkerTask RTH3: apply=true weight=1
    IKMarkerTask RKNEL: apply=false weight=1
    IKMarkerTask RKNEM: apply=false weight=1
    IKMarkerTask RFIB: apply=false weight=1
    IKMarkerTask RSHAOL: apply=true weight=5
    IKMarkerTask RSHA2: apply=true weight=5
    IKMarkerTask RSHA3: apply=true weight=5
    IKMarkerTask RMALL: apply=false weight=1
    IKMarkerTask RMALM: apply=false weight=1
    IKMarkerTask RHEE: apply=true weight=5
    IKMarkerTask RM5: apply=true weight=5
    IKMarkerTask RTOE: apply=true weight=5
    IKMarkerTask LTHOL: apply=true weight=5
    IKMarkerTask LTH2: apply=true weight=5
    IKMarkerTask LTH3: apply=true weight=5
    IKMarkerTask LKNEL: apply=false weight=1
    IKMarkerTask LKNEM: apply=false weight=1
    IKMarkerTask LFIB: apply=false weight=1
    IKMarkerTask LSHAOL: apply=true weight=5
    IKMarkerTask LSHA2: apply=true weight=5
    IKMarkerTask LSHA3: apply=true weight=5
    IKMarkerTask LMALL: apply=false weight=5
    IKMarkerTask LMALM: apply=false weight=1
    IKMarkerTask LHEE: apply=true weight=5
    IKMarkerTask LM5: apply=true weight=5
    IKMarkerTask LTOE: apply=true weight=5
