# OpenSim document version 40500
ExternalLoads:
  datafile: C:\Git\1_current_projects\powerlifing_model\simulations\Athlete_03\25_03_31\Walking_01\c3dfile.mot
  ExternalForce grf_r_2: applied_to_body=calcn_r force_expressed_in_body=ground point_expressed_in_body=ground
      force_identifier=ground_force2_v point_identifier=ground_force2_p torque_identifier=ground_torque2
      data_source_name=grf
  ExternalForce grf_l_3: applied_to_body=calcn_l force_expressed_in_body=ground point_expressed_in_body=ground
      force_identifier=ground_force3_v point_identifier=ground_force3_p torque_identifier=ground_torque3
      data_source_name=grf
  ExternalForce grf_l_4: applied_to_body=calcn_l force_expressed_in_body=ground point_expressed_in_body=ground
      force_identifier=ground_force4_v point_identifier=ground_force4_p torque_identifier=ground_torque4
