# OpenSim document version 40000
AnalyzeTool Analyse:
  model_file: ..\..\..\..\models\Athlete_03\25_03_31\scaled_increasedForce3.osim
  replace_force_set: false
  force_set_files: a c t u a t o r s _ s o . x m l
  results_directory: .
  output_precision: 8
  initial_time: 3.54
  final_time: 4.19
  solve_for_equilibrium_for_auxiliary_states: false
  maximum_number_of_integrator_steps: 20000
  maximum_integrator_step_size: 1
  minimum_integrator_step_size: 1e-8
  integrator_error_tolerance: 1e-5
  external_loads_file: GRF.xml
  coordinates_file: joint_angles.mot
  lowpass_cutoff_frequency_for_coordinates: 6
  AnalysisSet Analyses:
    JointReaction JRA: start_time=3.54 end_time=4.19 step_interval=1 in_degrees=true
        forces_file=C:\Git\1_current_projects\powerlifing_model\simulations\Athlete_03\25_03_31\Walking_01\SO_StaticOptimization_force.sto
        joint_names=all apply_on_bodies=child express_in_frame=child
