# OpenSim document version 40000
CMCTool:
  model_file: Unassinged
  replace_force_set: false
  force_set_files: cmc_actuators.xml
  results_directory: .
  output_precision: 8
  initial_time: 0.175
  final_time: 1.255
  solve_for_equilibrium_for_auxiliary_states: true
  maximum_number_of_integrator_steps: 30000
  maximum_integrator_step_size: 1
  minimum_integrator_step_size: 1e-8
  integrator_error_tolerance: 1e-5
  external_loads_file: GRF.xml
  desired_kinematics_file: joint_angles.mot
  task_set_file: cmc_tasks.xml
  constraints_file: cmc_control_constraints.xml
  lowpass_cutoff_frequency: -1
  cmc_time_window: 0.01
  use_fast_optimization_target: true
  optimizer_algorithm: cfsqp
  numerical_derivative_step_size: 0.0001
  optimization_convergence_tolerance: 0.0001
  optimizer_max_iterations: 2000
  optimizer_print_level: 0
  use_verbose_printing: false
  AnalysisSet Analyses:
    Kinematics: coordinates=all start_time=0.175 end_time=1.255 step_interval=10 in_degrees=true
    Actuation: start_time=0.175 end_time=1.255 step_interval=10 in_degrees=true
