# OpenSim document version 40000
AnalyzeTool InducedAccelerations_Tool:
  model_file: ../../../../models/athlete_03/25_03_31/scaled_opt_N10.osim
  replace_force_set: false
  force_set_files: actuators_so.xml
  results_directory: IAA_Results
  output_precision: 8
  initial_time: 0.175
  final_time: 1.255
  solve_for_equilibrium_for_auxiliary_states: false
  maximum_number_of_integrator_steps: 20000
  maximum_integrator_step_size: 1
  minimum_integrator_step_size: 1e-8
  integrator_error_tolerance: 1e-5
  external_loads_file: GRF.xml
  coordinates_file: joint_angles.mot
  lowpass_cutoff_frequency_for_coordinates: 6
  AnalysisSet Analyses:
    InducedAccelerations: start_time=0.175 end_time=1.255 step_interval=10 in_degrees=true
        coordinate_names=(hip_flexion_r knee_angle_r ankle_angle_r) body_names=center_of_mass force_threshold=6 [N]
        compute_potentials_only=true report_constraint_reactions=true
      ConstraintSet:
        RollingOnSurfaceConstraint right_foot_contact: isEnforced=false socket_rolling_body=/bodyset/calcn_r
            socket_surface_body=/ground surface_normal=(0 1 0) surface_height=0 friction_coefficient=0.75
            contact_radius=0.01
        RollingOnSurfaceConstraint left_foot_contact: isEnforced=false socket_rolling_body=/bodyset/calcn_l
            socket_surface_body=/ground surface_normal=(0 1 0) surface_height=0 friction_coefficient=0.75
            contact_radius=0.01
  ControllerSet Controllers:
    ControlSetController: controls_file=SO_StaticOptimization_controls.xml
