# OpenSim document version 40000
ExternalLoads:
  datafile: grf.mot
  lowpass_cutoff_frequency_for_load_kinematics: 6
  ExternalForce grf_r_2: applied_to_body=calcn_r force_expressed_in_body=calcn_r point_expressed_in_body=ground
      force_identifier=ground_force_2_v point_identifier=ground_force_2_p torque_identifier=ground_moment_2_m
  ExternalForce grf_l_3: applied_to_body=calcn_r force_expressed_in_body=calcn_l point_expressed_in_body=ground
      force_identifier=ground_force_3_v point_identifier=ground_force_3_p torque_identifier=ground_moment_3_m
  ExternalForce grf_l_4: applied_to_body=calcn_r force_expressed_in_body=calcn_l point_expressed_in_body=ground
      force_identifier=ground_force_4_v point_identifier=ground_force_4_p torque_identifier=ground_moment_4_m
  ExternalForce grf_r_5: applied_to_body=calcn_r force_expressed_in_body=calcn_r point_expressed_in_body=ground
      force_identifier=ground_force_5_v point_identifier=ground_force_5_p torque_identifier=ground_moment_5_m
