# OpenSim document version 40000
ScaleTool Athlete_03:
  mass: 89 [kg]
  height: -1
  age: -1
  GenericModelMaker:
    model_file: c:\Git\powerlifing_model_clean\models\Athlete_03_GPK_MRI\25_03_31\tps_transformed.osim
  ModelScaler:
    apply: true
    scaling_order: measurements
    marker_file: marker_experimental_with_JointCenters.trc
    time_range: 0 0.05
    preserve_mass_distribution: false
    output_model_file: ..\..\..\..\models\Athlete_03_GPK_MRI\25_03_31\tps_transformed_scaled.osim
    output_scale_file: scale_set.xml
    MeasurementSet:
      Measurement pelvis_z: apply=true
        MarkerPair: markers=(LASI RASI)
        BodyScale pelvis: axes=Z
      Measurement pelvis_y: apply=true
        MarkerPair: markers=(SACROL RHJCWK)
        MarkerPair: markers=(SACROL LHJCWK)
        BodyScale pelvis: axes=Y
      Measurement femur_r_y: apply=true
        MarkerPair: markers=(RHJCWK RKJCWK)
        BodyScale femur_r: axes=(X Y Z)
        BodyScale femoral_cond_r: axes=(X Y Z)
        BodyScale sagittal_articulation_frame_r: axes=(X Y Z)
        BodyScale med_cond_r: axes=(X Y Z)
        BodyScale lat_cond_r: axes=(X Y Z)
        BodyScale patella_r: axes=(X Y Z)
      Measurement femur_l_y: apply=true
        MarkerPair: markers=(LHJCWK LKJCWK)
        BodyScale femur_l: axes=(X Y Z)
        BodyScale femoral_cond_l: axes=(X Y Z)
        BodyScale sagittal_articulation_frame_l: axes=(X Y Z)
        BodyScale med_cond_l: axes=(X Y Z)
        BodyScale lat_cond_l: axes=(X Y Z)
        BodyScale patella_l: axes=(X Y Z)
      Measurement tibia_r_y: apply=true
        MarkerPair: markers=(RKJCWK RAJCWK)
        BodyScale tibia_r: axes=(X Y Z)
      Measurement tibia_l_y: apply=true
        MarkerPair: markers=(LKJCWK LAJCWK)
        BodyScale tibial_plat_r: axes=(X Y Z)
        BodyScale tibial_plat_l: axes=(X Y Z)
        BodyScale tibia_l: axes=(X Y Z)
      Measurement talus_r_z: apply=true
        MarkerPair: markers=(RMALM RMALL)
        BodyScale talus_r: axes=Z
      Measurement talus_r_y: apply=true
        MarkerPair: markers=(RHEE RMALM)
        BodyScale talus_r: axes=(X Y)
      Measurement talus_l_z: apply=true
        MarkerPair: markers=(LMALL LMALM)
        BodyScale talus_l: axes=Z
      Measurement talus_l_y: apply=true
        MarkerPair: markers=(LHEE LMALM)
        BodyScale talus_l: axes=(X Y)
      Measurement calcn_r_y: apply=true
        MarkerPair: markers=(RHEE RMALM)
        BodyScale calcn_r: axes=(Y Z)
        BodyScale toes_r: axes=(X Y Z)
      Measurement calcn_l_y: apply=true
        MarkerPair: markers=(LHEE LMALM)
        BodyScale toes_l: axes=(X Y Z)
      Measurement calcn_r_x: apply=true
        MarkerPair: markers=(RHEE RTOE)
        BodyScale calcn_r: axes=X
      Measurement calcn_l_x: apply=true
        MarkerPair: markers=(LHEE LTOE)
        BodyScale calcn_l: axes=(X Y Z)
      Measurement torso_x: apply=true
        MarkerPair: markers=(STRN SACROL)
        BodyScale torso: axes=X
      Measurement torso_y: apply=true
        MarkerPair: markers=(STRN SACROL)
        BodyScale torso: axes=Y
      Measurement torso_z: apply=true
        MarkerPair: markers=(LASI RASI)
        BodyScale torso: axes=Z
      Measurement pelvis_x: apply=true
        MarkerPair: markers=(SACROL LASI)
        MarkerPair: markers=(SACROL RASI)
        BodyScale pelvis: axes=X
  MarkerPlacer:
    apply: true
    marker_file: marker_experimental_with_JointCenters.trc
    time_range: 0 0.05
    output_model_file: ..\..\..\..\models\Athlete_03_GPK_MRI\25_03_31\tps_transformed_scaled.osim
    output_marker_file: static_output.trc
    max_marker_movement: -1
    IKTaskSet:
      IKMarkerTask RASI: apply=true weight=2
      IKMarkerTask SACROL: apply=true weight=2
      IKMarkerTask RTHOL: apply=true weight=0
      IKMarkerTask RTH2: apply=true weight=0
      IKMarkerTask RTH3: apply=true weight=0
      IKMarkerTask RKNEL: apply=true weight=2
      IKMarkerTask RKNEM: apply=true weight=2
      IKMarkerTask RSHAOL: apply=true weight=0
      IKMarkerTask RSHA2: apply=true weight=0
      IKMarkerTask RSHA3: apply=true weight=0
      IKMarkerTask RMALL: apply=true weight=2
      IKMarkerTask RMALM: apply=true weight=2
      IKMarkerTask RHEE: apply=true weight=2
      IKMarkerTask RM5: apply=true weight=2
      IKMarkerTask RTOE: apply=true weight=2
      IKMarkerTask LTHOL: apply=true weight=1
      IKMarkerTask LTH2: apply=true weight=1
      IKMarkerTask LTH3: apply=true weight=1
      IKMarkerTask LHJCWK: apply=true weight=2
      IKMarkerTask LKNEL: apply=true weight=2
      IKMarkerTask LKNEM: apply=true weight=2
      IKMarkerTask LSHAOL: apply=true weight=0
      IKMarkerTask LSHA2: apply=true weight=0
      IKMarkerTask LSHA3: apply=true weight=0
      IKMarkerTask LMALL: apply=true weight=2
      IKMarkerTask LMALM: apply=true weight=2
      IKMarkerTask LHEE: apply=true weight=2
      IKMarkerTask LM5: apply=true weight=2
      IKMarkerTask LTOE: apply=true weight=2
      IKMarkerTask RHJCWK: apply=true weight=2
      IKMarkerTask LAJCWK: apply=true weight=2
      IKMarkerTask RAJCWK: apply=true weight=2
      IKMarkerTask LASI: apply=true weight=2
      IKMarkerTask SACR2: apply=true weight=0
      IKMarkerTask SACR3: apply=true weight=0
      IKMarkerTask LPSI: apply=true weight=2
      IKMarkerTask RPSI: apply=true weight=2
      IKMarkerTask RKJCWK: apply=true weight=2
      IKMarkerTask LKJCWK: apply=true weight=2
