# OpenSim document version 40000
AnalyzeTool Analyse:
  model_file: ..\..\..\..\models\Athlete_03_Lernagopal_optimised\25_03_31\lernagopal_with_wrapings_scaled_opt_N10_increased_3.00.osim
  replace_force_set: false
  results_directory: .
  output_precision: 8
  initial_time: 0.005
  final_time: 3.015
  solve_for_equilibrium_for_auxiliary_states: false
  maximum_number_of_integrator_steps: 20000
  maximum_integrator_step_size: 1
  minimum_integrator_step_size: 1e-8
  integrator_error_tolerance: 1e-5
  external_loads_file: GRF.xml
  coordinates_file: joint_angles.mot
  lowpass_cutoff_frequency_for_coordinates: 6
  AnalysisSet Analyses:
    JointReaction JRA: start_time=0.005 end_time=3.015 step_interval=1 in_degrees=true
        forces_file=Execution_a10_b1_g1000\MuscleForces.sto joint_names=all apply_on_bodies=child
        express_in_frame=child
