# OpenSim document version 40500
ScaleTool Athlete_03_MRI_scaled:
  mass: 100 [kg]
  height: -1
  age: -1
  ModelScaler:
    apply: true
    marker_file: marker_experimental_with_JointCenters_works.trc
    time_range: 0 3.46
    preserve_mass_distribution: false
  MarkerPlacer:
    apply: true
    marker_file: marker_experimental_with_JointCenters_works.trc
    time_range: 0 3.46
    max_marker_movement: -1
    IKTaskSet:
      IKMarkerTask RASI: apply=true weight=1
      IKMarkerTask LASI: apply=true weight=1
      IKMarkerTask RPSI: apply=true weight=1
      IKMarkerTask LPSI: apply=true weight=1
      IKMarkerTask SACROL: apply=true weight=1
      IKMarkerTask SACR2: apply=true weight=1
      IKMarkerTask SACR3: apply=true weight=1
      IKMarkerTask RTHOL: apply=true weight=1
      IKMarkerTask RTH2: apply=true weight=1
      IKMarkerTask RTH3: apply=true weight=1
      IKMarkerTask RKNEL: apply=true weight=1
      IKMarkerTask RKNEM: apply=true weight=1
      IKMarkerTask RSHAOL: apply=true weight=1
      IKMarkerTask RSHA2: apply=true weight=1
      IKMarkerTask RSHA3: apply=true weight=1
      IKMarkerTask RMALL: apply=true weight=1
      IKMarkerTask RMALM: apply=true weight=1
      IKMarkerTask RHEE: apply=true weight=1
      IKMarkerTask RM5: apply=true weight=1
      IKMarkerTask RTOE: apply=true weight=1
      IKMarkerTask LTHOL: apply=true weight=1
      IKMarkerTask LTH2: apply=true weight=1
      IKMarkerTask LTH3: apply=true weight=1
      IKMarkerTask LKNEL: apply=true weight=1
      IKMarkerTask LKNEM: apply=true weight=1
      IKMarkerTask LSHAOL: apply=true weight=1
      IKMarkerTask LSHA2: apply=true weight=1
      IKMarkerTask LSHA3: apply=true weight=1
      IKMarkerTask LMALL: apply=true weight=1
      IKMarkerTask LMALM: apply=true weight=1
      IKMarkerTask LHEE: apply=true weight=1
      IKMarkerTask LM5: apply=true weight=1
      IKMarkerTask LTOE: apply=true weight=1
      IKMarkerTask femur_l_center_in_pelvis: apply=false weight=1
      IKMarkerTask femur_r_center_in_pelvis: apply=false weight=1
      IKMarkerTask patella_l_in_femur_l: apply=false weight=1
      IKMarkerTask patella_r_in_femur_r: apply=false weight=1
      IKMarkerTask knee_l_center_in_femur_l: apply=false weight=1
      IKMarkerTask knee_r_center_in_femur_r: apply=false weight=1
      IKMarkerTask talus_l_center_in_tibia: apply=false weight=1
      IKMarkerTask talus_r_center_in_tibia: apply=false weight=1
