# OpenSim document version 40600
AnalyzeTool Analyse:
  model_file: ..\..\..\..\models\Athlete_03_MRI_Katya_scaled_increased_3.00.osim
  replace_force_set: false
  results_directory: .
  output_precision: 8
  initial_time: 3.255
  final_time: 6.025
  solve_for_equilibrium_for_auxiliary_states: false
  maximum_number_of_integrator_steps: 20000
  maximum_integrator_step_size: 1
  minimum_integrator_step_size: 1e-8
  integrator_error_tolerance: 1e-5
  external_loads_file: externalloads.xml
  coordinates_file: joint_angles.mot
  lowpass_cutoff_frequency_for_coordinates: 6
  AnalysisSet Analyses:
    JointReaction JRA: start_time=3.255 end_time=6.025 step_interval=1 in_degrees=true
        forces_file=C:\Users\Biomechanik\Documents\powerlifting_model\powerlifing_model\simulations\Athlete_03_MRI_Katya\22_07_06\sq_80\SO_StaticOptimization_force.sto
        joint_names=all apply_on_bodies=child express_in_frame=child
