# OpenSim document version 40000
AnalyzeTool:
  model_file: C:\Users\Biomechanik\SynologyDrive\Deimel_MSc_Deadlift\scaling_AD\Scaled_models\Athlete_03_lowerBody_final.osim
  replace_force_set: false
  results_directory: C:\Users\Biomechanik\SynologyDrive\Deimel_MSc_Deadlift\SimulationOutputDeadlift\Athlete_03\dl_80\Output\JRL
  output_precision: 8
  initial_time: 9.355
  final_time: 11.295
  solve_for_equilibrium_for_auxiliary_states: false
  maximum_number_of_integrator_steps: 20000
  maximum_integrator_step_size: 1
  minimum_integrator_step_size: 1e-8
  integrator_error_tolerance: 1e-5
  external_loads_file: C:\Users\Biomechanik\SynologyDrive\Deimel_MSc_Deadlift\Athlete_03\Athlete_3_22_07_06\dl_80\GRF.xml
  coordinates_file: C:\Users\Biomechanik\SynologyDrive\Deimel_MSc_Deadlift\SimulationOutputDeadlift\Athlete_03\dl_80\Output\IK\IK.mot
  lowpass_cutoff_frequency_for_coordinates: 6
  AnalysisSet Analyses:
    BodyKinematics: start_time=9.355 end_time=11.295 step_interval=1 in_degrees=true
        bodies=(tibia_l tibia_r calcn_l calcn_r talus_l talus_r) express_results_in_body_local_frame=false
