# OpenSim document version 40000
ScaleTool HC835B:
  mass: 98.2 [kg]
  height: -1
  age: -1
  ModelScaler:
    apply: true
    scaling_order: measurements
    marker_file: marker_experimental_with_JointCenters.trc
    time_range: 0 0.05
    preserve_mass_distribution: false
    output_model_file: C:/Git/powerlifing_model_clean/simulations/Test1/Session1/HC835B_STD_0001/../../../../models/Athlete_03_GPK_MRI/25_03_31/tps_transformed_scaled.osim
    output_scale_file: scale_set.xml
    MeasurementSet:
      Measurement pelvis_z: apply=true
        MarkerPair: markers=(LASI RASI)
        BodyScale pelvis: axes=Z
      Measurement pelvis_y: apply=true
        MarkerPair: markers=(RASI RHJC)
        MarkerPair: markers=(LASI LHJC)
        BodyScale pelvis: axes=Y
      Measurement femur_r_y: apply=true
        MarkerPair: markers=(RHJC RKJC)
        BodyScale femur_r: axes=(X Y Z)
        BodyScale femoral_cond_r: axes=(X Y Z)
        BodyScale sagittal_articulation_frame_r: axes=(X Y Z)
        BodyScale med_cond_r: axes=(X Y Z)
        BodyScale lat_cond_r: axes=(X Y Z)
        BodyScale patella_r: axes=(X Y Z)
      Measurement femur_l_y: apply=true
        MarkerPair: markers=(LHJC LKJC)
        BodyScale femur_l: axes=(X Y Z)
        BodyScale femoral_cond_l: axes=(X Y Z)
        BodyScale sagittal_articulation_frame_l: axes=(X Y Z)
        BodyScale med_cond_l: axes=(X Y Z)
        BodyScale lat_cond_l: axes=(X Y Z)
        BodyScale patella_l: axes=(X Y Z)
      Measurement tibia_r_y: apply=true
        MarkerPair: markers=(RKJC RAJC)
        BodyScale tibia_r: axes=(X Y Z)
      Measurement tibia_l_y: apply=true
        MarkerPair: markers=(LKJC LAJC)
        BodyScale tibial_plat_r: axes=(X Y Z)
        BodyScale tibial_plat_l: axes=(X Y Z)
        BodyScale tibia_l: axes=(X Y Z)
      Measurement talus_r_z: apply=true
        MarkerPair: markers=(RLA RMA)
        BodyScale talus_r: axes=Z
      Measurement talus_r_y: apply=true
        MarkerPair: markers=(RCAL1 RSMH)
        BodyScale talus_r: axes=(X Y)
      Measurement talus_l_z: apply=true
        MarkerPair: markers=(LLA LMA)
        BodyScale talus_l: axes=Z
      Measurement talus_l_y: apply=true
        MarkerPair: markers=(LCAL1 LVMH)
        BodyScale talus_l: axes=(X Y)
      Measurement calcn_r_y: apply=true
        MarkerPair: markers=(RCAL1 RLA)
        BodyScale calcn_r: axes=(Y Z)
        BodyScale toes_r: axes=(X Y Z)
      Measurement calcn_l_y: apply=true
        MarkerPair: markers=(LCAL1 LLA)
        BodyScale toes_l: axes=(X Y Z)
      Measurement calcn_r_x: apply=true
        MarkerPair: markers=(RCAL1 RSMH)
        BodyScale calcn_r: axes=X
      Measurement calcn_l_x: apply=true
        MarkerPair: markers=(LCAL1 LVMH)
        BodyScale calcn_l: axes=(X Y Z)
      Measurement torso_y: apply=true
        MarkerPair: markers=(RHJC RAJC)
        MarkerPair: markers=(LHJC LAJC)
        BodyScale torso: axes=(X Y)
      Measurement torso_z: apply=true
        MarkerPair: markers=(LASI RASI)
        MarkerPair: markers=(LPSI RPSI)
        BodyScale torso: axes=Z
      Measurement pelvis_x: apply=true
        MarkerPair: markers=(LPSI LASI)
        MarkerPair: markers=(RPSI RASI)
        BodyScale pelvis: axes=X
  MarkerPlacer:
    apply: true
    marker_file: marker_experimental_with_JointCenters.trc
    time_range: 0 0.05
    output_model_file: C:/Git/powerlifing_model_clean/simulations/Test1/Session1/HC835B_STD_0001/../../../../models/Athlete_03_GPK_MRI/25_03_31/tps_transformed_scaled.osim
    output_marker_file: static_output.trc
    max_marker_movement: -1
    IKTaskSet:
      IKMarkerTask LASI: apply=true weight=2
      IKMarkerTask RASI: apply=true weight=2
      IKMarkerTask LPSI: apply=true weight=2
      IKMarkerTask RPSI: apply=true weight=2
      IKMarkerTask RHJC: apply=true weight=1
      IKMarkerTask RTH1: apply=true weight=0
      IKMarkerTask RTH2: apply=true weight=0
      IKMarkerTask RTH3: apply=true weight=0
      IKMarkerTask RTH4: apply=true weight=0
      IKMarkerTask RLK: apply=true weight=1
      IKMarkerTask RMK: apply=true weight=1
      IKMarkerTask RKJC: apply=true weight=1
      IKMarkerTask RSK1: apply=true weight=0
      IKMarkerTask RSK2: apply=true weight=0
      IKMarkerTask RSK3: apply=true weight=0
      IKMarkerTask RSK4: apply=true weight=0
      IKMarkerTask RMA: apply=true weight=1
      IKMarkerTask RLA: apply=true weight=1
      IKMarkerTask RAJC: apply=true weight=1
      IKMarkerTask RCAL1: apply=true weight=1
      IKMarkerTask RFMH: apply=true weight=1
      IKMarkerTask RSMH: apply=true weight=1
      IKMarkerTask RVMH: apply=true weight=1
      IKMarkerTask LHJC: apply=true weight=1
      IKMarkerTask LTH1: apply=true weight=0
      IKMarkerTask LTH2: apply=true weight=1
      IKMarkerTask LTH3: apply=true weight=1
      IKMarkerTask LTH4: apply=true weight=0
      IKMarkerTask LLK: apply=true weight=1
      IKMarkerTask LMK: apply=true weight=1
      IKMarkerTask LKJC: apply=true weight=1
      IKMarkerTask LSK1: apply=true weight=0
      IKMarkerTask LSK2: apply=true weight=0
      IKMarkerTask LSK3: apply=true weight=0
      IKMarkerTask LSK4: apply=true weight=0
      IKMarkerTask LLA: apply=true weight=1
      IKMarkerTask LMA: apply=true weight=1
      IKMarkerTask LAJC: apply=true weight=1
      IKMarkerTask LCAL1: apply=true weight=1
      IKMarkerTask LFMH: apply=true weight=1
      IKMarkerTask LVMH: apply=true weight=1
