# OpenSim document version 40500
InverseKinematicsTool IK_half_cycle:
  results_directory: .
  model_file: ..\../001/P01/model_update/5_optimised\P01_pers.osim
  time_range: 0.136 0.742
  output_motion_file: IK_half_cycle.mot
  marker_file: .\filtered_trc.trc
  IKTaskSet:
    IKMarkerTask C7: apply=true weight=1
    IKMarkerTask RBAK: apply=true weight=1
    IKMarkerTask CLAV: apply=true weight=1
    IKMarkerTask STRN: apply=true weight=1
    IKMarkerTask T10: apply=true weight=0.1
    IKMarkerTask RASI: apply=true weight=1
    IKMarkerTask RPSI: apply=true weight=1
    IKMarkerTask LPSI: apply=true weight=1
    IKMarkerTask LASI: apply=true weight=1
    IKMarkerTask PE01: apply=true weight=1
    IKMarkerTask PE02: apply=true weight=1
    IKMarkerTask PE03: apply=true weight=1
    IKMarkerTask RTH1: apply=true weight=5
    IKMarkerTask RTH2: apply=true weight=5
    IKMarkerTask RTH3: apply=true weight=5
    IKMarkerTask RGT: apply=false weight=0
    IKMarkerTask RKNE: apply=false weight=0
    IKMarkerTask RMKNE: apply=false weight=0
    IKMarkerTask LTH1: apply=true weight=5
    IKMarkerTask LTH2: apply=true weight=5
    IKMarkerTask LTH3: apply=true weight=5
    IKMarkerTask LGT: apply=false weight=0
    IKMarkerTask LKNE: apply=false weight=0
    IKMarkerTask LMKNE: apply=false weight=0
    IKMarkerTask RTB1: apply=true weight=5
    IKMarkerTask RTB2: apply=true weight=5
    IKMarkerTask RTB3: apply=true weight=5
    IKMarkerTask RANK: apply=false weight=0
    IKMarkerTask RMMA: apply=false weight=0
    IKMarkerTask LTB1: apply=true weight=5
    IKMarkerTask LTB2: apply=true weight=5
    IKMarkerTask LTB3: apply=true weight=0.1
    IKMarkerTask LANK: apply=false weight=0
    IKMarkerTask LMMA: apply=false weight=0
    IKMarkerTask RHEE: apply=true weight=1
    IKMarkerTask RD5M: apply=true weight=1
    IKMarkerTask RTOE: apply=true weight=1
    IKMarkerTask LHEE: apply=true weight=1
    IKMarkerTask LD5M: apply=true weight=1
    IKMarkerTask LTOE: apply=true weight=1
