# OpenSim document version 40500
AnalyzeTool:
  model_file: ../../001/P01/model_update/5_optimised/P01_pers.osim
  replace_force_set: false
  results_directory: muscleAnalysis
  output_precision: 8
  initial_time: 0.136
  final_time: 0.742
  solve_for_equilibrium_for_auxiliary_states: false
  maximum_number_of_integrator_steps: 20000
  maximum_integrator_step_size: 1
  minimum_integrator_step_size: 1e-8
  integrator_error_tolerance: 1e-5
  external_loads_file: Right_1.xml
  coordinates_file: IK_half_cycle.mot
  lowpass_cutoff_frequency_for_coordinates: 6
  AnalysisSet Analyses:
    MuscleAnalysis: start_time=0.136 end_time=0.742 step_interval=1 in_degrees=true muscle_list=all
        moment_arm_coordinate_list=all compute_moments=true
