# OpenSim document version 40500
AnalyzeTool:
  model_file: C:\Users\Bas\Downloads\ceinms-nn\runA1\..\009_Rajagopal2015_FAI_v3.osim
  replace_force_set: false
  results_directory: C:\Users\Bas\Downloads\ceinms-nn\runA1\muscleAnalysis
  output_precision: 8
  initial_time: 2.075
  final_time: 2.545
  solve_for_equilibrium_for_auxiliary_states: false
  maximum_number_of_integrator_steps: 20000
  maximum_integrator_step_size: 1
  minimum_integrator_step_size: 1e-8
  integrator_error_tolerance: 1e-5
  external_loads_file: C:\Users\Bas\Downloads\ceinms-nn\runA1\grf.xml
  coordinates_file: C:\Users\Bas\Downloads\ceinms-nn\runA1\joint_angles.mot
  lowpass_cutoff_frequency_for_coordinates: 6
  AnalysisSet Analyses:
    MuscleAnalysis: start_time=2.075 end_time=2.545 step_interval=1 in_degrees=true muscle_list=all
        moment_arm_coordinate_list=all compute_moments=true
