# OpenSim document version 40000
ScaleTool pilot_01:
  mass: 69 [kg]
  height: -1
  age: -1
  ModelScaler:
    apply: true
    scaling_order: measurements
    marker_file: marker_experimental_with_joint_centres.trc
    time_range: 0 0.05
    preserve_mass_distribution: false
    MeasurementSet:
      Measurement pelvis_z: apply=true
        MarkerPair: markers=(LASI RASI)
        BodyScale pelvis: axes=Z
      Measurement pelvis_y: apply=true
        MarkerPair: markers=(LASI LHJC)
        MarkerPair: markers=(RASI RHJC)
        BodyScale pelvis: axes=Y
      Measurement femur_r_y: apply=true
        MarkerPair: markers=(RHJC RKJC)
        BodyScale femur_r: axes=(X Y Z)
        BodyScale femoral_cond_r: axes=(X Y Z)
        BodyScale sagittal_articulation_frame_r: axes=(X Y Z)
        BodyScale med_cond_r: axes=(X Y Z)
        BodyScale lat_cond_r: axes=(X Y Z)
        BodyScale patella_r: axes=(X Y Z)
      Measurement femur_l_y: apply=true
        MarkerPair: markers=(LHJC LKJC)
        BodyScale femur_l: axes=(X Y Z)
        BodyScale femoral_cond_l: axes=(X Y Z)
        BodyScale sagittal_articulation_frame_l: axes=(X Y Z)
        BodyScale med_cond_l: axes=(X Y Z)
        BodyScale lat_cond_l: axes=(X Y Z)
        BodyScale patella_l: axes=(X Y Z)
      Measurement tibia_r_y: apply=true
        MarkerPair: markers=(RKJC RAJC)
        BodyScale tibia_r: axes=(X Y Z)
      Measurement tibia_l_y: apply=true
        MarkerPair: markers=(LKJC LAJC)
        BodyScale tibial_plat_r: axes=(X Y Z)
        BodyScale tibial_plat_l: axes=(X Y Z)
        BodyScale tibia_l: axes=(X Y Z)
      Measurement talus_r: apply=true
        MarkerPair: markers=(RHEE RANK)
        BodyScale talus_r: axes=Z
      Measurement talus_l: apply=true
        MarkerPair: markers=(LHEE LANK)
        BodyScale talus_l: axes=Z
      Measurement calcn_r: apply=true
        MarkerPair: markers=(RHEE RTOE)
        BodyScale calcn_r: axes=(Y Z)
        BodyScale toes_r: axes=(X Y Z)
      Measurement calcn_l: apply=true
        MarkerPair: markers=(LHEE LTOE)
        BodyScale toes_l: axes=(X Y Z)
      Measurement torso_x: apply=false
        MarkerPair: markers=(STRN SACROL)
      Measurement torso_y: apply=false
        MarkerPair: markers=(STRN SACROL)
      Measurement torso_z: apply=true
        MarkerPair: markers=(LASI RASI)
        BodyScale torso: axes=(X Y Z)
      Measurement pelvis_x: apply=true
        MarkerPair: markers=(RASI RPSI)
        MarkerPair: markers=(LASI LPSI)
        BodyScale pelvis: axes=X
  MarkerPlacer:
    apply: true
    marker_file: marker_experimental_with_joint_centres.trc
    time_range: 0 0.05
    max_marker_movement: -1
    IKTaskSet:
      IKMarkerTask LASI: apply=true weight=2
      IKMarkerTask RASI: apply=true weight=2
      IKMarkerTask LPSI: apply=true weight=2
      IKMarkerTask RPSI: apply=true weight=2
      IKMarkerTask RKNE: apply=true weight=0
      IKMarkerTask RANK: apply=true weight=0
      IKMarkerTask RHEE: apply=true weight=2
      IKMarkerTask RTOE: apply=true weight=2
      IKMarkerTask LHEE: apply=true weight=2
      IKMarkerTask LTOE: apply=true weight=2
