# OpenSim document version 40000
ExternalLoads:
  datafile: grf.mot
  lowpass_cutoff_frequency_for_load_kinematics: 6
  ExternalForce [values shared by the 5 below unless stated]: force_expressed_in_body=ground
      point_expressed_in_body=ground
  ExternalForce grf_r_1: applied_to_body=calcn_r force_identifier=ground_force1_v point_identifier=ground_force1_p
      torque_identifier=ground_torque1_
  ExternalForce grf_r_2: applied_to_body=calcn_r force_identifier=ground_force2_v point_identifier=ground_force2_p
      torque_identifier=ground_torque2_
  ExternalForce grf_l_3: applied_to_body=calcn_l force_identifier=ground_force3_v point_identifier=ground_force3_p
      torque_identifier=ground_torque3_
  ExternalForce grf_l_4: applied_to_body=calcn_l force_identifier=ground_force4_v point_identifier=ground_force4_p
      torque_identifier=ground_torque4_
  ExternalForce grf_l_5: applied_to_body=calcn_l force_identifier=ground_force5_v point_identifier=ground_force5_p
      torque_identifier=ground_torque5_
