# OpenSim document version 40000
ForceSet powerlifting_model_static_optimization_actuators:
  PointActuator FX: body=pelvis point=(-0.07370576 -0.01188505 0) point_is_global=false direction=(1 0 0)
      force_is_global=true optimal_force=100
  PointActuator FY: body=pelvis point=(-0.07370576 -0.01188505 0) point_is_global=false direction=(0 1 0)
      force_is_global=true optimal_force=200
  PointActuator FZ: body=pelvis point=(-0.07370576 -0.01188505 0) point_is_global=false direction=(0 0 1)
      force_is_global=true optimal_force=100
  TorqueActuator MX: bodyA=pelvis bodyB=ground torque_is_global=true axis=(1 0 0) optimal_force=80
  TorqueActuator MY: bodyA=pelvis bodyB=ground torque_is_global=true axis=(0 1 0) optimal_force=80
  TorqueActuator MZ: bodyA=pelvis bodyB=ground torque_is_global=true axis=(0 0 1) optimal_force=80
  CoordinateActuator hip_flexion_r_reserve: coordinate=hip_flexion_r optimal_force=1
  CoordinateActuator hip_adduction_r_reserve: coordinate=hip_adduction_r optimal_force=1
  CoordinateActuator hip_rotation_r_reserve: coordinate=hip_rotation_r optimal_force=1
  CoordinateActuator knee_angle_r_reserve: coordinate=knee_angle_r optimal_force=1
  CoordinateActuator knee_rotation_r_reserve: coordinate=knee_rotation_r optimal_force=100
  CoordinateActuator knee_adduction_r_reserve: coordinate=knee_adduction_r optimal_force=100
  CoordinateActuator ankle_angle_r_reserve: coordinate=ankle_angle_r optimal_force=1
  CoordinateActuator subtalar_angle_r_reserve: appliesForce=false coordinate=subtalar_angle_r optimal_force=1
  CoordinateActuator mtp_angle_r_reserve: coordinate=mtp_angle_r optimal_force=100
  CoordinateActuator hip_flexion_l_reserve: coordinate=hip_flexion_l optimal_force=1
  CoordinateActuator hip_adduction_l_reserve: coordinate=hip_adduction_l optimal_force=1
  CoordinateActuator hip_rotation_l_reserve: coordinate=hip_rotation_l optimal_force=1
  CoordinateActuator knee_angle_l_reserve: coordinate=knee_angle_l optimal_force=1
  CoordinateActuator knee_rotation_l_reserve: coordinate=knee_rotation_l optimal_force=100
  CoordinateActuator knee_adduction_l_reserve: coordinate=knee_adduction_l optimal_force=100
  CoordinateActuator ankle_angle_l_reserve: coordinate=ankle_angle_l optimal_force=1
  CoordinateActuator subtalar_angle_l_reserve: appliesForce=false coordinate=subtalar_angle_l optimal_force=1
  CoordinateActuator mtp_angle_l_reserve: coordinate=mtp_angle_l optimal_force=100
