# OpenSim document version 40500
AnalyzeTool:
  model_file: D:/athlete_03/simulations/Athlete_03/dl_70/Output/SO/../../../../Athlete_03_lowerBody_final.osim
  replace_force_set: false
  force_set_files: ../../../../Athlete_03_lowerBody_final_actuators.xml
  results_directory: D:/athlete_03/simulations/Athlete_03/dl_70/Output/SO/..
  output_precision: 8
  initial_time: 7.265
  final_time: 8.95
  solve_for_equilibrium_for_auxiliary_states: false
  maximum_number_of_integrator_steps: 20000
  maximum_integrator_step_size: 1
  minimum_integrator_step_size: 1e-8
  integrator_error_tolerance: 1e-5
  external_loads_file: D:/athlete_03/simulations/Athlete_03/dl_70/Output/SO/../../Input/GRF.xml
  coordinates_file: D:/athlete_03/simulations/Athlete_03/dl_70/Output/SO/../IK/IK.mot
  lowpass_cutoff_frequency_for_coordinates: 6
  AnalysisSet Analyses:
    StaticOptimization: start_time=7.265 end_time=8.95 step_interval=1 in_degrees=true use_model_force_set=true
        activation_exponent=2 use_muscle_physiology=true optimizer_convergence_criterion=0.0001
        optimizer_max_iterations=100
