# OpenSim document version 40000
InverseKinematicsTool:
  time_range: 15.595 20.92
  output_motion_file: C:\Users\Biomechanik\SynologyDrive\Deimel_MSc_Deadlift\SimulationOutputDeadlift\Athlete_03\dl_90\Output\IK\IK.mot
  marker_file: C:\Users\Biomechanik\SynologyDrive\Deimel_MSc_Deadlift\Athlete_03\Athlete_3_22_07_06\dl_90\marker_experimental.trc
  report_marker_locations: true
  IKTaskSet:
    IKMarkerTask RASI: apply=false weight=1
    IKMarkerTask SACROL: apply=true weight=1
    IKMarkerTask RTHOL: apply=true weight=1
    IKMarkerTask RTH2: apply=true weight=1
    IKMarkerTask RTH3: apply=true weight=1
    IKMarkerTask RKNEL: apply=false weight=1
    IKMarkerTask RKNEM: apply=false weight=1
    IKMarkerTask RSHAOL: apply=true weight=1
    IKMarkerTask RSHA2: apply=true weight=1
    IKMarkerTask RSHA3: apply=true weight=1
    IKMarkerTask RMALL: apply=false weight=1
    IKMarkerTask RMALM: apply=false weight=1
    IKMarkerTask RHEE: apply=true weight=1
    IKMarkerTask RM5: apply=true weight=1
    IKMarkerTask RTOE: apply=true weight=1
    IKMarkerTask LTHOL: apply=true weight=1
    IKMarkerTask LTH2: apply=true weight=1
    IKMarkerTask LTH3: apply=true weight=1
    IKMarkerTask LKNEL: apply=false weight=1
    IKMarkerTask LKNEM: apply=false weight=1
    IKMarkerTask LSHAOL: apply=true weight=1
    IKMarkerTask LSHA2: apply=true weight=1
    IKMarkerTask LSHA3: apply=true weight=1
    IKMarkerTask LMALL: apply=false weight=1
    IKMarkerTask LMALM: apply=false weight=1
    IKMarkerTask LHEE: apply=true weight=1
    IKMarkerTask LM5: apply=true weight=1
    IKMarkerTask LTOE: apply=true weight=1
    IKMarkerTask LASI: apply=false weight=1
    IKMarkerTask LACR: apply=false weight=1
    IKMarkerTask RACR: apply=false weight=1
    IKMarkerTask GLAB: apply=false weight=1
    IKMarkerTask RFHD: apply=false weight=1
    IKMarkerTask LFHD: apply=false weight=1
    IKMarkerTask C7: apply=false weight=1
    IKMarkerTask T6: apply=false weight=1
    IKMarkerTask T12: apply=false weight=1
    IKMarkerTask SPINMOL: apply=true weight=1
    IKMarkerTask SPINM2: apply=true weight=1
    IKMarkerTask SPINM3: apply=true weight=1
    IKMarkerTask BELTOL: apply=true weight=1
    IKMarkerTask BELT2: apply=true weight=1
    IKMarkerTask BELT3: apply=true weight=1
    IKMarkerTask SACR2: apply=true weight=1
    IKMarkerTask SACR3: apply=true weight=1
    IKMarkerTask STRN: apply=false weight=1
    IKMarkerTask XIPH: apply=false weight=1
    IKMarkerTask LUAOL: apply=true weight=1
    IKMarkerTask LUA2: apply=true weight=1
    IKMarkerTask LUA3: apply=true weight=1
    IKMarkerTask LLAOL: apply=true weight=1
    IKMarkerTask LLA2: apply=true weight=1
    IKMarkerTask LLA3: apply=true weight=1
    IKMarkerTask RUAOL: apply=true weight=1
    IKMarkerTask RUA2: apply=true weight=1
    IKMarkerTask RUA3: apply=true weight=1
    IKMarkerTask RLAOL: apply=true weight=1
    IKMarkerTask RLA2: apply=true weight=1
    IKMarkerTask RLA3: apply=true weight=1
    IKMarkerTask LPSI: apply=false weight=1
    IKMarkerTask RPSI: apply=false weight=1
    IKMarkerTask RCUBM: apply=false weight=1
    IKMarkerTask RCUBL: apply=false weight=1
    IKMarkerTask LCUBM: apply=false weight=1
    IKMarkerTask LCUBL: apply=false weight=1
    IKMarkerTask RWRU: apply=false weight=1
    IKMarkerTask RWRR: apply=false weight=1
    IKMarkerTask LWRU: apply=false weight=1
    IKMarkerTask LWRR: apply=false weight=1
    IKMarkerTask RFIB: apply=false weight=1
    IKMarkerTask LFIB: apply=false weight=1
    IKMarkerTask BL: apply=false weight=1
    IKMarkerTask BR: apply=false weight=1
