# OpenSim document version 40000
AnalyzeTool:
  model_file: C:\Users\Biomechanik\SynologyDrive\AlexP\Models\Athlete_03_Catelli_final.osim
  replace_force_set: false
  force_set_files: C:\Users\Biomechanik\SynologyDrive\AlexP\Models\Athlete_03_Catelli_final_actuators.xml
  results_directory: C:\Users\Biomechanik\SynologyDrive\AlexP\SimulationOutputCatelli\Athlete_03\sq_70\Output\SO
  output_precision: 8
  initial_time: 3.625
  final_time: 5.92
  solve_for_equilibrium_for_auxiliary_states: false
  maximum_number_of_integrator_steps: 20000
  maximum_integrator_step_size: 1
  minimum_integrator_step_size: 1e-8
  integrator_error_tolerance: 1e-5
  external_loads_file: C:\Users\Biomechanik\SynologyDrive\AlexP\Athlete_03\Athlete_3_22_07_06\sq_70\GRF.xml
  coordinates_file: C:\Users\Biomechanik\SynologyDrive\AlexP\SimulationOutputCatelli\Athlete_03\sq_70\Output\IK\IK.mot
  lowpass_cutoff_frequency_for_coordinates: 6
  AnalysisSet Analyses:
    StaticOptimization: start_time=3.625 end_time=5.92 step_interval=1 in_degrees=true use_model_force_set=true
        activation_exponent=2 use_muscle_physiology=true optimizer_convergence_criterion=0.0001
        optimizer_max_iterations=100
