# OpenSim document version 40000
InverseKinematicsTool:
  time_range: 3.21 5.895
  output_motion_file: C:\Users\Biomechanik\SynologyDrive\AlexP\SimulationOutputCatelli\Athlete_03\sq_80\Output\IK\IK.mot
  marker_file: C:\Users\Biomechanik\SynologyDrive\AlexP\Athlete_03\Athlete_3_22_07_06\sq_80\marker_experimental.trc
  report_marker_locations: true
  IKTaskSet:
    IKMarkerTask RASI: apply=false weight=1
    IKMarkerTask SACROL: apply=true weight=1
    IKMarkerTask RTHOL: apply=true weight=1
    IKMarkerTask RTH2: apply=true weight=1
    IKMarkerTask RTH3: apply=true weight=1
    IKMarkerTask RKNEL: apply=false weight=1
    IKMarkerTask RKNEM: apply=false weight=1
    IKMarkerTask RSHAOL: apply=true weight=1
    IKMarkerTask RSHA2: apply=true weight=1
    IKMarkerTask RSHA3: apply=true weight=1
    IKMarkerTask RMALL: apply=false weight=1
    IKMarkerTask RMALM: apply=false weight=1
    IKMarkerTask RHEE: apply=true weight=1
    IKMarkerTask RM5: apply=true weight=1
    IKMarkerTask RTOE: apply=true weight=1
    IKMarkerTask LTHOL: apply=true weight=1
    IKMarkerTask LTH2: apply=true weight=1
    IKMarkerTask LTH3: apply=true weight=1
    IKMarkerTask LKNEL: apply=false weight=1
    IKMarkerTask LKNEM: apply=false weight=1
    IKMarkerTask LSHAOL: apply=true weight=1
    IKMarkerTask LSHA2: apply=true weight=1
    IKMarkerTask LSHA3: apply=true weight=1
    IKMarkerTask LMALL: apply=false weight=1
    IKMarkerTask LMALM: apply=false weight=1
    IKMarkerTask LHEE: apply=true weight=1
    IKMarkerTask LM5: apply=true weight=1
    IKMarkerTask LTOE: apply=true weight=1
    IKMarkerTask LASI: apply=false weight=1
    IKMarkerTask SACR2: apply=true weight=1
    IKMarkerTask SACR3: apply=true weight=1
    IKMarkerTask STRN: apply=false weight=1
    IKMarkerTask XIPH: apply=false weight=1
    IKMarkerTask LPSI: apply=false weight=1
    IKMarkerTask RPSI: apply=false weight=1
    IKMarkerTask RFIB: apply=false weight=1
    IKMarkerTask LFIB: apply=false weight=1
