# OpenSim document version 40000
AnalyzeTool:
  model_file: C:\Users\Biomechanik\SynologyDrive\AlexP\Models\Athlete_03_Catelli_final.osim
  replace_force_set: false
  results_directory: C:\Users\Biomechanik\SynologyDrive\AlexP\SimulationOutputCatelli\Athlete_03\sq_85\Output\JRL
  output_precision: 8
  initial_time: 3.845
  final_time: 6.85
  solve_for_equilibrium_for_auxiliary_states: false
  maximum_number_of_integrator_steps: 20000
  maximum_integrator_step_size: 1
  minimum_integrator_step_size: 1e-8
  integrator_error_tolerance: 1e-5
  external_loads_file: C:\Users\Biomechanik\SynologyDrive\AlexP\Athlete_03\Athlete_3_22_07_06\sq_85\GRF.xml
  coordinates_file: C:\Users\Biomechanik\SynologyDrive\AlexP\SimulationOutputCatelli\Athlete_03\sq_85\Output\IK\IK.mot
  lowpass_cutoff_frequency_for_coordinates: 6
  AnalysisSet Analyses:
    BodyKinematics: start_time=3.845 end_time=6.85 step_interval=1 in_degrees=true
        bodies=(tibia_l tibia_r calcn_l calcn_r talus_l talus_r) express_results_in_body_local_frame=false
